Simulations: Version=167
  Folder Replacements
    Report CropReport: EventNames=[Clock].DoReport
      VariableNames:
        [Clock].Today as Date
        [PlantainForage].Population
        [PlantainForage].Phenology.ThermalTime
        [PlantainForage].Phenology.Photoperiod
        [PlantainForage].Phenology.CurrentPhase.Name
        [PlantainForage].Phenology.CurrentStageName
        [PlantainForage].Phenology.Stage
        [PlantainForage].Root.LengthDensity
        [PlantainForage].Leaf.ExtinctionCoefficient
        [PlantainForage].AboveGroundLive.Wt
        ([PlantainForage].Leaf.Live.Wt / ([PlantainForage].AboveGroundLive.Wt + 0.000001)) as LeafFraction
        ([PlantainForage].Stem.Live.Wt / ([PlantainForage].AboveGroundLive.Wt + 0.000001)) as StemFraction
        ([PlantainForage].Inflorescence.Live.Wt / ([PlantainForage].AboveGroundLive.Wt + 0.000001)) as FlowerFraction
        ([PlantainForage].Taproot.Live.Wt / ([PlantainForage].BelowGround.Wt + 0.000001)) as TaprootFraction
        ([PlantainForage].Root.Live.Wt / ([PlantainForage].BelowGround.Wt + 0.000001)) as RootFraction
        [PlantainForage].Arbitrator.DM.TotalFixationSupply
        [PlantainForage].Arbitrator.DM.TotalPlantDemand
        [PlantainForage].Arbitrator.DM.Allocated
        [PlantainForage].Arbitrator.DM.SinkLimitation
        [PlantainForage].Arbitrator.DM.NutrientLimitation
        [PlantainForage].Arbitrator.FDM
        [ExtraVars].Script.Leaf_DMSupply
        [ExtraVars].Script.Stem_DMSupply
        [ExtraVars].Script.Inflorescence_DMSupply
        [ExtraVars].Script.Root_DMSupply
        [ExtraVars].Script.Taproot_DMSupply
        [ExtraVars].Script.Leaf_DMDemand
        [ExtraVars].Script.Stem_DMDemand
        [ExtraVars].Script.Inflorescence_DMDemand
        [ExtraVars].Script.Root_DMDemand
        [ExtraVars].Script.Taproot_DMDemand
        [PlantainForage].Arbitrator.N.TotalPlantSupply
        [PlantainForage].Arbitrator.N.TotalPlantDemand
        [PlantainForage].Arbitrator.N.Allocated
        [PlantainForage].Arbitrator.FN
        [PlantainForage].Root.NTakenUp
        [PlantainForage].Root.NSupply.Uptake
        [PlantainForage].Root.NUptake
        [ExtraVars].Script.Leaf_NSupply
        [ExtraVars].Script.Stem_NSupply
        [ExtraVars].Script.Inflorescence_NSupply
        [ExtraVars].Script.Root_NSupply
        [ExtraVars].Script.Taproot_NSupply
        [ExtraVars].Script.Leaf_NDemand
        [ExtraVars].Script.Stem_NDemand
        [ExtraVars].Script.Inflorescence_NDemand
        [ExtraVars].Script.Root_NDemand
        [ExtraVars].Script.Taproot_NDemand
        [PlantainForage].ShootRootRatio
        [PlantainForage].TargetShootRootRatio
        [PlantainForage].Leaf.DMDemands.Structural.DMDemandFunction.PartitionFraction
        [PlantainForage].Stem.DMDemands.Structural.DMDemandFunction.PartitionFraction
        [PlantainForage].Inflorescence.DMDemands.Structural.DMDemandFunction.PartitionFraction
        [PlantainForage].Taproot.DMDemands.Structural.DMDemandFunction.PartitionFraction
        [PlantainForage].StemsLeafRatio
        [PlantainForage].FlowerStemRatio
        [PlantainForage].TaprootRootRatio
        [PlantainForage].TargetStemsLeafRatio
        [PlantainForage].TargetFlowerStemRatio
        [PlantainForage].TargetTaprootRootRatio
        [PlantainForage].Total.Wt
        [PlantainForage].Total.N
        [PlantainForage].Total.NConc
        [PlantainForage].AboveGround.Wt
        [PlantainForage].BelowGround.Wt
        [PlantainForage].AboveGround.N
        [PlantainForage].BelowGround.N
        [PlantainForage].AboveGroundLive.NConc
        [PlantainForage].BelowGroundLive.NConc
        [PlantainForage].Leaf.Wt
        [PlantainForage].Leaf.Live.Wt
        [PlantainForage].Leaf.Live.N
        [PlantainForage].Leaf.Live.NConc
        [PlantainForage].Leaf.Dead.Wt
        [PlantainForage].Leaf.Dead.NConc
        [PlantainForage].Leaf.CoverTotal
        [PlantainForage].Leaf.CoverGreen
        [PlantainForage].Leaf.CoverDead
        [PlantainForage].Leaf.LAITotal
        [PlantainForage].Leaf.LAI
        [PlantainForage].Leaf.LAIDead
        [PlantainForage].Leaf.Height
        [PlantainForage].Leaf.Transpiration
        [PlantainForage].Leaf.Fw
        [PlantainForage].Leaf.Fn
        [PlantainForage].Leaf.Photosynthesis.FCO2
        [PlantainForage].Leaf.Photosynthesis.FN
        [PlantainForage].Leaf.Photosynthesis.FT
        [PlantainForage].Leaf.Photosynthesis.FW
        [PlantainForage].Leaf.Photosynthesis.FVPD
        [PlantainForage].Leaf.FRGR
        [PlantainForage].Stem.Live.Wt
        [PlantainForage].Stem.Live.N
        [PlantainForage].Stem.Live.NConc
        [PlantainForage].Stem.Dead.Wt
        [PlantainForage].Stem.Dead.NConc
        [PlantainForage].Inflorescence.Live.Wt
        [PlantainForage].Inflorescence.Live.N
        [PlantainForage].Inflorescence.Live.NConc
        [PlantainForage].Inflorescence.Dead.Wt
        [PlantainForage].Inflorescence.Dead.NConc
        [PlantainForage].Taproot.Live.Wt
        [PlantainForage].Taproot.Live.N
        [PlantainForage].Taproot.Live.NConc
        [PlantainForage].Taproot.Dead.Wt
        [PlantainForage].Taproot.Dead.NConc
        [PlantainForage].Root.Live.Wt
        [PlantainForage].Root.Live.N
        [PlantainForage].Root.Live.NConc
        [PlantainForage].Root.Dead.Wt
        [PlantainForage].Root.Dead.NConc
        [PlantainForage].Root.Depth
        [PlantainForage].Root.WaterUptake
        [PlantainForage].Leaf.Live.StructuralWt
        [PlantainForage].Leaf.Live.StorageWt
        [PlantainForage].Leaf.Live.MetabolicWt
        [PlantainForage].Leaf.Live.StructuralN
        [PlantainForage].Leaf.Live.StorageN
        [PlantainForage].Leaf.Live.MetabolicN
        [PlantainForage].Leaf.Dead.StructuralWt
        [PlantainForage].Leaf.Dead.StorageWt
        [PlantainForage].Leaf.Dead.MetabolicWt
        [PlantainForage].Leaf.Dead.StructuralN
        [PlantainForage].Leaf.Dead.StorageN
        [PlantainForage].Leaf.Dead.MetabolicN
        [PlantainForage].Stem.Live.StructuralWt
        [PlantainForage].Stem.Live.StorageWt
        [PlantainForage].Stem.Live.MetabolicWt
        [PlantainForage].Stem.Live.StructuralN
        [PlantainForage].Stem.Live.MetabolicN
        [PlantainForage].Stem.Live.StorageN
        [PlantainForage].Inflorescence.Live.StructuralWt
        [PlantainForage].Inflorescence.Live.MetabolicWt
        [PlantainForage].Inflorescence.Live.StorageWt
        [PlantainForage].Inflorescence.Live.StructuralN
        [PlantainForage].Inflorescence.Live.MetabolicN
        [PlantainForage].Inflorescence.Live.StorageN
        [PlantainForage].Root.Live.StructuralWt
        [PlantainForage].Root.Live.MetabolicWt
        [PlantainForage].Root.Live.StorageWt
        [PlantainForage].Root.Live.StructuralN
        [PlantainForage].Root.Live.MetabolicN
        [PlantainForage].Root.Live.StorageN
        [PlantainForage].Taproot.Live.StructuralWt
        [PlantainForage].Taproot.Live.MetabolicWt
        [PlantainForage].Taproot.Live.StorageWt
        [PlantainForage].Taproot.Live.StructuralN
        [PlantainForage].Taproot.Live.MetabolicN
        [PlantainForage].Taproot.Live.StorageN
        [PlantainForage].Leaf.Live.StructuralNConc
        [PlantainForage].Leaf.Live.StorageNConc
        [PlantainForage].Root.Live.StructuralNConc
        [PlantainForage].Root.Live.StorageNConc
        [PlantainForage].Leaf.DMDemands.Structural.DMDemandFunction.PartitionFraction
        [PlantainForage].Stem.DMDemands.Structural.DMDemandFunction.PartitionFraction
        [PlantainForage].Inflorescence.DMDemands.Structural.DMDemandFunction.PartitionFraction
        [PlantainForage].Taproot.DMDemands.Structural.DMDemandFunction.PartitionFraction
        [PlantainForage].Leaf.Allocated.Wt
        [PlantainForage].Stem.Allocated.Wt
        [PlantainForage].Inflorescence.Allocated.Wt
        [PlantainForage].Taproot.Allocated.Wt
        [PlantainForage].Root.Allocated.Wt
        [PlantainForage].Leaf.Senesced.Wt
        [PlantainForage].Stem.Senesced.Wt
        [PlantainForage].Inflorescence.Senesced.Wt
        [PlantainForage].Taproot.Senesced.Wt
        [PlantainForage].Root.Senesced.Wt
        [PlantainForage].Leaf.Detached.Wt
        [PlantainForage].Stem.Detached.Wt
        [PlantainForage].Inflorescence.Detached.Wt
        [PlantainForage].Taproot.Detached.Wt
        [PlantainForage].Root.Detached.Wt
        [PlantainForage].Leaf.Removed.Wt
        [PlantainForage].Stem.Removed.Wt
        [PlantainForage].Inflorescence.Removed.Wt
        [PlantainForage].Taproot.Removed.Wt
        [PlantainForage].Root.Removed.Wt
        [PlantainForage].Root.LayerLive as RootWtByLayer
        [PlantainForage].Root.LayerDead as RootDeadWtByLayer
        [PlantainForage].WaterUptake as WaterUptakeByLayer
        [PlantainForage].NitrogenUptake as NitrogenUptakeByLayer
    Report DiagnosisReport: EventNames=[Clock].DoReport
      VariableNames:
        [Clock].Today as Date
        // surface OM
        ([PlantainForage].Leaf.Detached.Wt+[PlantainForage].Stem.Detached.Wt+[PlantainForage].Inflorescence.Detached.Wt)*0.4/([PlantainForage].Leaf.Detached.N+[PlantainForage].Stem.Detached.N+[PlantainForage].Inflorescence.Detached.N+0.00000001) as Litter.CN
        ([PlantainForage].Root.Detached.Wt+[PlantainForage].Taproot.Detached.Wt)*0.4/([PlantainForage].Root.Detached.N+[PlantainForage].Taproot.Detached.N+0.00000001) as RootDetached.CN
        //[DefoliationManager].Script.ReturnedWt*0.4/([DefoliationManager].Script.NReturnedInDung+0.00000001) as Dung.CN
        [SurfaceOrganicMatter].Wt
        ([SurfaceOrganicMatter].C/[SurfaceOrganicMatter].N) as SurfaceOrganicMatter.CN
        // soil water
        (sum([Soil].Water.MM)-sum([Soil].Physical.LL15mm))/(sum([Soil].Physical.DULmm)-sum([Soil].Physical.LL15mm)) as ProfileWaterStatus
        // soil nitrogen
        [Soil].Nutrient.FOM.C/0.4 as Soil.FOM.Wt
        [Soil].Nutrient.FOM.C/[Soil].Nutrient.FOM.N as Soil.FOM.CN
        ([Soil].Nutrient.Microbial.C + [Soil].Nutrient.Humic.C)*100.0/([Soil].Physical.BD * [Soil].Physical.Thickness * 10000.0) as Soil.OC
        //[Soil].Nutrient.Microbial.C/[Soil].Nutrient.Humic.C as FBiom
        [Soil].Nutrient.Microbial.C/([Soil].Nutrient.Humic.C - [Soil].Nutrient.Inert.C) as FBiom
        [Soil].Nutrient.Inert.C/([Soil].Nutrient.Microbial.C + [Soil].Nutrient.Humic.C) as FInert
    Manager ExtraVars
      ResetSummaryDate = 01-Jul
      SkipYearsBeforeSumming = No
      YearsToSkip = 0
```csharp
using System;
using System.Linq;
using System.Collections.Generic;
using Newtonsoft.Json;
using APSIM.Shared.Utilities;
using Models.Interfaces;
using Models.Core;
using Models.PMF;
using Models.Soils;
using Models.Soils.Nutrients;
using Models.Soils.Nutrients;
using Models.PMF.Interfaces;

namespace Models
{
    [Serializable]
    public class Script : Model
    {
        [Link] private Clock clock;
        [Link] private Zone myZone;
        [Link] private IWeather weather;
        [Link] private Fertiliser fertiliser;
        [Link] private Irrigation irrigator;
        [Link] private IPhysical soilPhysical;
        [Link] private ISoilWater waterBalance;
        [Link(IsOptional=true)] private Nutrient soilNitrogen;
        [Link(IsOptional=true)] private Nutrient soilNutrient;
        [Link(ByName = true)] private ISolute Urea;
        [Link(ByName = true)] private ISolute NO3;
        [Link(ByName = true)] private ISolute NH4;
        [Link] private Models.Surface.SurfaceOrganicMatter surfaceOM;
        [Link] private ISummary summary;
        private string endDate;
        private double iniSWC;
        private double iniSurfOMN;
        private double iniSoilOrgN;
        private double iniSoilMinN;
        private double iniPlantN;
        private int yearsSkipped;
        [Link]
        private Nutrient Nutrient;
        [Link(Path="[SurfaceOrganicMatter].SurfaceResidue.Decomposition")]
        private CarbonFlow ResidueDecomposition;
        //> Links to other Apsim models
        //Auxiliary 'links'
        private List<Plant> PMFSpecies = new List<Plant>();
        private List<AgPasture.PastureSpecies> AgPSpecies = new List<AgPasture.PastureSpecies>();

        //> User inputs from properties tab
        [Separator("Generic script for summing up a set of variables on an annual basis")]
        [Description(" Date to start or reset the cumulatives (dd-mmm):")]
        public string ResetSummaryDate { get; set; }
        [Description(" Skip a few summary cycles (otherwise sum from start of simulation)?")]
        public yesNoAnswer SkipYearsBeforeSumming { get; set; }
        [Description("   Number of summing cycles (~years) to skip:")]
        public int YearsToSkip { get; set; }

        //> Outputs from this manager
        [JsonIgnore] public bool IsInitialDay { get; set; }
        [JsonIgnore] public int YearsSummed { get; set; }
        [JsonIgnore] public double InitialSWC { get; set; }
        [JsonIgnore] public double InitialSurfOMN { get; set; }
        [JsonIgnore] public double InitialSoilOrgN { get; set; }
        [JsonIgnore] public double InitialSoilMinN { get; set; }
        [JsonIgnore] public double InitialPlantN { get; set; }

        // state vars, snapshots
        [JsonIgnore] public double TotalSWC { get; set; }
        [JsonIgnore] public double TotalDUL { get; set; }
        [JsonIgnore] public double TotalWaterDeficit { get; set; }

        [JsonIgnore] public double TotalFomN { get; set; }
        [JsonIgnore] public double TotalBiomN { get; set; }
        [JsonIgnore] public double TotalHumN { get; set; }
        [JsonIgnore] public double TotalOrganicN { get; set; }
        [JsonIgnore] public double TotalNO3N { get; set; }
        [JsonIgnore] public double TotalNH4N { get; set; }
        [JsonIgnore] public double TotalUreaN { get; set; }
        [JsonIgnore] public double TotalMineralN { get; set; }

        // cumulative amounts for each year
        [JsonIgnore] public double AccumIrrigation { get; set; }
        [JsonIgnore] public double AccumRainfall { get; set; }
        [JsonIgnore] public double AccumEO { get; set; }
        [JsonIgnore] public double AccumEvaporation { get; set; }
        [JsonIgnore] public double AccumTranspiration { get; set; }
        [JsonIgnore] public double AccumDrainage { get; set; }
        [JsonIgnore] public double AccumRunoff { get; set; }
        [JsonIgnore] public double AccumLateralOutFlow { get; set; }

        [JsonIgnore] public double AccumFertilisedN { get; set; }
        [JsonIgnore] public double AccumMineralisedN { get; set; }
        [JsonIgnore] public double AccumFixedN { get; set; }
        [JsonIgnore] public double AccumLeachedN { get; set; }
        [JsonIgnore] public double AccumDenitrifiedN { get; set; }
        [JsonIgnore] public double AccumTakenUpN { get; set; }
        [JsonIgnore] public double AccumDetachedN { get; set; }
        [JsonIgnore] public double AccumUrineN { get; set; }
        [JsonIgnore] public double AccumDungN { get; set; }
        [JsonIgnore] public double AccumDungWt { get; set; }

        [JsonIgnore] public double AccumDefoliatedWt { get; set; }
        [JsonIgnore] public double AccumDefoliatedN { get; set; }
        [JsonIgnore] public double AccumOffTakeWt { get; set; }
        [JsonIgnore] public double AccumOffTakeN { get; set; }
        [JsonIgnore] public int AccumNumDefoliations { get; set; }

        [JsonIgnore] public double DeltaSWC { get; set; }
        [JsonIgnore] public double DeltaSurfOMN { get; set; }
        [JsonIgnore] public double DeltaSoilOrgN { get; set; }
        [JsonIgnore] public double DeltaSoilMinN { get; set; }
        [JsonIgnore] public double DeltaPlantN { get; set; }
        
        // additional variable for plant diagnosis
        [JsonIgnore] public double Leaf_DMSupply { get; set; }
        [JsonIgnore] public double Stem_DMSupply { get; set; }
        [JsonIgnore] public double Inflorescence_DMSupply { get; set; }
        [JsonIgnore] public double Root_DMSupply { get; set; }
        [JsonIgnore] public double Taproot_DMSupply { get; set; }
        [JsonIgnore] public double Leaf_DMDemand { get; set; }
        [JsonIgnore] public double Stem_DMDemand { get; set; }
        [JsonIgnore] public double Inflorescence_DMDemand { get; set; }
        [JsonIgnore] public double Root_DMDemand { get; set; }
        [JsonIgnore] public double Taproot_DMDemand { get; set; }
        [JsonIgnore] public double Leaf_NSupply { get; set; }
        [JsonIgnore] public double Stem_NSupply { get; set; }
        [JsonIgnore] public double Inflorescence_NSupply { get; set; }
        [JsonIgnore] public double Taproot_NSupply { get; set; }
        [JsonIgnore] public double Root_NSupply { get; set; }
        [JsonIgnore] public double Leaf_NDemand { get; set; }
        [JsonIgnore] public double Stem_NDemand { get; set; }
        [JsonIgnore] public double Inflorescence_NDemand { get; set; }
        [JsonIgnore] public double Taproot_NDemand { get; set; }
        [JsonIgnore] public double Root_NDemand { get; set; }
        
        [JsonIgnore] public double Leaf_NSupplyReAllocation { get; set; }
        [JsonIgnore] public double Stem_NSupplyReAllocation { get; set; }
        [JsonIgnore] public double Root_NSupplyReAllocation { get; set; }


        //> Internal variables


        [EventSubscribe("StartOfSimulation")]
        private void OnStartOfSimulation(object sender, EventArgs e)
        {
            // set some variables
            endDate = clock.EndDate.ToString("dd-MMM");
            YearsSummed = 0;
            if (SkipYearsBeforeSumming == yesNoAnswer.Yes)
            { // start summing after a number of years (reset cycles)
                yearsSkipped = -1;
                if(DateUtilities.DatesEqual(ResetSummaryDate, clock.Today))
                { // count today as first cycle
                    yearsSkipped += 1;
                }
                IsInitialDay = false;
            }
            else
            { // start summing since start of simulation
                YearsToSkip = 0;
                yearsSkipped = 0;
                IsInitialDay = true;
            }

            // set up the links to all plant species
            foreach (Plant species in myZone.FindAllChildren<Plant>().OfType<IModel>().ToList())
            {
                PMFSpecies.Add(species);
            }

            foreach (AgPasture.PastureSpecies species in myZone.FindAllChildren<AgPasture.PastureSpecies>().OfType<IModel>().ToList())
            {
                AgPSpecies.Add(species);
            }

            // write message in summary
            summary.WriteMessage(this," Extra variables and reporting initialised", MessageType.Diagnostic);
            if(SkipYearsBeforeSumming == yesNoAnswer.Yes)
            {
                summary.WriteMessage(this,"   Summary will start " + YearsToSkip + " years after the simulation starts", MessageType.Diagnostic);
            }
            else
            {
                summary.WriteMessage(this,"   Summary will be computed from the start of simulation", MessageType.Diagnostic);
            }

            summary.WriteMessage(this,"   Cumulative variables will be reset every year on " + ResetSummaryDate, MessageType.Diagnostic);
        }

        [EventSubscribe("StartOfDay")]
        private void OnStartOfDay(object sender, EventArgs e)
        {
            if (IsInitialDay == true)
            { // get values at the beginning of the overall recording period
                InitialSWC = MathUtilities.Sum(waterBalance.SWmm);
                InitialSurfOMN = surfaceOM.N;
                InitialSoilMinN = MathUtilities.Sum(Urea.kgha) + MathUtilities.Sum(NH4.kgha) + MathUtilities.Sum(NO3.kgha);
                InitialPlantN = getPlantsVariable("Total.N");
                if (soilNitrogen != null)
                {
                    InitialSoilOrgN = MathUtilities.Sum(soilNitrogen.FOM.N) + MathUtilities.Sum(soilNitrogen.Microbial.N) + MathUtilities.Sum(soilNitrogen.Humic.N);
                }
                else
                {
                    InitialSoilOrgN = MathUtilities.Sum(soilNutrient.FOM.N) + MathUtilities.Sum(soilNutrient.Microbial.N) + MathUtilities.Sum(soilNutrient.Humic.N);
                }

                YearsSummed = 0;
                IsInitialDay = false;
            }

            if(DateUtilities.DatesEqual(ResetSummaryDate, clock.Today))
            {
                // zero all the cumulative variables
                resetVariables();

                // get the values at the beginning of the recording year, to compute deltas
                getInitialValues();
            }
        }

        [EventSubscribe("EndOfDay")]
        private void OnEndOfDay(object sender, EventArgs e)
        {
            if (yearsSkipped >= YearsToSkip)
            { // get state totals and accumulate flow variables
                getSoilTotals();
                getCumulatives();
                getCropVariables();
            }

            if (DateUtilities.DatesEqual(ResetSummaryDate, clock.Today.AddDays(1)))
            { // day before reset, check report
                if (yearsSkipped < YearsToSkip)
                {
                    yearsSkipped += 1;
                    if (yearsSkipped == YearsToSkip)
                    { // start accumulating, from tomorrow onwards
                        IsInitialDay = true;
                    }
                }
                else
                { // end of recording period
                    getAnnualDeltas();
                    YearsSummed += 1;
                }
            }
        }

        private void resetVariables()
        {
            // zero all cumulative variables
            AccumRainfall = 0.0;
            AccumIrrigation = 0.0;
            AccumEO = 0.0;
            AccumEvaporation = 0.0;
            AccumTranspiration = 0.0;
            AccumDrainage = 0.0;
            AccumRunoff = 0.0;
            AccumLateralOutFlow = 0.0;

            AccumFertilisedN = 0.0;
            AccumMineralisedN = 0.0;
            AccumFixedN = 0.0;
            AccumLeachedN = 0.0;
            AccumDenitrifiedN = 0.0;
            AccumTakenUpN = 0.0;
            AccumDetachedN = 0.0;
            AccumUrineN = 0.0;
            AccumDungN = 0.0;
            AccumDungWt = 0.0;

            AccumDefoliatedWt = 0.0;
            AccumDefoliatedN = 0.0;
            AccumOffTakeWt = 0.0;
            AccumOffTakeN = 0.0;
            AccumNumDefoliations = 0;

            DeltaSWC = 0.0;
            DeltaSurfOMN = 0.0;
            DeltaSoilOrgN = 0.0;
            DeltaSoilMinN = 0.0;
            DeltaPlantN = 0.0;
        }

        private void getInitialValues()
        {
            // get initial values for this recording cycle
            iniSWC = MathUtilities.Sum(waterBalance.SWmm);
            iniSurfOMN = surfaceOM.N;
            iniSoilMinN = MathUtilities.Sum(Urea.kgha) + MathUtilities.Sum(NH4.kgha) + MathUtilities.Sum(NO3.kgha);
            iniPlantN = getPlantsVariable("Total.N");
            if (soilNitrogen != null)
            {
                iniSoilOrgN = MathUtilities.Sum(soilNitrogen.FOM.N) + MathUtilities.Sum(soilNitrogen.Microbial.N) + MathUtilities.Sum(soilNitrogen.Humic.N);
            }
            else
            {
                iniSoilOrgN = MathUtilities.Sum(soilNutrient.FOM.N) + MathUtilities.Sum(soilNutrient.Microbial.N) + MathUtilities.Sum(soilNutrient.Humic.N);
            }
        }

        private void getSoilTotals()
        {
            TotalSWC = MathUtilities.Sum(waterBalance.SWmm);
            TotalDUL = MathUtilities.Sum(soilPhysical.DULmm);
            TotalWaterDeficit = (TotalSWC - TotalDUL);

            if (soilNitrogen != null)
            {
                TotalFomN = MathUtilities.Sum(soilNitrogen.FOM.N);
                TotalBiomN = MathUtilities.Sum(soilNitrogen.Microbial.N);
                TotalHumN = MathUtilities.Sum(soilNitrogen.Humic.N);
            }
            else
            {
                TotalFomN = MathUtilities.Sum(soilNutrient.FOM.N);
                TotalBiomN = MathUtilities.Sum(soilNutrient.Microbial.N);
                TotalHumN = MathUtilities.Sum(soilNutrient.Humic.N);
            }

            TotalOrganicN = TotalFomN + TotalBiomN + TotalHumN;
            TotalNO3N = MathUtilities.Sum(NO3.kgha);
            TotalNH4N = MathUtilities.Sum(NH4.kgha);
            TotalUreaN = MathUtilities.Sum(Urea.kgha);
            TotalMineralN = TotalUreaN + TotalNH4N + TotalNO3N;
        }

        private void getCumulatives()
        {
            // accumulate the values of several outputs
            AccumRainfall += weather.Rain;
            AccumIrrigation += irrigator.IrrigationApplied;
            AccumEO += waterBalance.Eo;
            AccumEvaporation += waterBalance.Es;
            AccumTranspiration += getPlantsVariable("WaterUptake");
            AccumDrainage += waterBalance.Drainage;
            AccumRunoff += waterBalance.Runoff;
            double auxLatFlow = MathUtilities.Sum(waterBalance.LateralOutflow);
            AccumLateralOutFlow += auxLatFlow;

            AccumFertilisedN += fertiliser.NitrogenApplied;
            AccumFixedN += getPlantsVariable("NFixed");
            if (soilNitrogen != null)
            {
                AccumMineralisedN += MathUtilities.Sum(Nutrient.MineralisedN) + MathUtilities.Sum(ResidueDecomposition.MineralisedN);
                AccumDenitrifiedN += MathUtilities.Sum(Nutrient.Natm);
            }
            else
            {
                AccumMineralisedN += MathUtilities.Sum(soilNutrient.MineralisedN) + MathUtilities.Sum(ResidueDecomposition.MineralisedN);
                AccumDenitrifiedN += MathUtilities.Sum(soilNutrient.DenitrifiedN);
            }

            AccumLeachedN += (waterBalance.LeachNO3 + waterBalance.LeachNH4 + waterBalance.LeachUrea);
            AccumTakenUpN += getPlantsVariable("NitrogenUptake");
            AccumDetachedN += getPlantsVariable("Detached.N");
            AccumUrineN += (double)myZone.Get("[DefoliationManager].Script.NReturnedInUrine");
            AccumDungN += (double)myZone.Get("[DefoliationManager].Script.NReturnedInDung");
            AccumDungWt += (double)myZone.Get("[DefoliationManager].Script.ReturnedWt");

            double AuxDefoliation = (double)myZone.Get("[DefoliationManager].Script.DefoliatedWt");
            if (AuxDefoliation > 0.0)
            {
                AccumNumDefoliations += 1;
                AccumDefoliatedWt += AuxDefoliation;
                AccumDefoliatedN += (double)myZone.Get("[DefoliationManager].Script.DefoliatedN");
                AccumOffTakeWt += (double)myZone.Get("[DefoliationManager].Script.RemovedWt");
                AccumOffTakeN += (double)myZone.Get("[DefoliationManager].Script.RemovedN");
            }
        }

        private void getAnnualDeltas()
        {
            // get deltas (difference between initial, or at reset, and current values)
            DeltaSWC = MathUtilities.Sum(waterBalance.SWmm) - iniSWC;
            DeltaSurfOMN = surfaceOM.N - iniSurfOMN;
            DeltaSoilMinN = MathUtilities.Sum(Urea.kgha) + MathUtilities.Sum(NH4.kgha) + MathUtilities.Sum(NO3.kgha) - iniSoilMinN;
            DeltaPlantN = getPlantsVariable("Total.N") - iniPlantN;
            if (soilNitrogen != null)
            {
                DeltaSoilOrgN = MathUtilities.Sum(soilNitrogen.FOM.N) + MathUtilities.Sum(soilNitrogen.Microbial.N) + MathUtilities.Sum(soilNitrogen.Humic.N) - iniSoilOrgN;
            }
            else
            {
                DeltaSoilOrgN = MathUtilities.Sum(soilNutrient.FOM.N) + MathUtilities.Sum(soilNutrient.Microbial.N) + MathUtilities.Sum(soilNutrient.Humic.N) - iniSoilOrgN;
            }
        }

        private void getCropVariables()
        {
            BiomassSupplyType Leaf_DMSupplies = (BiomassSupplyType)myZone.Get("PlantainForage.Leaf.DMSupply");
            BiomassSupplyType Stem_DMSupplies = (BiomassSupplyType)myZone.Get("PlantainForage.Stem.DMSupply");
            BiomassSupplyType Inflorescence_DMSupplies = (BiomassSupplyType)myZone.Get("PlantainForage.Inflorescence.DMSupply");
            BiomassSupplyType Root_DMSupplies = (BiomassSupplyType)myZone.Get("PlantainForage.Root.DMSupply");
            BiomassSupplyType Taproot_DMSupplies = (BiomassSupplyType)myZone.Get("PlantainForage.Taproot.DMSupply");
            BiomassPoolType Leaf_DMDemands = (BiomassPoolType)myZone.Get("PlantainForage.Leaf.DMDemand");
            BiomassPoolType Stem_DMDemands = (BiomassPoolType)myZone.Get("PlantainForage.Stem.DMDemand");
            BiomassPoolType Inflorescence_DMDemands = (BiomassPoolType)myZone.Get("PlantainForage.Inflorescence.DMDemand");
            BiomassPoolType Root_DMDemands = (BiomassPoolType)myZone.Get("PlantainForage.Root.DMDemand");
            BiomassPoolType Taproot_DMDemands = (BiomassPoolType)myZone.Get("PlantainForage.Taproot.DMDemand");

            BiomassSupplyType Leaf_NSupplies = (BiomassSupplyType)myZone.Get("PlantainForage.Leaf.NSupply");
            BiomassSupplyType Stem_NSupplies = (BiomassSupplyType)myZone.Get("PlantainForage.Stem.NSupply");
            BiomassSupplyType Inflorescence_NSupplies = (BiomassSupplyType)myZone.Get("PlantainForage.Inflorescence.NSupply");
            BiomassSupplyType Taproot_NSupplies = (BiomassSupplyType)myZone.Get("PlantainForage.Taproot.NSupply");
            BiomassSupplyType Root_NSupplies = (BiomassSupplyType)myZone.Get("PlantainForage.Root.NSupply");
            
            BiomassPoolType Leaf_NDemands = (BiomassPoolType)myZone.Get("PlantainForage.Leaf.NDemand");
            BiomassPoolType Stem_NDemands = (BiomassPoolType)myZone.Get("PlantainForage.Stem.NDemand");
            BiomassPoolType Inflorescence_NDemands = (BiomassPoolType)myZone.Get("PlantainForage.Inflorescence.NDemand");
            BiomassPoolType Taproot_NDemands = (BiomassPoolType)myZone.Get("PlantainForage.Taproot.NDemand");
            BiomassPoolType Root_NDemands = (BiomassPoolType)myZone.Get("PlantainForage.Root.NDemand");
            
            Leaf_DMSupply = Leaf_DMSupplies.Fixation + Leaf_DMSupplies.Uptake + Leaf_DMSupplies.ReAllocation + Leaf_DMSupplies.ReTranslocation;
            Stem_DMSupply = Stem_DMSupplies.Fixation + Stem_DMSupplies.Uptake + Stem_DMSupplies.ReAllocation + Stem_DMSupplies.ReTranslocation;
            Inflorescence_DMSupply = Inflorescence_DMSupplies.Fixation + Inflorescence_DMSupplies.Uptake + Inflorescence_DMSupplies.ReAllocation + Inflorescence_DMSupplies.ReTranslocation;
            Root_DMSupply = Root_DMSupplies.Fixation + Root_DMSupplies.Uptake + Root_DMSupplies.ReAllocation + Root_DMSupplies.ReTranslocation;
            Taproot_DMSupply = Taproot_DMSupplies.Fixation + Taproot_DMSupplies.Uptake + Taproot_DMSupplies.ReAllocation + Taproot_DMSupplies.ReTranslocation;
            Leaf_DMDemand = Leaf_DMDemands.Structural + Leaf_DMDemands.Storage + Leaf_DMDemands.Metabolic;
            Stem_DMDemand = Stem_DMDemands.Structural + Stem_DMDemands.Storage + Stem_DMDemands.Metabolic;
            Inflorescence_DMDemand = Inflorescence_DMDemands.Structural + Inflorescence_DMDemands.Storage + Inflorescence_DMDemands.Metabolic;
            Root_DMDemand = Root_DMDemands.Structural + Root_DMDemands.Storage + Root_DMDemands.Metabolic;
            Taproot_DMDemand = Taproot_DMDemands.Structural + Taproot_DMDemands.Storage + Taproot_DMDemands.Metabolic;
            
            Leaf_NSupply = Leaf_NSupplies.Fixation + Leaf_NSupplies.Uptake + Leaf_NSupplies.ReAllocation + Leaf_NSupplies.ReTranslocation;
            Stem_NSupply = Stem_NSupplies.Fixation + Stem_NSupplies.Uptake + Stem_NSupplies.ReAllocation + Stem_NSupplies.ReTranslocation;
            Inflorescence_NSupply = Inflorescence_NSupplies.Fixation + Inflorescence_NSupplies.Uptake + Inflorescence_NSupplies.ReAllocation + Inflorescence_NSupplies.ReTranslocation;
            Taproot_NSupply = Taproot_NSupplies.Fixation + Taproot_NSupplies.Uptake + Taproot_NSupplies.ReAllocation + Taproot_NSupplies.ReTranslocation;
            Root_NSupply = Root_NSupplies.Fixation + Root_NSupplies.Uptake + Root_NSupplies.ReAllocation + Root_NSupplies.ReTranslocation;

            Leaf_NDemand = Leaf_NDemands.Structural + Leaf_NDemands.Storage + Leaf_NDemands.Metabolic;
            Stem_NDemand = Stem_NDemands.Structural + Stem_NDemands.Storage + Stem_NDemands.Metabolic;
            Inflorescence_NDemand = Inflorescence_NDemands.Structural + Inflorescence_NDemands.Storage + Inflorescence_NDemands.Metabolic;
            Taproot_NDemand = Taproot_NDemands.Structural + Taproot_NDemands.Storage + Taproot_NDemands.Metabolic;
            Root_NDemand = Root_NDemands.Structural + Root_NDemands.Storage + Root_NDemands.Metabolic;

            Leaf_NSupplyReAllocation = Leaf_NSupplies.ReAllocation;
            Stem_NSupplyReAllocation = Stem_NSupplies.ReAllocation;
            Root_NSupplyReAllocation = Root_NSupplies.ReAllocation;
        }

        /// <summary>Gets a given variable from all existing plants in the simulation.</summary>
        private double getPlantsVariable(string variableToGet)
        {
            // this is ready for Total.Wt, Total.N, Detached.Wt, Detached.N, NFixed
            // as well as WaterUptake and NitrogenUptake
            double result = 0.0;
            foreach (Plant species in PMFSpecies)
            {
                if (variableToGet.Contains("Total"))
                {
                    result += (double)myZone.Get(species.Name + "." + variableToGet);
                }
                else if (variableToGet.Contains("Detached"))
                {
                    // need to grab the values for each organ
                    foreach (IOrgan organ in species.FindAllChildren<IOrgan>().OfType<IModel>().ToList())
                    {
                        result += (double)myZone.Get(species.Name + "." + organ.Name + "." + variableToGet);
                    }
                }
                else if (variableToGet.Contains("Fixed"))
                {
                    if (species.FindAllChildren<IOrgan>("Nodule").OfType<IModel>().Count() > 0)
                    {
                        result += (double)myZone.Get(species.Name + ".Nodule.NFixed");
                    }
                }
                else if (variableToGet.Contains("Uptake"))
                {
                    double[] auxArray = (double[])myZone.Get(species.Name + "." + variableToGet);
                    result += MathUtilities.Sum(auxArray);
                }
            }

            foreach (AgPasture.PastureSpecies species in AgPSpecies)
            {
                if (variableToGet.Contains("Total"))
                {
                    // need to fix the variable name
                    variableToGet = variableToGet.Replace("", ".");
                    result += (double)myZone.Get(species.Name + "." + variableToGet);
                }
                else if (variableToGet.Contains("Detached"))
                {
                    // need to change the variable name
                    string varName = variableToGet.Replace("Detached.", "LitterDeposition");
                    result += (double)myZone.Get(species.Name + "." + varName);
                    varName = variableToGet.Replace("Detached.", "RootDetached");
                    result += (double)myZone.Get(species.Name + "." + varName);
                }
                else if (variableToGet.Contains("Fixed"))
                {
                    result += (double)myZone.Get(species.Name + ".FixedN");
                }
                else if (variableToGet.Contains("Uptake"))
                {
                    double[] auxArray = (double[])myZone.Get(species.Name + "." + variableToGet);
                    result += MathUtilities.Sum(auxArray);
                }
            }

            return result;
        }

        /// <summary>Flag for a positive or negative answer</summary>
        public enum yesNoAnswer
        {
            /// <summary>Positive answer</summary>
            Yes,
            /// <summary>Negative answer</summary>
            No
        }
    }
}
```
  DataStore
    ExcelInput Observed: FileNames=[Observed.xlsx]; SheetNames=[Observed]
    ExcelInput ObservedMeans: FileNames=[Observed.xlsx]; SheetNames=[ObservedMeans]
    PredictedObserved: PredictedTableName=ValidationReport; ObservedTableName=Observed; FieldNameUsedForMatch=SimulationName; FieldName2UsedForMatch=Date; AllColumns=false
      Tests: POName=PredictedObserved
        AcceptedStats:
          Name                   n     Slope     Intercept  SEslope    SEintercept  R2        RMSE       NSE       ME           MAE         RSR
          AboveGround.Wt         786   0.604355  59.0198    0.029904   4.59346      0.342523  55.3951    0.139802  3.02849      40.5865     0.926879
          AboveGroundLive.NConc  900   0.695644  0.0061044  0.0500223  0.0015186    0.1772    0.0108779  -1.51821  -0.00289677  0.00890185  1.58601
          CumulativeHarvestedN   534   0.823923  -0.955852  0.0168004  0.268618     0.818869  5.03209    0.683732  -3.28896     3.87998     0.56185
          CumulativeHarvestedWt  1427  0.896354  -27.1776   0.0101214  7.92284      0.846244  182.501    0.780597  -97.5459     141.053     0.46824
          HarvestedN             534   0.590406  0.780553   0.0279894  0.107043     0.45545   1.6271     0.338678  -0.55442     1.19087     0.812455
          HarvestedWt            1417  0.467442  63.1599    0.0121538  1.9805       0.511094  67.8173    0.502186  -6.91782     49.6572     0.70531
          NRate                  1446  1         0          0          0            1         0          1         0            0           0
          Population             4     0         300        0          0            -         91.0014    -0.85338  61.75        65.25       1.179
        AcceptedStatsName=Name n Slope Intercept SEslope SEintercept R2 RMSE NSE ME MAE RSR
    PredictedObserved PredictedObservedMeans: PredictedTableName=ValidationReport; ObservedTableName=ObservedMeans; FieldNameUsedForMatch=SimulationName; FieldName2UsedForMatch=Date; AllColumns=false
  Folder Validation
    Memo Note
      The performance of the plantain forage model is evaluated in simulations based on experiments conducted primarily in New Zealand.  Datasets from USA have been added, but they should be taken with caution as there was limited information about the experiments and published results corresponded to annual or seasonal aggregates only.  Note that population is not explicitly simulated by the model, only a decrease in plant numbers as function of cuts or grazings is considered.  The literature suggest that severe defoliation may reduce population by increasing death rate, but mostly is infered from other species and even then the variation is high.  Plantain persistency has been shown to be low, usually restricted to 2-4 years, but very little actuall data is available.

      The model describes N content in the above ground tissues reasonably well only for treatments where N deficit was not high (See results for the FRNL datasets with annual fertiliser rates of 200 kgN/ha and above).  The measured data showed little effect on plant N concentration for the treatment  with nil or low N rates, wehreas the model predicts differences between them.  The variability among replicates is high and there wer only three or four replicates, this may blur some of the differences.   Also, there was no information from which potential sources of nitrogen, such as soil mineralisation or N fixation from 'weeds' (the present of white clover was noted), could be identified and used to adjust the simulations.  Besides these isses, some of the underlying PMF code may need to be upgraded in order to describe some processes under plant cut/grazing and re-growth conditions.  Processes for computing N demand and supply (especially regarding remobilisation within living tissues) are still under developement and this needs especific detailed datasets.  The SimpleLeaf module was employed to simulate the plant canopy in the plantain forage model, this was done because there was not enough data to parameterise the more complex PMF approach.  This means that the model has only one leaf cohort with simple N thresholds (only maximum and minimum), this may be too simplistic to capture the nuances of the re-growth processes especially when sustained by the remobilisation from storage organs (taproot and old tissue).  The model will be upgraded in the near future as the work on the code to improve the description of those specific processes is ongoing.
    Folder New Zealand
      Experiment FRNLLincoln
        Memo
          ###FRNL Lincoln###

          Simulation setup based on field trial performed at Lincoln University Research Dairy Farm, New Zealand, between 2014 and 2016.  The experiment was part of the FRNL (Forages for Reduced Nitrogen Leaching) program and the data is basically unpublished (references will be added when this come about).  Here only plots with pure plantain are used.
          The experiment consisted of six fertiliser treatments (N rates of 0, 50, 100, 200, 350 and 500 kg/ha/yr) in four replicates, and measurements comprised yield and quality indicators (here N content is used).
          Data supplied by Grant Edwards, Lincoln University.

          The soil at the experimental site was a Templeton fine sandy loam (an Immature Pallic soil, USDA: Udic Haplustept), the required parameters were inferred based on data from the New Zealand National Soils Database (Landcare Research).
          Weather data was obtained from nearby Broadfields weather station (NIWA).
        Factors
          Factor NRate: Specification=[NRate]
            Operations 0
            Operations 50
              2014-10-08  [Fertiliser].Apply(Amount: 5, Type: Fertiliser.Types.UreaN, Depth: 10)
              2014-10-31  [Fertiliser].Apply(Amount: 5, Type: Fertiliser.Types.UreaN, Depth: 10)
              2014-11-26  [Fertiliser].Apply(Amount: 5, Type: Fertiliser.Types.UreaN, Depth: 10)
              2014-12-17  [Fertiliser].Apply(Amount: 5, Type: Fertiliser.Types.UreaN, Depth: 10)
              2015-01-20  [Fertiliser].Apply(Amount: 5, Type: Fertiliser.Types.UreaN, Depth: 10)
              2015-02-12  [Fertiliser].Apply(Amount: 5, Type: Fertiliser.Types.UreaN, Depth: 10)
              2015-03-10  [Fertiliser].Apply(Amount: 5, Type: Fertiliser.Types.UreaN, Depth: 10)
              2015-04-17  [Fertiliser].Apply(Amount: 5, Type: Fertiliser.Types.UreaN, Depth: 10)
              2015-05-20  [Fertiliser].Apply(Amount: 5, Type: Fertiliser.Types.UreaN, Depth: 10)
              2015-09-09  [Fertiliser].Apply(Amount: 5, Type: Fertiliser.Types.UreaN, Depth: 10)
              2015-10-06  [Fertiliser].Apply(Amount: 5, Type: Fertiliser.Types.UreaN, Depth: 10)
              2015-11-06  [Fertiliser].Apply(Amount: 5, Type: Fertiliser.Types.UreaN, Depth: 10)
              2015-12-09  [Fertiliser].Apply(Amount: 5, Type: Fertiliser.Types.UreaN, Depth: 10)
              2016-01-07  [Fertiliser].Apply(Amount: 5, Type: Fertiliser.Types.UreaN, Depth: 10)
              2016-02-10  [Fertiliser].Apply(Amount: 5, Type: Fertiliser.Types.UreaN, Depth: 10)
              2016-03-07  [Fertiliser].Apply(Amount: 5, Type: Fertiliser.Types.UreaN, Depth: 10)
              2016-04-02  [Fertiliser].Apply(Amount: 5, Type: Fertiliser.Types.UreaN, Depth: 10)
              2016-05-04  [Fertiliser].Apply(Amount: 5, Type: Fertiliser.Types.UreaN, Depth: 10)
              2016-08-31  [Fertiliser].Apply(Amount: 5, Type: Fertiliser.Types.UreaN, Depth: 10)
              2016-10-05  [Fertiliser].Apply(Amount: 5, Type: Fertiliser.Types.UreaN, Depth: 10)
            Operations 100
              2014-10-08  [Fertiliser].Apply(Amount: 10, Type: Fertiliser.Types.UreaN, Depth: 10)
              2014-10-31  [Fertiliser].Apply(Amount: 10, Type: Fertiliser.Types.UreaN, Depth: 10)
              2014-11-26  [Fertiliser].Apply(Amount: 10, Type: Fertiliser.Types.UreaN, Depth: 10)
              2014-12-17  [Fertiliser].Apply(Amount: 10, Type: Fertiliser.Types.UreaN, Depth: 10)
              2015-01-20  [Fertiliser].Apply(Amount: 10, Type: Fertiliser.Types.UreaN, Depth: 10)
              2015-02-12  [Fertiliser].Apply(Amount: 10, Type: Fertiliser.Types.UreaN, Depth: 10)
              2015-03-10  [Fertiliser].Apply(Amount: 10, Type: Fertiliser.Types.UreaN, Depth: 10)
              2015-04-17  [Fertiliser].Apply(Amount: 10, Type: Fertiliser.Types.UreaN, Depth: 10)
              2015-05-20  [Fertiliser].Apply(Amount: 10, Type: Fertiliser.Types.UreaN, Depth: 10)
              2015-09-09  [Fertiliser].Apply(Amount: 10, Type: Fertiliser.Types.UreaN, Depth: 10)
              2015-10-06  [Fertiliser].Apply(Amount: 10, Type: Fertiliser.Types.UreaN, Depth: 10)
              2015-11-06  [Fertiliser].Apply(Amount: 10, Type: Fertiliser.Types.UreaN, Depth: 10)
              2015-12-09  [Fertiliser].Apply(Amount: 10, Type: Fertiliser.Types.UreaN, Depth: 10)
              2016-01-07  [Fertiliser].Apply(Amount: 10, Type: Fertiliser.Types.UreaN, Depth: 10)
              2016-02-10  [Fertiliser].Apply(Amount: 10, Type: Fertiliser.Types.UreaN, Depth: 10)
              2016-03-07  [Fertiliser].Apply(Amount: 10, Type: Fertiliser.Types.UreaN, Depth: 10)
              2016-04-02  [Fertiliser].Apply(Amount: 10, Type: Fertiliser.Types.UreaN, Depth: 10)
              2016-05-04  [Fertiliser].Apply(Amount: 10, Type: Fertiliser.Types.UreaN, Depth: 10)
              2016-08-31  [Fertiliser].Apply(Amount: 10, Type: Fertiliser.Types.UreaN, Depth: 10)
              2016-10-05  [Fertiliser].Apply(Amount: 10, Type: Fertiliser.Types.UreaN, Depth: 10)
            Operations 200
              2014-10-08  [Fertiliser].Apply(Amount: 20, Type: Fertiliser.Types.UreaN, Depth: 10)
              2014-10-31  [Fertiliser].Apply(Amount: 20, Type: Fertiliser.Types.UreaN, Depth: 10)
              2014-11-26  [Fertiliser].Apply(Amount: 20, Type: Fertiliser.Types.UreaN, Depth: 10)
              2014-12-17  [Fertiliser].Apply(Amount: 20, Type: Fertiliser.Types.UreaN, Depth: 10)
              2015-01-20  [Fertiliser].Apply(Amount: 20, Type: Fertiliser.Types.UreaN, Depth: 10)
              2015-02-12  [Fertiliser].Apply(Amount: 20, Type: Fertiliser.Types.UreaN, Depth: 10)
              2015-03-10  [Fertiliser].Apply(Amount: 20, Type: Fertiliser.Types.UreaN, Depth: 10)
              2015-04-17  [Fertiliser].Apply(Amount: 20, Type: Fertiliser.Types.UreaN, Depth: 10)
              2015-05-20  [Fertiliser].Apply(Amount: 20, Type: Fertiliser.Types.UreaN, Depth: 10)
              2015-09-09  [Fertiliser].Apply(Amount: 20, Type: Fertiliser.Types.UreaN, Depth: 10)
              2015-10-06  [Fertiliser].Apply(Amount: 20, Type: Fertiliser.Types.UreaN, Depth: 10)
              2015-11-06  [Fertiliser].Apply(Amount: 20, Type: Fertiliser.Types.UreaN, Depth: 10)
              2015-12-09  [Fertiliser].Apply(Amount: 20, Type: Fertiliser.Types.UreaN, Depth: 10)
              2016-01-07  [Fertiliser].Apply(Amount: 20, Type: Fertiliser.Types.UreaN, Depth: 10)
              2016-02-10  [Fertiliser].Apply(Amount: 20, Type: Fertiliser.Types.UreaN, Depth: 10)
              2016-03-07  [Fertiliser].Apply(Amount: 20, Type: Fertiliser.Types.UreaN, Depth: 10)
              2016-04-02  [Fertiliser].Apply(Amount: 20, Type: Fertiliser.Types.UreaN, Depth: 10)
              2016-05-04  [Fertiliser].Apply(Amount: 20, Type: Fertiliser.Types.UreaN, Depth: 10)
              2016-08-31  [Fertiliser].Apply(Amount: 20, Type: Fertiliser.Types.UreaN, Depth: 10)
              2016-10-05  [Fertiliser].Apply(Amount: 20, Type: Fertiliser.Types.UreaN, Depth: 10)
            Operations 350
              2014-10-08  [Fertiliser].Apply(Amount: 35, Type: Fertiliser.Types.UreaN, Depth: 10)
              2014-10-31  [Fertiliser].Apply(Amount: 35, Type: Fertiliser.Types.UreaN, Depth: 10)
              2014-11-26  [Fertiliser].Apply(Amount: 35, Type: Fertiliser.Types.UreaN, Depth: 10)
              2014-12-17  [Fertiliser].Apply(Amount: 35, Type: Fertiliser.Types.UreaN, Depth: 10)
              2015-01-20  [Fertiliser].Apply(Amount: 35, Type: Fertiliser.Types.UreaN, Depth: 10)
              2015-02-12  [Fertiliser].Apply(Amount: 35, Type: Fertiliser.Types.UreaN, Depth: 10)
              2015-03-10  [Fertiliser].Apply(Amount: 35, Type: Fertiliser.Types.UreaN, Depth: 10)
              2015-04-17  [Fertiliser].Apply(Amount: 35, Type: Fertiliser.Types.UreaN, Depth: 10)
              2015-05-20  [Fertiliser].Apply(Amount: 35, Type: Fertiliser.Types.UreaN, Depth: 10)
              2015-09-09  [Fertiliser].Apply(Amount: 35, Type: Fertiliser.Types.UreaN, Depth: 10)
              2015-10-06  [Fertiliser].Apply(Amount: 35, Type: Fertiliser.Types.UreaN, Depth: 10)
              2015-11-06  [Fertiliser].Apply(Amount: 35, Type: Fertiliser.Types.UreaN, Depth: 10)
              2015-12-09  [Fertiliser].Apply(Amount: 35, Type: Fertiliser.Types.UreaN, Depth: 10)
              2016-01-07  [Fertiliser].Apply(Amount: 35, Type: Fertiliser.Types.UreaN, Depth: 10)
              2016-02-10  [Fertiliser].Apply(Amount: 35, Type: Fertiliser.Types.UreaN, Depth: 10)
              2016-03-07  [Fertiliser].Apply(Amount: 35, Type: Fertiliser.Types.UreaN, Depth: 10)
              2016-04-02  [Fertiliser].Apply(Amount: 35, Type: Fertiliser.Types.UreaN, Depth: 10)
              2016-05-04  [Fertiliser].Apply(Amount: 35, Type: Fertiliser.Types.UreaN, Depth: 10)
              2016-08-31  [Fertiliser].Apply(Amount: 35, Type: Fertiliser.Types.UreaN, Depth: 10)
              2016-10-05  [Fertiliser].Apply(Amount: 35, Type: Fertiliser.Types.UreaN, Depth: 10)
            Operations 500
              2014-10-08  [Fertiliser].Apply(Amount: 50, Type: Fertiliser.Types.UreaN, Depth: 10)
              2014-10-31  [Fertiliser].Apply(Amount: 50, Type: Fertiliser.Types.UreaN, Depth: 10)
              2014-11-26  [Fertiliser].Apply(Amount: 50, Type: Fertiliser.Types.UreaN, Depth: 10)
              2014-12-17  [Fertiliser].Apply(Amount: 50, Type: Fertiliser.Types.UreaN, Depth: 10)
              2015-01-20  [Fertiliser].Apply(Amount: 50, Type: Fertiliser.Types.UreaN, Depth: 10)
              2015-02-12  [Fertiliser].Apply(Amount: 50, Type: Fertiliser.Types.UreaN, Depth: 10)
              2015-03-10  [Fertiliser].Apply(Amount: 50, Type: Fertiliser.Types.UreaN, Depth: 10)
              2015-04-17  [Fertiliser].Apply(Amount: 50, Type: Fertiliser.Types.UreaN, Depth: 10)
              2015-05-20  [Fertiliser].Apply(Amount: 50, Type: Fertiliser.Types.UreaN, Depth: 10)
              2015-09-09  [Fertiliser].Apply(Amount: 50, Type: Fertiliser.Types.UreaN, Depth: 10)
              2015-10-06  [Fertiliser].Apply(Amount: 50, Type: Fertiliser.Types.UreaN, Depth: 10)
              2015-11-06  [Fertiliser].Apply(Amount: 50, Type: Fertiliser.Types.UreaN, Depth: 10)
              2015-12-09  [Fertiliser].Apply(Amount: 50, Type: Fertiliser.Types.UreaN, Depth: 10)
              2016-01-07  [Fertiliser].Apply(Amount: 50, Type: Fertiliser.Types.UreaN, Depth: 10)
              2016-02-10  [Fertiliser].Apply(Amount: 50, Type: Fertiliser.Types.UreaN, Depth: 10)
              2016-03-07  [Fertiliser].Apply(Amount: 50, Type: Fertiliser.Types.UreaN, Depth: 10)
              2016-04-02  [Fertiliser].Apply(Amount: 50, Type: Fertiliser.Types.UreaN, Depth: 10)
              2016-05-04  [Fertiliser].Apply(Amount: 50, Type: Fertiliser.Types.UreaN, Depth: 10)
              2016-08-31  [Fertiliser].Apply(Amount: 50, Type: Fertiliser.Types.UreaN, Depth: 10)
              2016-10-05  [Fertiliser].Apply(Amount: 50, Type: Fertiliser.Types.UreaN, Depth: 10)
        Simulation FRNLLincoln
          Clock: Start=2014-03-01; End=2016-05-31
          Weather: FileName=Lincoln-Broadfields.met
          Summary summaryfile
          SoilArbitrator Soil Arbitrator
          Zone Field: Area=1; Slope=0; AspectAngle=0; Altitude=50
            Folder Management
              Operations Sowing
                2014-03-20  [PlantainForage].Sow(population: 200, cultivar: "Tonic", depth: 10, rowSpacing: 150)
              Operations IrrigationSchedule
                2014-10-31  [Irrigation].Apply(amount: 7)
                2014-11-03  [Irrigation].Apply(amount: 7)
                2014-11-05  [Irrigation].Apply(amount: 8)
                2014-11-07  [Irrigation].Apply(amount: 8)
                2014-11-10  [Irrigation].Apply(amount: 7)
                2014-11-11  [Irrigation].Apply(amount: 7)
                2014-11-12  [Irrigation].Apply(amount: 8)
                2014-11-17  [Irrigation].Apply(amount: 9)
                2014-11-18  [Irrigation].Apply(amount: 7)
                2014-11-19  [Irrigation].Apply(amount: 7)
                2014-11-24  [Irrigation].Apply(amount: 8)
                2014-11-25  [Irrigation].Apply(amount: 9)
                2014-11-27  [Irrigation].Apply(amount: 10)
                2014-12-01  [Irrigation].Apply(amount: 8)
                2014-12-02  [Irrigation].Apply(amount: 8)
                2014-12-04  [Irrigation].Apply(amount: 7)
                2014-12-08  [Irrigation].Apply(amount: 7)
                2014-12-09  [Irrigation].Apply(amount: 7)
                2014-12-12  [Irrigation].Apply(amount: 8)
                2014-12-15  [Irrigation].Apply(amount: 10)
                2014-12-17  [Irrigation].Apply(amount: 10)
                2014-12-19  [Irrigation].Apply(amount: 7)
                2014-12-20  [Irrigation].Apply(amount: 7)
                2014-12-21  [Irrigation].Apply(amount: 8)
                2014-12-22  [Irrigation].Apply(amount: 10)
                2014-12-25  [Irrigation].Apply(amount: 8)
                2014-12-26  [Irrigation].Apply(amount: 8)
                2014-12-27  [Irrigation].Apply(amount: 7)
                2014-12-28  [Irrigation].Apply(amount: 10)
                2014-12-29  [Irrigation].Apply(amount: 8)
                2014-12-30  [Irrigation].Apply(amount: 8)
                2015-01-02  [Irrigation].Apply(amount: 7)
                2015-01-05  [Irrigation].Apply(amount: 10)
                2015-01-08  [Irrigation].Apply(amount: 8)
                2015-01-09  [Irrigation].Apply(amount: 9)
                2015-01-12  [Irrigation].Apply(amount: 7)
                2015-01-13  [Irrigation].Apply(amount: 7)
                2015-01-16  [Irrigation].Apply(amount: 8)
                2015-01-19  [Irrigation].Apply(amount: 7)
                2015-01-20  [Irrigation].Apply(amount: 7)
                2015-01-21  [Irrigation].Apply(amount: 8)
                2015-01-26  [Irrigation].Apply(amount: 10)
                2015-01-27  [Irrigation].Apply(amount: 10)
                2015-01-29  [Irrigation].Apply(amount: 8)
                2015-02-02  [Irrigation].Apply(amount: 10)
                2015-02-04  [Irrigation].Apply(amount: 8)
                2015-02-05  [Irrigation].Apply(amount: 7)
                2015-02-09  [Irrigation].Apply(amount: 8)
                2015-02-11  [Irrigation].Apply(amount: 7)
                2015-02-12  [Irrigation].Apply(amount: 10)
                2015-02-16  [Irrigation].Apply(amount: 10)
                2015-02-17  [Irrigation].Apply(amount: 10)
                2015-02-18  [Irrigation].Apply(amount: 8)
                2015-02-24  [Irrigation].Apply(amount: 10)
                2015-02-26  [Irrigation].Apply(amount: 7)
                2015-02-27  [Irrigation].Apply(amount: 8)
                2015-03-02  [Irrigation].Apply(amount: 7)
                2015-03-03  [Irrigation].Apply(amount: 7)
                2015-03-05  [Irrigation].Apply(amount: 8)
                2015-03-10  [Irrigation].Apply(amount: 8)
                2015-03-12  [Irrigation].Apply(amount: 9)
                2015-03-13  [Irrigation].Apply(amount: 7)
                2015-03-16  [Irrigation].Apply(amount: 10)
                2015-03-19  [Irrigation].Apply(amount: 9)
                2015-03-20  [Irrigation].Apply(amount: 8)
                2015-03-23  [Irrigation].Apply(amount: 9)
                2015-03-24  [Irrigation].Apply(amount: 7)
                2015-03-26  [Irrigation].Apply(amount: 10)
                2015-03-30  [Irrigation].Apply(amount: 7)
                2015-04-02  [Irrigation].Apply(amount: 10)
                2015-04-03  [Irrigation].Apply(amount: 8)
                2015-04-06  [Irrigation].Apply(amount: 7)
                2015-04-08  [Irrigation].Apply(amount: 10)
                2015-04-17  [Irrigation].Apply(amount: 10)
                2015-05-20  [Irrigation].Apply(amount: 10)
                2015-06-09  [Irrigation].Apply(amount: 10)
                2015-09-09  [Irrigation].Apply(amount: 10)
                2015-09-30  [Irrigation].Apply(amount: 10)
                2015-10-02  [Irrigation].Apply(amount: 8)
                2015-10-06  [Irrigation].Apply(amount: 10)
                2015-10-09  [Irrigation].Apply(amount: 10)
                2015-10-12  [Irrigation].Apply(amount: 8)
                2015-10-13  [Irrigation].Apply(amount: 7)
                2015-10-16  [Irrigation].Apply(amount: 10)
                2015-10-20  [Irrigation].Apply(amount: 10)
                2015-10-21  [Irrigation].Apply(amount: 8)
                2015-10-23  [Irrigation].Apply(amount: 7)
                2015-10-26  [Irrigation].Apply(amount: 7)
                2015-10-27  [Irrigation].Apply(amount: 9)
                2015-11-02  [Irrigation].Apply(amount: 10)
                2015-11-03  [Irrigation].Apply(amount: 8)
                2015-11-04  [Irrigation].Apply(amount: 9)
                2015-11-06  [Irrigation].Apply(amount: 9)
                2015-11-09  [Irrigation].Apply(amount: 10)
                2015-11-11  [Irrigation].Apply(amount: 7)
                2015-11-16  [Irrigation].Apply(amount: 10)
                2015-11-18  [Irrigation].Apply(amount: 9)
                2015-11-20  [Irrigation].Apply(amount: 7)
                2015-11-23  [Irrigation].Apply(amount: 10)
                2015-11-24  [Irrigation].Apply(amount: 8)
                2015-11-25  [Irrigation].Apply(amount: 7)
                2015-11-27  [Irrigation].Apply(amount: 9)
                2015-11-30  [Irrigation].Apply(amount: 7)
                2015-12-01  [Irrigation].Apply(amount: 7)
                2015-12-04  [Irrigation].Apply(amount: 9)
                2015-12-07  [Irrigation].Apply(amount: 10)
                2015-12-09  [Irrigation].Apply(amount: 9)
                2015-12-10  [Irrigation].Apply(amount: 9)
                2015-12-22  [Irrigation].Apply(amount: 8)
                2015-12-24  [Irrigation].Apply(amount: 9)
                2015-12-26  [Irrigation].Apply(amount: 8)
                2015-12-29  [Irrigation].Apply(amount: 7)
                2015-12-31  [Irrigation].Apply(amount: 7)
                2016-01-01  [Irrigation].Apply(amount: 10)
                2016-01-07  [Irrigation].Apply(amount: 10)
                2016-01-09  [Irrigation].Apply(amount: 7)
                2016-01-11  [Irrigation].Apply(amount: 7)
                2016-01-12  [Irrigation].Apply(amount: 7)
                2016-01-13  [Irrigation].Apply(amount: 9)
                2016-01-15  [Irrigation].Apply(amount: 10)
                2016-01-21  [Irrigation].Apply(amount: 7)
                2016-01-25  [Irrigation].Apply(amount: 8)
                2016-01-30  [Irrigation].Apply(amount: 7)
                2016-02-02  [Irrigation].Apply(amount: 10)
                2016-02-03  [Irrigation].Apply(amount: 10)
                2016-02-05  [Irrigation].Apply(amount: 9)
                2016-02-08  [Irrigation].Apply(amount: 10)
                2016-02-11  [Irrigation].Apply(amount: 10)
                2016-02-12  [Irrigation].Apply(amount: 7)
                2016-02-15  [Irrigation].Apply(amount: 8)
                2016-02-16  [Irrigation].Apply(amount: 8)
                2016-02-22  [Irrigation].Apply(amount: 7)
                2016-02-23  [Irrigation].Apply(amount: 7)
                2016-02-25  [Irrigation].Apply(amount: 7)
                2016-02-26  [Irrigation].Apply(amount: 7)
                2016-03-01  [Irrigation].Apply(amount: 7)
                2016-03-02  [Irrigation].Apply(amount: 8)
                2016-03-04  [Irrigation].Apply(amount: 10)
                2016-03-07  [Irrigation].Apply(amount: 9)
                2016-03-08  [Irrigation].Apply(amount: 4)
                2016-03-10  [Irrigation].Apply(amount: 8)
                2016-03-14  [Irrigation].Apply(amount: 8)
                2016-03-15  [Irrigation].Apply(amount: 10)
                2016-03-18  [Irrigation].Apply(amount: 9)
                2016-03-21  [Irrigation].Apply(amount: 10)
                2016-03-22  [Irrigation].Apply(amount: 9)
                2016-03-23  [Irrigation].Apply(amount: 9)
                2016-03-28  [Irrigation].Apply(amount: 8)
                2016-04-02  [Irrigation].Apply(amount: 10)
                2016-04-08  [Irrigation].Apply(amount: 10)
                2016-05-04  [Irrigation].Apply(amount: 10)
                2016-08-31  [Irrigation].Apply(amount: 10)
                2016-10-05  [Irrigation].Apply(amount: 10)
                2016-10-18  [Irrigation].Apply(amount: 10)
                2016-10-26  [Irrigation].Apply(amount: 10)
              Operations NRate
              Manager DefoliationManager
                DefoliationRotationStartDate = 01/01/1900 00:00:00
                DefoliationRotationEndDate = 12/31/2100 00:00:00
                DefoliationTriggerType = FixedInterval
                IntervalBetweenDefoliations = 21
                TargetStandingBiomass = 250
                DurationOfEachDefoliation = 1
                RemoveAmountType = None_UseDefoliationFractions
                AmountForEachDefoliation = 125
                DMRemoveType = UserDefinedFraction
                FractionDMToRemove = 0.99
                NRemoveType = UserDefinedFraction
                FractionNToRemove = 0.99
                ReturnType = AsDungUrine
                NDungType = DefineCNratio
                CNRatioDung = 17.5
                UrineDepth = 250
                AllowAutomaticManagement = No
                Crop = [PlantainForage]
                TargetCropHeight = 200
                TargetPhenologyStage = 3.5
                RemoveAllBiomass = No
                EnforceMinimumInterval = No
                MinimumInterval = 15
                EnforceMaximumInterval = Yes
                MaximumInterval = 60
                SuppressDefoliationOnWindow = No
                NoDefoliationWindowStartDate = 1-Jun
                NoDefoliationWindowEndDate = 31-Jul
                ProportionOfNToDung = 0.4
                rateOfPopulationDecline = 0
                MeanGrowthPeriodType = BetweenDefoliations
                MaxPeriodForMeanGrowth = 30
                DefoliationFractions = Leaf.FractionLiveToRemove=0.7, Leaf.FractionDeadToRemove=0.5, Stem.FractionLiveToRemove=0.8, Stem.FractionDeadToRemove=0.65, Inflorescence.FractionLiveToRemove=0.8, Inflorescence.FractionDeadToRemove=0.25, TapRoot.FractionLiveToResidue=0.1, Root.FractionLiveToResidue=0.05
```csharp
// This script will perform defoliations, i.e remove biomass, from a selected PMF crop.
// General rules for when and how much to defoliate, as well as how to handle the material harvested, are given in the UI.
// Defoliations can be triggered automatically by this manager, based on given rules, or by calling the 'Defoliate()' method
//  from another Script or a Schedule model. Note that some rules are overriden based on the parameters given in Defoliate().
// Developed by RCichota, last updated in 10/Nov/2022

using System;
using System.Linq;
using System.Collections.Generic;
using Newtonsoft.Json;
using APSIM.Shared.Utilities;
using Models.Core;
using Models.PMF;
using Models.Soils;
using Models.Soils.Nutrients;
using Models.PMF.Interfaces;
using Models.ForageDigestibility;
using System.Diagnostics;
namespace Models
{
    [Serializable]
    public class Script : Model
    {
        //> Links to other Apsim models
        [Link] private Clock clock;
        [Link] private Zone myZone;
        [Link(ByName = true)] private ISolute Urea;
        [Link] private IPhysical soilPhysical;
        [Link] private ISummary summary;
        [Link] Plant PlantainForage;
        [Link] Fertiliser fertiliser;
        [Link] Forages forages;

        //> Events raised by this manager
        public event BiomassRemovedDelegate BiomassRemoved;
        public event EventHandler DefoliationHappenedToday;
        private EventArgs args = new EventArgs();

         //> User inputs from properties tab
        [Separator("Generic defoliation management for a PMF crop, plus residue management")]
        [Description(" Allow this manager to control defoliations automatically? ")]
        public yesNoAnswer AllowAutomaticManagement { get; set; }
        [Description("Choose the crop that will be defoliated:")]
        public IPlant Crop { get; set; }
        [Description(" Date to start the defoliation management (dd/mm/yyyy): ")]
        public DateTime DefoliationRotationStartDate { get; set; }
        [Description(" Date to end the defoliation management (dd/mm/yyyy): ")]
        public DateTime DefoliationRotationEndDate { get; set; }

        [Separator("Parameters defining how the defoliation is managed")]
        
        [Description(" Defoliation fractions (e.g. Leaf.FractionLiveToResidue=0.1")]
        [Display(Type=DisplayType.MultiLineText)]
        public string[] DefoliationFractions { get; set; }
        [Description(" How the defoliations should be triggered? ")]
        public DefoliationTriggerTypes DefoliationTriggerType { get; set; }
        [Description("   Minimum number of days between defoliations, used if trigger is an interval: ")]
        public int IntervalBetweenDefoliations { get; set; }
        [Description("   Minimum standing biomass to start defoliations, used if trigger is DM target (g/m2): ")]
        public double TargetStandingBiomass { get; set; }
        [Description("   Minimum crop height to start defoliations, used if trigger is a target height (mm): ")]
        public double TargetCropHeight { get; set; }
        [Description("   Phenology stage to start defoliations, used if trigger is a target phenology stage: ")]
        public double TargetPhenologyStage { get; set; }
        [Description(" Duration of each defoliation event (days): ")]
        public int DurationOfEachDefoliation { get; set; }
        [Description(" Which amount is being defined? ")]
        public DefoliateAmountTypes RemoveAmountType { get; set; }
        [Description(" DM amount to use (g/m2): ")]
        public double AmountForEachDefoliation { get; set; }
        [Description(" Allow all biomass of PMF species to be removed? ")]
        public yesNoAnswer RemoveAllBiomass { get; set; }

        [Separator(" Additional management parameters to control defoliation frequency")]
        [Description(" Enforce a minimum interval between defoliations, if triggered by biomass? ")]
        public yesNoAnswer EnforceMinimumInterval { get; set; }
        [Description("   Minimum number of days between defoliations, when trigged by biomass: ")]
        public int MinimumInterval { get; set; }
        [Description(" Enforce a maximum interval between defoliations, if triggered by biomass? ")]
        public yesNoAnswer EnforceMaximumInterval { get; set; }
        [Description("   Maximum number of days between defoliations, when trigged by biomass: ")]
        public int MaximumInterval { get; set; }
        [Description(" Suppress defoliations over a period of time within the year? ")]
        public yesNoAnswer SuppressDefoliationOnWindow { get; set; }
        [Description("   Date to start the defoliation suppression window (dd-mmm): ")]
        public string NoDefoliationWindowStartDate { get; set; }
        [Description("   Date to end the defoliation suppression window (dd-mmm): ")]
        public string NoDefoliationWindowEndDate { get; set; }

        [Separator("Parameters defining the management of the defoliated biomass")]
        [Description(" How much of the DM defoliated is to be removed from the field? ")]
        public DMRemovalTypes DMRemoveType { get; set; }
        [Description("   Fraction of DM to remove off field, if using UserDefinedFraction (0-1): ")]
        public double FractionDMToRemove { get; set; }
        [Description(" How much of the N defoliated is to be removed from the field? ")]
        public NRemovalTypes NRemoveType { get; set; }
        [Description("   Fraction of N to remove off field, if using UserDefinedFraction (0-1): ")]
        public double FractionNToRemove { get; set; }
        [Description(" How the non-removed material is returned to the field? ")]
        public ReturnAsTypes ReturnType { get; set; }

        [Separator("Parameters for partitioning non-removed N into urine and dung")]
        [Description(" How the partition of N to dung and urine is defined? ")]
        public DungNContentTypes NDungType { get; set; }
        [Description("   Proportion of N returned in dung, if using DefineProportion (0-1): ")]
        public double ProportionOfNToDung { get; set; }
        [Description("   The C:N of dung, if using DefineCNratio (typically around 20): ")]
        public double CNRatioDung { get; set; }
        [Description(" Soil depth down to which urine should be applied (mm): ")]
        public double UrineDepth { get; set; }

        [Separator(" Additional parameters to control effects of defoliations on plant population")]
        [Description("Enter the fraction of population decline due to each defoliation (0-1):")]
        public double rateOfPopulationDecline { get; set; }
        
        [Separator("Additional parameters for computing growth rates")]
        [Description(" For which period the mean growth rate will be calculated?")]
        public MeanGrowthPeriodTypes MeanGrowthPeriodType { get; set; }
        [Description("  Number of days to compute mean growth rate, if using FixedPeriod or MaxPeriod:")]
        public int MaxPeriodForMeanGrowth { get; set; }

        //> Outputs from this manager
        [JsonIgnore][Units("g/m2")] // Pasture DM defoliated (removed from plants) today
        public double DefoliatedWt{ get; set; }
        [JsonIgnore][Units("g/m2")] // N in the pasture material defoliated today
        public double DefoliatedN{ get; set; }
        [JsonIgnore][Units("g/m2")] // Pasture DM harvested (removed from plants minus direct residue) today
        public double HarvestedWt{ get; set; }
        [JsonIgnore][Units("g/m2")] // N in the pasture material harvested today
        public double HarvestedN{ get; set; }
        [JsonIgnore][Units("g/m2")] // Pasture DM actually removed from the field
        public double RemovedWt{ get; set; }
        [JsonIgnore][Units("g/m2")] // N in the pasture material removed from the field
        public double RemovedN{ get; set; }
        [JsonIgnore][Units("g/m2")] // Pasture DM returned by this manager to the field
        public double ReturnedWt{ get; set; }
        [JsonIgnore][Units("g/m2")] // N in the pasture material returned by this manager to the field
        public double ReturnedN{ get; set; }
        [JsonIgnore][Units("g/m2")] // Non-removed N returned as dung (to SurfaceOM)
        public double NReturnedInDung{ get; set; }
        [JsonIgnore][Units("g/m2")] // Non-removed N returned as urine (soil urea)
        public double NReturnedInUrine{ get; set; }
        [JsonIgnore][Units("days")] // Number of days since the end of last defoliation event
        public int DaysSinceLastDefoliation{ get; set; }
        [JsonIgnore][Units("g/m2")] // Total standing aboveground DM before a defoliation
        public double PreHarvestDM{ get; set; }
        [JsonIgnore][Units("g/m2")] // Total standing aboveground DM after a defoliation
        public double PostHarvestDM{ get; set; }
        [JsonIgnore][Units("g/m2")] // Total pasture DM harvested over a complete defoliation event
        public double RotationHarvestedWt{ get; set; }
        [JsonIgnore][Units("g/m2")] // Pasture DM to be harvested this rotation cycle
        public double RotationHarvestingWt{ get; set; }
        [JsonIgnore][Units("g/m2")] // Mean growth rate of harvested plants over a given period before the defoliation
        public double MeanGrowthRateDM{ get; set; }

        //> Internal variables
        private Plant PMFSpecies;                       // link to the crop being defoliated
        private double[] urineFraction;                 // fraction of urine to be applied in each soil layer
        private string baseAmountType;                  // record of the amount given in the UI
        private string typeOfAmount;                    // string for the type of amount given (DMToRemove, ResidualDM, or UseDefoliationFractions)
        private double amountGiven;                     // an amount given
        private double herbageToRemove;                 // amount of DM herbage to remove
        private int durationOfThisDefoliation;          // duration in days for a given defoliation
        private int daysDefoliating;                    // number of days over which the defoliation is going
        private double cumAmountHarvested;              // cumulative amount defoliated during an ongoing defoliation
        private double currentPostHarvest;              // DM amount after each day's defoliation
        private LinkedList<double> growthQueue;         // list of daily growth rates over the period to compute mean growth rate
        // auxiliary boolean
        private bool removeAllBiomassIsPermitted;       // flag whether all biomass from PMF crops can be removed in a defoliation
        private bool aDefoliationHasHappened = false;   // flag whether a defoliation has happened in this simulation run

                //fraction of each plant part returned as residue (0-1), wastage
        private double leafResidueFrac = 0.01;
        private double stemResidueFrac = 0.01;
        private double flowerResidueFrac = 0.01;
        private double minLeafAmount = 5.0;

        private Dictionary<string, double> fractions = new Dictionary<string,double>();


        [EventSubscribe("StartOfSimulation")]
        private void OnSimulationCommencing(object sender, EventArgs e)
        {
            foreach (var fractionString in DefoliationFractions)
            {
                string[] tokens = fractionString.Split('=');
                if (tokens.Length != 2)
                    throw new Exception($"Unknown defoliation fraction string: {fractionString}");            
            
                fractions.Add(tokens[0], Convert.ToDouble(tokens[1]));
            } 
        
        
            // check and set some management options
            removeAllBiomassIsPermitted = RemoveAllBiomass == yesNoAnswer.Yes;

            // check the type of amount given
            if (RemoveAmountType == DefoliateAmountTypes.DMToRemove)
            {
                baseAmountType = "DMToRemove";
            }
            else if (RemoveAmountType == DefoliateAmountTypes.ResidualDM)
            {
                baseAmountType = "ResidualDM";
            }
            else
            {
                baseAmountType = "UseDefoliationFractions";
            }

            // check the interval between events
            if (IntervalBetweenDefoliations < 1)
            {
                throw new Exception("The interval between defoliation events must be at least one day");
            }

            // check the duration for each defoliation
            if(DurationOfEachDefoliation <= 0)
            {
                throw new Exception("The duration of defoliations cannot be zero or negative!");
            }

            // check the fraction of defoliated material to remove from the field
            if (DMRemoveType == DMRemovalTypes.RemoveAll)
            {
                FractionDMToRemove = 1.0;
            }
            else if (DMRemoveType == DMRemovalTypes.RemoveNone)
            {
                FractionDMToRemove = 0.0;
            }
            else if (DMRemoveType == DMRemovalTypes.BasedOnDigestibility)
            {
                FractionDMToRemove = -1.0;  // will be calculated dynamically
            }
            else // DMRemoveType == DMRemovalTypes.UserDefinedFraction
            {
                if (FractionDMToRemove < 0.0)
                {
                    throw new Exception("The fraction of DM defoliated to remove from the field cannot be negative!");
                }
            }

            // check the fraction of defoliated N to remove from the field
            if (NRemoveType == NRemovalTypes.RemoveAll)
            {
                FractionNToRemove = 1.0;
            }
            else if (NRemoveType == NRemovalTypes.RemoveNone)
            {
                FractionNToRemove = 0.0;
            }
            else if (NRemoveType == NRemovalTypes.ProportionalToDM)
            {
                FractionNToRemove = FractionDMToRemove;
            }
            else // NRemoveType == NRemovalTypes.UserDefinedFraction
            {
                if (FractionNToRemove < 0.0)
                {
                    throw new Exception("The fraction of defoliated N to remove from the field cannot be negative!");
                }
            }

            // set up the link to the plant species to be defoliated
            foreach (Plant species in myZone.FindAllChildren<Plant>().OfType<IModel>().ToList())
            {
                if(species.Name == Crop.Name)
                {
                    PMFSpecies = species;
                }
            }

            // make sure that management starts when RotationStartDate < simulationStartDay
            if ((clock.Today > DefoliationRotationStartDate) && (clock.Today < DefoliationRotationEndDate))
            {
                DefoliationRotationStartDate = clock.Today;
            }

            // set the fraction of urine for each layer
            if (ReturnType == ReturnAsTypes.AsDungUrine)
            {
                double depthFromSurface = 0.0;
                double propAtZ0;
                double propAtZ1;
                for (int layer = 0; layer < soilPhysical.Thickness.Length; layer++)
                {
                    depthFromSurface += soilPhysical.Thickness[layer];
                    if (depthFromSurface >= UrineDepth)
                    { // bottom layer found
                        urineFraction = new double[layer + 1];
                        double distFactor = 1.5;
                        double totalProp = UrineDepth * Math.Pow(1.0, distFactor) / (distFactor + 1.0);
                        depthFromSurface = 0.0;
                        propAtZ1 = (UrineDepth - depthFromSurface) * Math.Pow(1.0 - depthFromSurface / UrineDepth, distFactor) / (distFactor + 1.0);
                        for (int z = 0; z < layer+1; z++)
                        {
                            propAtZ0 = propAtZ1;
                            depthFromSurface += soilPhysical.Thickness[z];
                            propAtZ1 = (UrineDepth - depthFromSurface) * Math.Pow(1.0 - depthFromSurface / UrineDepth, distFactor) / (distFactor + 1);
                            if (1.0 - (depthFromSurface / UrineDepth) < 0.0)
                            {
                                propAtZ1 = 0;
                            }
                            urineFraction[z] = (propAtZ0 - propAtZ1) / totalProp;
                        }
                        layer = soilPhysical.Thickness.Length;
                    }
                }
            }

            // initialise some variables
            growthQueue = new LinkedList<double>();
            DaysSinceLastDefoliation = 0;
            durationOfThisDefoliation = -1;
            daysDefoliating = 0;
            resetMyOutputs();

            // write message in summary
            summary.WriteMessage(this," Automatic defoliation manager initialised", MessageType.Diagnostic);
            if (AllowAutomaticManagement == yesNoAnswer.Yes)
            {
                summary.WriteMessage(this, "   Defoliations will happen between " + DefoliationRotationStartDate.ToShortDateString()
                                         + " and " + DefoliationRotationEndDate.ToShortDateString() + ".", MessageType.Diagnostic);
                if (SuppressDefoliationOnWindow == yesNoAnswer.Yes)
                {
                    summary.WriteMessage(this, "    But they will be supressed between " + NoDefoliationWindowStartDate  + " and "
                                               + NoDefoliationWindowEndDate + ".", MessageType.Diagnostic);
                }

                summary.WriteMessage(this, "   Biomass from the sward will be defoliated.", MessageType.Diagnostic);
                if (DefoliationTriggerType == DefoliationTriggerTypes.TargetStandingBiomass)
                {
                    summary.WriteMessage(this, "   Events will happen whenever aboveground biomass surpasses " + TargetStandingBiomass.ToString("#0.0") + " g/m2.", MessageType.Diagnostic);
                    if(EnforceMinimumInterval == yesNoAnswer.Yes)
                    {
                        summary.WriteMessage(this, "     With a minimum of " + MinimumInterval + " days between defoliations", MessageType.Diagnostic);
                    }
                    if(EnforceMaximumInterval == yesNoAnswer.Yes)
                    {
                        summary.WriteMessage(this, "     With a maximum of " + MaximumInterval + " days between defoliations", MessageType.Diagnostic);
                    }
                }
                else if ((DefoliationTriggerType == DefoliationTriggerTypes.FixedInterval) || (DefoliationTriggerType == DefoliationTriggerTypes.TargetInterval))
                {
                    summary.WriteMessage(this, "   Events will happen every " + IntervalBetweenDefoliations + " days, if there is enough biomass.", MessageType.Diagnostic);
                }
                else if (DefoliationTriggerType == DefoliationTriggerTypes.TargetCropHeight)
                {
                    summary.WriteMessage(this, "   Events will happen whenever crop height surpasses " + TargetCropHeight.ToString("#0.0") + " mm.", MessageType.Diagnostic);
                }
                else if (DefoliationTriggerType == DefoliationTriggerTypes.TargetPhenologyStage)
                {
                    summary.WriteMessage(this, "   Events will happen whenever teh crop phenology stage reaches " + TargetPhenologyStage.ToString("#0.00"), MessageType.Diagnostic);
                }
                else
                {
                    summary.WriteMessage(this, "No valid option was given to decide when to defoliate", MessageType.Diagnostic);
                }


                if(baseAmountType == "ResidualDM")
                {
                    summary.WriteMessage(this, "   Removing biomass down to a residual amount of " + AmountForEachDefoliation.ToString("#.0") + " g/m2 over "
                                             + DurationOfEachDefoliation + " days.", MessageType.Diagnostic);
                }
                else
                {
                    summary.WriteMessage(this, "   Removing " + AmountForEachDefoliation.ToString("#.0") + " g/m2 of biomass per day over "
                                             + DurationOfEachDefoliation + " days.", MessageType.Diagnostic);
                }
            }
            else
            {
                summary.WriteMessage(this,"   Automatic defoliations are currently disabled, though defoliations can be triggered by another manager", MessageType.Diagnostic);
            }

            if(ReturnType == ReturnAsTypes.AsDungUrine)
            {
                summary.WriteMessage(this,"   Non-removed material will be returned as dung and urine. Urine added to soil according to proportions: "
                                         + string.Join(", ",urineFraction), MessageType.Diagnostic);
            }
            else
            {
                summary.WriteMessage(this,"   Non-removed material will be returned as residue.", MessageType.Diagnostic);
            }
        }

        [EventSubscribe("DoManagement")]
        private void OnDoManagement(object sender, EventArgs e)
        {
            // check whether we need to continue defoliationg, i.e. within a multi-day defoliation event (need to check this first in the day)
            if ((daysDefoliating > 0) && (daysDefoliating < durationOfThisDefoliation))
            {
                // reset outputs
                resetMyOutputs();

                // re-check the amount to defoliate
                double harvestableBiomass = harvestableSwardBiomass("All", "Harvestable");
                if (typeOfAmount == "DMToRemove")
                {
                    if(harvestableBiomass > 0.001)
                    {
                        herbageToRemove = Math.Min(harvestableBiomass, (amountGiven - cumAmountHarvested) / (durationOfThisDefoliation - daysDefoliating));
                    }
                }
                else if (typeOfAmount == "ResidualDM")
                {
                    double currentDM = standingSwardBiomassWt;
                    if (currentDM > amountGiven)
                    {
                        herbageToRemove = Math.Min(harvestableBiomass, (currentDM - amountGiven) / (durationOfThisDefoliation - daysDefoliating));
                    }
                }

                // remove plant biomass and return residue
                if (Math.Abs(herbageToRemove) >= 0.001)
                {
                    // set biomass removal
                    defoliateSward(herbageToRemove);

                    // return residue or excreta
                    if(ReturnedWt + ReturnedN > 0.0)
                    {
                        if (ReturnType == ReturnAsTypes.AsResidue)
                        {
                            returnResidues();
                        }
                        else
                        {
                            returnExcreta();
                        }
                    }

                    // gather amount removed this event
                    cumAmountHarvested += HarvestedWt;
                }

                daysDefoliating += 1;
            }

            // check whether a defoliation ended yesterday
            if (daysDefoliating < 0)
            { // clean up variables
                resetMyOutputs();
                daysDefoliating = 0;
            }

            // check whether automatic defoliations are enabled
            if (AllowAutomaticManagement == yesNoAnswer.Yes)
            {
                // check whether we are within the period in which defoliation management is allowed
                if ((clock.Today.Date >= DefoliationRotationStartDate.Date) && (clock.Today.Date <= DefoliationRotationEndDate.Date))
                {
                    if (clock.Today.Date == DefoliationRotationStartDate.Date)
                    {
                        if ((DefoliationTriggerType == DefoliationTriggerTypes.FixedInterval) || (DefoliationTriggerType == DefoliationTriggerTypes.TargetInterval))
                        {
                            DaysSinceLastDefoliation = IntervalBetweenDefoliations;
                        }
                        else
                        {
                            if(EnforceMaximumInterval == yesNoAnswer.Yes)
                            {
                                DaysSinceLastDefoliation = MaximumInterval;
                            }
                        }
                    }

                    // check whether a window for suppressing defoliations has been set
                    if (SuppressDefoliationOnWindow == yesNoAnswer.Yes && DateUtilities.WithinDates(NoDefoliationWindowStartDate, clock.Today, NoDefoliationWindowEndDate))
                    { // do nothing as we're within the suppression window
                    }
                    else
                    {
                        // check whether we should start a defoliation event
                        if (DefoliationTriggerType == DefoliationTriggerTypes.FixedInterval)
                        {
                            if (DaysSinceLastDefoliation == IntervalBetweenDefoliations)
                            {
                                Defoliate(AmountForEachDefoliation, baseAmountType, DurationOfEachDefoliation, 50.0, "yes");
                            }
                        }
                        else if (DefoliationTriggerType == DefoliationTriggerTypes.TargetInterval)
                        {
                            if (DaysSinceLastDefoliation >= IntervalBetweenDefoliations)
                            {
                                Defoliate(AmountForEachDefoliation, baseAmountType, DurationOfEachDefoliation, 50.0, "no");
                            }
                        }
                        else  if( DefoliationTriggerType == DefoliationTriggerTypes.TargetStandingBiomass)
                        {
                            if (standingSwardBiomassWt >= TargetStandingBiomass)
                            {
                                if(EnforceMinimumInterval == yesNoAnswer.Yes)
                                { // check interval between defoliations
                                    if(DaysSinceLastDefoliation >= MinimumInterval)
                                    { // sufficient days passed since last defoliation
                                        Defoliate(AmountForEachDefoliation, baseAmountType, DurationOfEachDefoliation, 50.0, "no");
                                    }
                                    //else wait for minimum interval
                                }
                                else
                                { // no checks, just defoliate
                                    Defoliate(AmountForEachDefoliation, baseAmountType, DurationOfEachDefoliation, 50.0, "no");
                                }
                            }
                            else
                            {
                                if(EnforceMaximumInterval == yesNoAnswer.Yes && (DaysSinceLastDefoliation >= MaximumInterval))
                                { // start a defoliation even if biomass is insufficient
                                    Defoliate(AmountForEachDefoliation, baseAmountType, DurationOfEachDefoliation, 50.0, "yes");
                                }
                            }
                        }
                        else if (DefoliationTriggerType == DefoliationTriggerTypes.TargetCropHeight)
                        {
                            if (standingSwardHeight >= TargetCropHeight)
                            {
                                if(EnforceMinimumInterval == yesNoAnswer.Yes)
                                { // check interval between defoliations
                                    if(DaysSinceLastDefoliation >= MinimumInterval)
                                    { // sufficient days passed since last defoliation
                                        Defoliate(AmountForEachDefoliation, baseAmountType, DurationOfEachDefoliation, 50.0, "no");
                                    }
                                    //else wait for minimum interval
                                }
                                else
                                { // no checks, just defoliate
                                    Defoliate(AmountForEachDefoliation, baseAmountType, DurationOfEachDefoliation, 50.0, "no");
                                }
                            }
                        }
                        else if (DefoliationTriggerType == DefoliationTriggerTypes.TargetPhenologyStage)
                        {
                            if (currentPhenologyStage >= TargetPhenologyStage)
                            {
                                if(EnforceMinimumInterval == yesNoAnswer.Yes)
                                { // check interval between defoliations
                                    if(DaysSinceLastDefoliation >= MinimumInterval)
                                    { // sufficient days passed since last defoliation
                                        Defoliate(AmountForEachDefoliation, baseAmountType, DurationOfEachDefoliation, 50.0, "no");
                                    }
                                    //else wait for minimum interval
                                }
                                else
                                { // no checks, just defoliate
                                    Defoliate(AmountForEachDefoliation, baseAmountType, DurationOfEachDefoliation, 50.0, "no");
                                }
                            }
                        }
                        //TargetCropHeight TargetPhenologyStage
                    }
                }
                //// Note: Only the code above, responsible for triggering automatic events, is limited by 'AllowAutomaticManagement'.
                ////       The rest of the code is still available to perform one-off defoliations.
                ////       It can be called from another manager or a schedulle thingy via Defoliate().
            }
        }

        [EventSubscribe("DoManagementCalculations")]
        private void OnDoManagementCalculations(object sender, EventArgs e)
        {
            // check whether a defoliation event has just been completed
            if (daysDefoliating == durationOfThisDefoliation)
            {
                // get amount of biomass remaining and zero counters
                PostHarvestDM = currentPostHarvest;
                RotationHarvestedWt = cumAmountHarvested;
                aDefoliationHasHappened = true;
                daysDefoliating = -1;

                // compute the mean growth rate for the queued period
                MeanGrowthRateDM = MathUtilities.Average(growthQueue.ToArray());
                growthQueue.Clear();
            }

            // count the days after a defoliation
            if (aDefoliationHasHappened && (daysDefoliating == 0))
            {
                DaysSinceLastDefoliation += 1;
            }

            // update the list holding growth rates
            updateGrowthQueue();
        }

        [EventSubscribe("EndOfDay")]
        private void OnEndOfDay(object sender, EventArgs e)
        {
            // send a 'message' to let models know that a defoliation has ended today (mostly for report)
            if ((daysDefoliating < 0) && (DefoliationHappenedToday != null))
            {
                DefoliationHappenedToday.Invoke(this, args);
            }
        }

        /// <summary>Sets up a defoliation event.</summary>
        /// <param name="defoliationType">Type of defoliation (cut, graze, or harvest)</param>
        /// <param name="amountDM">Amount of biomass to use (g/m2)</param>
        /// <param name="amountType">How the DM amount is interpreted (toRemove, residual)</param>
        /// <param name="duration">Number of days to defoliate over</param>
        /// <param name="mustDo">Flag whether a defoliation must be counted as such even if there is no biomass</param>
        public void Defoliate(double amountDM, string amountType, int duration = 1, double residualHeight = 50.0, string mustDo = "yes")
        {
            // check whether there are plants in the sward that can be defoliated
            if (PMFSpecies.IsEmerged)
            {
                // check DM amount given
                if (amountDM < 0.0)
                {
                    throw new Exception("Amount to defoliate cannot be negative!");
                }
                else
                {
                    amountGiven = amountDM;
                }

                // check the type of amount given
                if (amountType.ToLower() == "dmtoremove")
                {
                    typeOfAmount = "DMToRemove";
                }
                else if (amountType.ToLower() == "residualdm")
                {
                    typeOfAmount = "ResidualDM";
                }
                else if (amountType.ToLower() == "usedefoliationfractions")
                {
                    typeOfAmount = "UseDefoliationFractions";
                }
                else
                {
                    throw new Exception("Amount type should be \"DMToRemove\", \"ResidualDM\", or \"UseDefoliationFractions\"!");
                }

                // check duration given
                if (duration <= 0)
                {
                    throw new Exception("Duration of defoliation cannot be zero or negative!");
                }
                else
                {
                    durationOfThisDefoliation = duration;
                }

                // check residual height
                if (residualHeight < 0.0)
                {
                    throw new Exception("Value of the residual height cannot be negative!");
                }

                // check existing biomass and amount to remove
                PreHarvestDM = standingSwardBiomassWt;
                herbageToRemove = 0.0;
                double harvestableBiomass = harvestableSwardBiomass("All", "Harvestable");
                if (typeOfAmount == "UseDefoliationFractions")
                { // amount given is ignored, removal based on fractions
                    amountGiven = 0.0;
                    if (harvestableBiomass > 0.0)
                    {
                        herbageToRemove = -1.0;
                    }

                    summary.WriteMessage(this, "   Defoliation triggered, removing biomass using the removal fractions (set or default), during " + durationOfThisDefoliation + " days", MessageType.Diagnostic);
                }
                else if (typeOfAmount == "DMToRemove")
                {
                    if (amountGiven > 0.001)
                    { // a meaningful amount was given, check whether all can be removed
                        if (harvestableBiomass > 0.001)
                        {
                            herbageToRemove = Math.Min(harvestableBiomass, amountGiven / durationOfThisDefoliation);
                        }

                        summary.WriteMessage(this, "   Defoliation triggered, attempting to remove " + amountGiven.ToString("#0.0") + " g/m2 of biomass over " + durationOfThisDefoliation + " days", MessageType.Diagnostic);
                    }
                }
                else if (typeOfAmount == "ResidualDM")
                {
                    // check how much biomass will be removed
                    if (PreHarvestDM > amountGiven)
                    {
                        herbageToRemove = Math.Min(harvestableBiomass, (PreHarvestDM - amountGiven) / durationOfThisDefoliation);
                    }

                    summary.WriteMessage(this, "   Defoliation triggered, attempting to remove biomass down to " + amountGiven.ToString("#0.0") + " g/m2 over " + durationOfThisDefoliation + " days", MessageType.Diagnostic);

                }

                // can defoliation begin?
                if (Math.Abs(herbageToRemove) >= 0.001)
                {
                    // set height proportion - proportion of height that is removed
                    double todaysPorportion = MathUtilities.Divide(PMFSpecies.Leaf.Height - residualHeight, PMFSpecies.Leaf.Height,0.0);
                    myZone.Set(PMFSpecies.Name+".Leaf.HeightFunction.FractionRemovedOnCut",todaysPorportion);
                    myZone.Set(PMFSpecies.Name+".Leaf.HeightFunction.FractionRemovedOnHarvest",todaysPorportion);
                    myZone.Set(PMFSpecies.Name+".Leaf.HeightFunction.FractionRemovedOnGraze",todaysPorportion);
                    myZone.Set(PMFSpecies.Name+".Leaf.HeightFunction.FractionRemovedOnPrune",todaysPorportion);

                    // set off first defoliation
                    defoliateSward(herbageToRemove);

                    // return residue or excreta
                    if(ReturnedWt + ReturnedN > 0.0)
                    {
                        if (ReturnType == ReturnAsTypes.AsResidue)
                        {
                            returnResidues();
                        }
                        else
                        {
                            returnExcreta();
                        }
                    }

                    // gather values for this event
                    cumAmountHarvested = HarvestedWt;
                    currentPostHarvest = standingSwardBiomassWt;
                    daysDefoliating = 1;
                    DaysSinceLastDefoliation = 0;
                }
                else
                {
                    // abort command as there is not enough biomass, except...
                    if (mustDo.ToLower() == "yes")
                    { // count the event as if it did happen
                        cumAmountHarvested = 0.0;
                        currentPostHarvest = standingSwardBiomassWt;
                        daysDefoliating = 1;
                        DaysSinceLastDefoliation = 0;
                    }

                    summary.WriteMessage(this, "   Defoliation did not happend because current biomass (" + PreHarvestDM.ToString("#0.0") + " g/m2) is too low (total harvestable = " + harvestableBiomass.ToString("#0.0") + " g/m2)", MessageType.Diagnostic);
                }
            }
            else
            {
                summary.WriteMessage(this, "   Defoliation did not happend because there is no growing plants in the sward", MessageType.Diagnostic);
            }
        }

        /// <summary>Resets the values of outputs.</summary>
        private void resetMyOutputs()
        {
            DefoliatedWt = 0.0;
            DefoliatedN = 0.0;
            HarvestedWt = 0.0;
            HarvestedN = 0.0;
            RemovedWt = 0.0;
            RemovedN = 0.0;
            ReturnedWt = 0.0;
            ReturnedN = 0.0;
            NReturnedInDung = 0.0;
            NReturnedInUrine = 0.0;
            RotationHarvestedWt = 0.0;
            MeanGrowthRateDM = 0.0;
        }

        /// <summary>Updates the lists holding data to compute mean growth rate.</summary>
        private void updateGrowthQueue()
        {
            growthQueue.AddFirst(growthRateBiomassWt);
            if (MeanGrowthPeriodType != MeanGrowthPeriodTypes.BetweenDefoliations)
            {
               if (growthQueue.Count > MaxPeriodForMeanGrowth)
               { // Max period reached, need to remove last value in the queue
                   growthQueue.RemoveLast();
               }
            }
        }

        /// <summary>Amount of plant biomass aboveground (g/m2).</summary>
        private double standingSwardBiomassWt
        {
            get
            {
                return (double)myZone.Get(PMFSpecies.Name+".AboveGround.Wt");
            }
        }

        /// <summary>Amount of N in plant's biomass aboveground (g/m2).</summary>
        private double standingSwardBiomassN
        {
            get
            {
                return (double)myZone.Get(PMFSpecies.Name+".AboveGround.N");
            }
        }

        /// <summary>Amount of N in plant's biomass aboveground (g/m2).</summary>
        private double standingSwardHeight
        {
            get
            {
                return (double)myZone.Get(PMFSpecies.Name+".Leaf.Height");
            }
        }

        /// <summary>Amount of N in plant's biomass aboveground (g/m2).</summary>
        private double currentPhenologyStage
        {
            get
            {
                return (double)myZone.Get(PMFSpecies.Name+".Phenology.Stage");
            }
        }

        /// <summary>Amount of plant biomass from all organs available for defoliation (g/m2).</summary>
        /// <remarks>Assumes that organs with a BiomassRemoval.FractionToRemove > 0 are harvestable.</remarks>
        /// <param name="plantName">The name of the plant to retrieve its biomass</param>
        /// <param name="fractionType">The type of fraction to use (harvestable or total)</param>
        private double harvestableSwardBiomass(string plantName, string fractionType)
        {
            double amountWt = 0.0;
            double fraction = 0.0;
            foreach (var forage in forages.ModelsWithDigestibleBiomass)
            {
                if (plantName == "All" || forage.Name == plantName)
                {
                    foreach (var material in forage.Material) 
                    {
                        string liveDead = "Dead";
                        if (material.IsLive)
                            liveDead = "Live";
                            
                        // consider only amounts toRemove
                        fractions.TryGetValue($"{forage.Name}.Fraction{liveDead}ToRemove", out fraction);
                        if ((fractionType == "Total") && (fraction > 0.0))
                        { // to return all biomass, for any organ that has some removable fraction
                            fraction = 1.0;
                        }
                        else if (removeAllBiomassIsPermitted && (fraction > 0.0))
                        { // theoretical to return, and remove, all biomass, but will assume a minimum of 5% left behind
                            fraction = 0.95;
                        }

                        if (fractionType == "Total")
                            amountWt += material.Total.Wt * fraction;
                        else
                            amountWt += material.Consumable.Wt * fraction;
                    }
                }
            }
            
            return amountWt;
        }

        /// <summary>Growth rate of aboveground biomass for any plant being defoliated (g/m2).</summary>
        private double growthRateBiomassWt
        {
            get
            {
                double result = 0.0;
                foreach (IOrgan organ in PMFSpecies.FindAllChildren<IOrgan>().OfType<IModel>().ToList())
                {
                    if ((bool)myZone.Get(PMFSpecies.Name + "." + organ.Name + ".IsAboveGround"))
                    {
                        result += (double)myZone.Get(PMFSpecies.Name + "." + organ.Name + ".Allocated.Wt");
                        result -= (double)myZone.Get(PMFSpecies.Name + "." + organ.Name + ".Detached.Wt");
                    }
                }

                return result;
            }
        }

        /// <summary>Triggers the actual biomass removal and gather DM and N amounts.</summary>
        /// <param name="amountToRemove">The total DM amount to remove (g/m2)</param>
        /// <param name="removalType">The type of removal (Cut, Graze, Harvest)</param>
        private void defoliateSward(double amountToRemove)
        {
            // get the amounts of biomass and N before today's defoliation
            double preRemovalDM = standingSwardBiomassWt;
            double preRemovalN = standingSwardBiomassN;
            double fractionToRemove = 0.0;

            // gather the actual biomass removal fractions, checking whether they need to be adjusted
            double totalHarvestableAmount = harvestableSwardBiomass("All", "Harvestable");
            if (amountToRemove > 0.0)
            { // an amount was given for defoliation, adjust removal fractions for each species in order to remove the amount specified
                fractionToRemove = amountToRemove / totalHarvestableAmount;
            }
            else if (amountToRemove < 0.0)
            { // defoliation is not based on an amount, removal is determined simply by the removal fractions
                fractionToRemove = 1.0;
            }

            // check whether the plant is alive
            bool speciesIsAlive = (bool)myZone.Get(PMFSpecies.Name + ".IsEmerged");
            if (speciesIsAlive)
            {
                // set removal fractions (these overrides the default removals in the plant)
                RemoveBiomass(PMFSpecies.Name, fractionToRemove);
            }

            // get the amounts of biomass and N after today's defoliation
            double postRemovalDM = standingSwardBiomassWt;
            double postRemovalN = standingSwardBiomassN;

            // get total defoliation (total plant stuff lost)
            DefoliatedWt = preRemovalDM - postRemovalDM;
            DefoliatedN = preRemovalN - postRemovalN;

            // get amounts harvested, removed, and returned
            manageDefoliatedBiomass();
        }

        /// <summary>Sets the biomass removal fractions for PMF plants.</summary>
        /// <param name="plantName">The name of PMF species</param>
        /// <param name="fractionHarvestable">The fraction of harvestable biomass to be removed (0-1)</param>
        private void RemoveBiomass(string plantName, double fractionHarvestable)
        {
            double fractionToRemove;
            double fractionToResidue;

                if ((PMFSpecies.Name == plantName) && (PMFSpecies.IsAlive))
                {
                    // set removal fractions (these overrides the default removals in the plant)
                    foreach (IOrgan organ in PMFSpecies.FindAllChildren<IOrgan>().OfType<IModel>().ToList())
                    {
                        // first get the removal for Live material
                        if (!fractions.TryGetValue(organ.Name + ".FractionLiveToRemove", out fractionToRemove))
                            fractionToRemove = 0;
                        if (removeAllBiomassIsPermitted && (fractionToRemove > 0.0))
                        { // assuming that 5% is left behind
                            fractionToRemove = 0.95;
                        }

                        fractionToRemove = fractionHarvestable * fractionToRemove;
                        fractionToRemove = Math.Min(1.0, fractionToRemove);
                        if (removeAllBiomassIsPermitted)
                        {
                            fractionToResidue = 0.0;
                        }
                        else
                        {
                            if (!fractions.TryGetValue(organ.Name + ".FractionLiveToResidue", out fractionToResidue))
                                fractionToResidue = 0;

                        }

                        fractionToResidue = Math.Min(fractionHarvestable * fractionToResidue, 1.0 - fractionToRemove);

                        (organ as IHasDamageableBiomass).RemoveBiomass(liveToRemove: fractionToRemove, liveToResidue: fractionToResidue);

                        // then get the removal for Dead material
                        if (!fractions.TryGetValue(organ.Name + ".FractionDeadToRemove", out fractionToRemove))
                            fractionToRemove = 0;
                        if (removeAllBiomassIsPermitted && (fractionToRemove > 0.0))
                        { // assuming that 5% is left behind
                            fractionToRemove = 0.95;
                        }

                        fractionToRemove = fractionHarvestable * fractionToRemove;
                        fractionToRemove = Math.Min(1.0, fractionToRemove);
                        if (removeAllBiomassIsPermitted)
                        {
                            fractionToResidue = 0.0;
                        }
                        else
                        {
                            if (!fractions.TryGetValue(organ.Name + ".FractionDeadToResidue", out fractionToResidue))
                                fractionToResidue = 0;
                        }

                        fractionToResidue = Math.Min(fractionHarvestable * fractionToResidue, 1.0 - fractionToRemove);
                        
                        (organ as IHasDamageableBiomass).RemoveBiomass(deadToRemove: fractionToRemove, deadToResidue: fractionToResidue);

                    }
            }
        }

        /// <summary>Gathers the DM and N amounts harvested, to be removed, and to be returned.</summary>
        private void manageDefoliatedBiomass()
        {
            double digestibilityStructural = 0.6;
            double digestibilityNonStrucutural = 0.9;

            double speciesHarvestedWt;
            double speciesHarvestedN;
            double speciesFractionToRemove;

            if (DefoliatedWt > 0.0)
            {
                HarvestedWt = 0.0;
                HarvestedN = 0.0;
                RemovedWt = 0.0;
                RemovedN = 0.0;

                    if(PMFSpecies.AboveGround.Wt > 0.0)
                    {
                        // get the amount harvested (plant stuff removed from plants)
                        speciesHarvestedWt = 0.0;
                        speciesHarvestedN = 0.0;
                        foreach (IOrgan organ in PMFSpecies.FindAllChildren<IOrgan>().OfType<IModel>().ToList())
                        {
                            speciesHarvestedWt += (double)myZone.Get(PMFSpecies.Name + "." + organ.Name + ".Removed.Wt");
                            speciesHarvestedN += (double)myZone.Get(PMFSpecies.Name + "." + organ.Name + ".Removed.N");
                        }

                        HarvestedWt += speciesHarvestedWt;
                        HarvestedN += speciesHarvestedN;

                        // get the DM fraction to be removed
                        if(FractionDMToRemove >= 0.0)
                        {
                            speciesFractionToRemove = FractionDMToRemove;
                        }
                        else
                        { // use digestibility to define the fraction
                            double fracStructural = PMFSpecies.AboveGround.StructuralWt/PMFSpecies.AboveGround.Wt;
                            speciesFractionToRemove = (1.0 - fracStructural)*digestibilityNonStrucutural + fracStructural*digestibilityStructural;
                            speciesFractionToRemove = Math.Min(1.0, Math.Max(0.0, speciesFractionToRemove));
                        }

                        // get the amounts actually removed from field
                        RemovedWt += speciesHarvestedWt * speciesFractionToRemove;
                        RemovedN += speciesHarvestedN * FractionNToRemove;
                }

                // get the amounts to be returned to the field (as residue or dung+urine)
                ReturnedWt = HarvestedWt - RemovedWt;
                ReturnedN = HarvestedN - RemovedN;
                if (ReturnType == ReturnAsTypes.AsDungUrine)
                {
                    if (NDungType == DungNContentTypes.DefineProportion)
                    {
                        NReturnedInDung = ReturnedN * ProportionOfNToDung;
                    }
                    else
                    {
                        NReturnedInDung = Math.Min(ReturnedN, ReturnedWt * 0.4 / CNRatioDung);
                    }

                    NReturnedInDung = Math.Min(NReturnedInDung, ReturnedN);
                    NReturnedInUrine = ReturnedN - NReturnedInDung;
                }
                else
                {
                    NReturnedInDung = 0.0;
                    NReturnedInUrine = 0.0;
                }
            }
        }

        /// <summary>Returns the material not removed off field as residue.</summary>
        private void returnResidues()
        {
            if ((ReturnedWt > 0.0) || (ReturnedN > 0.0))
            {
                PMF.BiomassRemovedType BiomassResidue = new PMF.BiomassRemovedType();
                string[] type = new string[] { "Grass" };
                float[] dltdm = new float[] { (float)(10.0 * ReturnedWt) };
                float[] dltn = new float[] { (float)(10.0 * ReturnedN) };
                float[] dltp = new float[] { 0.0f };
                float[] fraction = new float[] { 1.0f };     // fraction is always 1.0 here

                BiomassResidue.crop_type = "Grass";
                BiomassResidue.dm_type = type;
                BiomassResidue.dlt_crop_dm = dltdm;
                BiomassResidue.dlt_dm_n = dltn;
                BiomassResidue.dlt_dm_p = dltp;
                BiomassResidue.fraction_to_residue = fraction;
                BiomassRemoved.Invoke(BiomassResidue);
            }
        }

        /// <summary>Returns the material not removed off field as dung and urine).</summary>
        private void returnExcreta()
        {
            if ((ReturnedWt > 0.0) || (NReturnedInDung > 0.0))
            {
                PMF.BiomassRemovedType BiomassDung = new PMF.BiomassRemovedType();
                string[] type = new string[] { "RuminantDung_PastureFed" };
                float[] dltdm = new float[] { (float)(10.0 * ReturnedWt) };
                float[] dltn = new float[] { (float)(10.0 * NReturnedInDung) };
                float[] dltp = new float[] { 0.0f };
                float[] fraction = new float[] { 1.0f };     // fraction is always 1.0 here

                BiomassDung.crop_type = "RuminantDung_PastureFed";
                BiomassDung.dm_type = type;
                BiomassDung.dlt_crop_dm = dltdm;
                BiomassDung.dlt_dm_n = dltn;
                BiomassDung.dlt_dm_p = dltp;
                BiomassDung.fraction_to_residue = fraction;
                BiomassRemoved.Invoke(BiomassDung);
            }

            if (NReturnedInUrine > 0.0)
            {
                double[] myUrineDeposition = new double[soilPhysical.Thickness.Length];
                for (int z = 0; z < urineFraction.Length; z++)
                {
                    myUrineDeposition[z] = NReturnedInUrine * 10.0 * urineFraction[z];
                }

                Urea.AddKgHaDelta(SoluteSetterType.Fertiliser, myUrineDeposition);
            }
        }


        // Auxiliary bits and pieces  - - - - - - - - - - - - - - - - - - - - - - - - - - - - - - - - -

        /// <summary>Flag for a positive or negative answer</summary>
        public enum yesNoAnswer
        {
            /// <summary>Positive answer</summary>
            Yes,
            /// <summary>Negative answer</summary>
            No
        }

        /// <summary>Type of defoliation to use</summary>
        public enum DefoliationTypes
        {
            /// <summary>Cut</summary>
            Cut,
            /// <summary>Graze</summary>
            Graze,
            /// <summary>Harvest</summary>
            Harvest
        }

        /// <summary>Flag how defoliations will be triggered</summary>
        public enum DefoliationTriggerTypes
        {
            /// <summary>Setting a fixed interval</summary>
            FixedInterval,
            /// <summary>Setting a target (minimum) inteval</summary>
            TargetInterval,
            /// <summary>Setting a target (minimum) standing biomass</summary>
            TargetStandingBiomass,
            /// <summary>Setting a target (minimum) crop height</summary>
            TargetCropHeight,
            /// <summary>Setting a target phenology stage</summary>
            TargetPhenologyStage
        }

        /// <summary>How the DM amount given is interpreted</summary>
        public enum DefoliateAmountTypes
        {
            /// <summary>Setting a DM amount to remove</summary>
            DMToRemove,
            /// <summary>Setting the residual DM amount</summary>
            ResidualDM,
            /// <summary>Remove according to crop's BiomassdefoliationFractions</summary>
            None_UseDefoliationFractions
        }

        /// <summary>Fraction of defoliated DM to remove from field</summary>
        public enum DMRemovalTypes
        {
            /// <summary>Remove all DM</summary>
            RemoveAll,
            /// <summary>Remove no DM</summary>
            RemoveNone,
            /// <summary>Remove a user-defined fraction</summary>
            UserDefinedFraction,
            /// <summary>Remove a fraction based on plant digestibility</summary>
            BasedOnDigestibility
        }

        /// <summary>Fraction of N in the defoliated material to remove from field</summary>
        public enum NRemovalTypes
        {
            /// <summary>Remove all N</summary>
            RemoveAll,
            /// <summary>Remove no N</summary>
            RemoveNone,
            /// <summary>Remove a user-defined fraction</summary>
            UserDefinedFraction,
            /// <summary>Remove a fraction equal to DM removed</summary>
            ProportionalToDM
        }

        /// <summary>Define how the non-removed material is returned to the field</summary>
        public enum ReturnAsTypes
        {
            /// <summary>Return plant material as residue</summary>
            AsResidue,
            /// <summary>Return meterial as dung and urine</summary>
            AsDungUrine
        }

        /// <summary>Define how the proportion of N in dung is defined</summary>
        public enum DungNContentTypes
        {
            /// <summary>Define the proportion of N returned as dung</summary>
            DefineProportion,
            /// <summary>Define the C:N of dung</summary>
            DefineCNratio
        }

        /// <summary>Options for the period in which mean growth is computed</summary>
        public enum MeanGrowthPeriodTypes
        {
            /// <summary>Compute over a fixed number of days</summary>
            FixedPeriod,
            /// <summary>Compute over the period between defoliations</summary>
            BetweenDefoliations,
            /// <summary>Compute over the period between defoliations but not beyond a maximum</summary>
            BetweenDefoliationsOrMaxPeriod
        }
    }
}
```
              Operations DefoliationSchedule
                2014-10-08  [DefoliationManager].Script.Defoliate(amountDM: 40, amountType: "ResidualDM", duration: 1)
                2014-10-30  [DefoliationManager].Script.Defoliate(amountDM: 40, amountType: "ResidualDM", duration: 1)
                2014-11-25  [DefoliationManager].Script.Defoliate(amountDM: 40, amountType: "ResidualDM", duration: 1)
                2014-12-17  [DefoliationManager].Script.Defoliate(amountDM: 40, amountType: "ResidualDM", duration: 1)
                2015-01-16  [DefoliationManager].Script.Defoliate(amountDM: 40, amountType: "ResidualDM", duration: 1)
                2015-02-11  [DefoliationManager].Script.Defoliate(amountDM: 40, amountType: "ResidualDM", duration: 1)
                2015-03-10  [DefoliationManager].Script.Defoliate(amountDM: 40, amountType: "ResidualDM", duration: 1)
                2015-04-16  [DefoliationManager].Script.Defoliate(amountDM: 40, amountType: "ResidualDM", duration: 1)
                2015-05-20  [DefoliationManager].Script.Defoliate(amountDM: 40, amountType: "ResidualDM", duration: 1)
                2015-09-02  [DefoliationManager].Script.Defoliate(amountDM: 40, amountType: "ResidualDM", duration: 1)
                2015-10-06  [DefoliationManager].Script.Defoliate(amountDM: 40, amountType: "ResidualDM", duration: 1)
                2015-11-06  [DefoliationManager].Script.Defoliate(amountDM: 40, amountType: "ResidualDM", duration: 1)
                2015-12-07  [DefoliationManager].Script.Defoliate(amountDM: 40, amountType: "ResidualDM", duration: 1)
                2016-01-07  [DefoliationManager].Script.Defoliate(amountDM: 40, amountType: "ResidualDM", duration: 1)
                2016-02-04  [DefoliationManager].Script.Defoliate(amountDM: 40, amountType: "ResidualDM", duration: 1)
                2016-03-04  [DefoliationManager].Script.Defoliate(amountDM: 40, amountType: "ResidualDM", duration: 1)
                2016-03-31  [DefoliationManager].Script.Defoliate(amountDM: 40, amountType: "ResidualDM", duration: 1)
                2016-05-04  [DefoliationManager].Script.Defoliate(amountDM: 40, amountType: "ResidualDM", duration: 1)
            Manager ExtraVars
```csharp
// This script is set in "Replacements"

using Models.Soils;
using System;
using Models.Core;

namespace Models
{
    [Serializable] 
    public class Script : Model
    {
    }
}
```
            MicroClimate: a_interception=0; b_interception=1; c_interception=0; d_interception=0; SoilHeatFluxFraction=0.4; MinimumHeightDiffForNewLayer=0; NightInterceptionFraction=0.5; ReferenceHeight=2
            Irrigation
            Fertiliser
            SurfaceOrganicMatter: InitialResidueName=grass; InitialResidueType=grass; InitialResidueMass=500; InitialStandingFraction=0; InitialCPR=0; InitialCNR=40
            Soil TempletonPaparua: SoilType=Udic Haplustept (US),  Immature Pallic Soil (NZ); LocalName=Templeton Fine Sandy Loam; Site=LURDF; NearestTown=Lincoln; Region=Canterbury; Country=New Zealand; Latitude=0; Longitude=0; DataSource=Adapted based on data from the NZ Natioanl Soils Database
              Comments=Different references name the soil at the site as either Templeton or Paparua (very similar soils)
              Chemical: Thickness=[150, 150, 200, 250, 250, 500]; PH=[6, 6, 6, 6, 6, 6]; PHUnits=Water
              Physical
                Thickness  ParticleSizeClay  ParticleSizeSand  ParticleSizeSilt  BD    AirDry  LL15   DUL    SAT    KS
                150        21.8              17.4              60.9              1.35  0.057   0.17   0.34   0.439  2913.761
                150        18.3              24.8              56.9              1.43  0.159   0.177  0.325  0.409  1052.63
                200        19.5              21                59.5              1.54  0.186   0.186  0.327  0.362  182.149
                250        10.3              37                52.6              1.54  0.13    0.132  0.251  0.358  1272.997
                250        9.5               43.6              46.9              1.48  0.116   0.116  0.24   0.365  1767.199
                500        16.6              24.2              59.3              1.41  0.138   0.138  0.273  0.39   586.553
                SoilCrop PlantainForageSoil: LL=[0.17, 0.18, 0.19, 0.13, 0.12, 0.14]; KL=[0.12, 0.11, 0.06, 0.03, 0.01, 0.01]; XF=[1, 1, 1, 1, 1, 1]
              WaterBalance SoilWater: SummerDate=1-Nov; SummerU=6; SummerCona=3.5; WinterDate=1-apr; WinterU=2; WinterCona=2; DiffusConst=88; DiffusSlope=35; Salb=0.13; CN2Bare=73; CNRed=20; CNCov=0.8; PSIDul=-100; Thickness=[150, 150, 200, 250, 250, 500]; SWCON=[0.5, 0.41, 0.27, 0.39, 0.49, 0.42]
              Organic: FOMCNRatio=40; CarbonUnits=Total
                Thickness  Carbon  SoilCNRatio  FBiom  FInert  FOM
                150        2.6     11.3         0.045  0.475   358.617
                150        1.01    11.3         0.025  0.695   265.67
                200        0.4     11.3         0.022  0.845   178.084
                250        0.19    11.3         0.02   0.89    108.013
                250        0.22    11.3         0.01   0.96    65.5135
                500        0.18    11.3         0.01   0.99    24.1011
              Water: Thickness=[150, 150, 200, 250, 250, 500]; InitialValues=[0.34, 0.325, 0.327, 0.251, 0.24, 0.268917]; InitialPAWmm=202.109; RelativeTo=LL15; FilledFromTop=true
              CERESSoilTemperature Temperature
              Nutrient
              Solute NO3: Thickness=[150, 150, 200, 250, 250, 500]; InitialValues=[5, 4, 1.5, 1.5, 1.5, 0.780142]; InitialValuesUnits=ppm; WaterTableConcentration=0; D0=0; DepthConstant=0; MaxDepthSoluteAccessible=0; RunoffEffectivenessAtMovingSolute=0; MaxEffectiveRunoff=0
              Solute NH4: Thickness=[150, 150, 200, 250, 250, 500]; InitialValues=[0.493827, 0.34965, 0.2, 0.2, 0.135135, 0.070922]; InitialValuesUnits=ppm; WaterTableConcentration=0; D0=0; DepthConstant=0; MaxDepthSoluteAccessible=0; RunoffEffectivenessAtMovingSolute=0; MaxEffectiveRunoff=0
              Solute Urea: Thickness=[150, 150, 200, 250, 250, 500]; InitialValues=[0, 0, 0, 0, 0, 0]; InitialValuesUnits=kg/ha; WaterTableConcentration=0; D0=0; DepthConstant=0; MaxDepthSoluteAccessible=0; RunoffEffectivenessAtMovingSolute=0; MaxEffectiveRunoff=0
            Plant PlantainForage
            Report CropReport: VariableNames=// variables defined in 'Replacements'; EventNames=[Clock].DoReport
            Report BaseReport: EventNames=[Clock].DoReport
              VariableNames:
                [Clock].Today as Date
                [Clock].Today.DayOfYear as DayOfYear
                // Water outputs
                [Weather].Rain as Rainfall
                [Irrigation].IrrigationApplied as Irrigation
                [MicroClimate].PrecipitationInterception as PrecipitationInterception
                [Soil].SoilWater.Eo as Eo
                [Soil].SoilWater.Es as Evaporation
                [PlantainForage].Leaf.Transpiration as Transpiration
                [Soil].SoilWater.Drainage as Drainage
                [Soil].SoilWater.Runoff as Runoff
                sum([Soil].SoilWater.LateralOutflow) as LateralFlow
                [Soil].SoilWater.pond as PondedWater
                sum([Soil].Water.MM) as TotalSWC
                sum([Soil].Physical.SATmm) as TotalSAT
                sum([Soil].Physical.DULmm) as TotalDUL
                sum([Soil].Physical.LL15mm) as TotalLL15
                [Soil].Water.Volumetric[1] as TopLayerSWC
                [Soil].Physical.DUL[1] as TopLayerDUL
                [Soil].Physical.LL15[1] as TopLayerLL15
                [ExtraVars].Script.TotalWaterDeficit as TotalSoilWaterDeficit
                // Nitrogen outputs
                [Fertiliser].NitrogenApplied as FertiliserN
                [DefoliationManager].Script.NReturnedInDung as DungDepositedN
                [DefoliationManager].Script.NReturnedInUrine as UrineDepositedN
                ([Fertiliser].NitrogenApplied*0.0) as FixedN
                sum([Soil].Nutrient.DenitrifiedN) as DenitrifiedN
                ([Soil].SoilWater.LeachUrea + [Soil].SoilWater.LeachNH4 + [Soil].SoilWater.LeachNO3) as LeachedN
                (-1*[PlantainForage].Root.NUptake) as UptakeN
                (sum([Soil].Nutrient.MineralisedN) + sum([SurfaceOrganicMatter].SurfaceResidue.Decomposition.MineralisedN)) as NetMineralisedN
                sum([Soil].Nutrient.MineralisedN) as MineralisedSoilN
                sum([SurfaceOrganicMatter].SurfaceResidue.Decomposition.MineralisedN) as MineralisedSurfOMN
                ([PlantainForage].Leaf.Detached.N+[PlantainForage].Stem.Detached.N+[PlantainForage].Inflorescence.Detached.N+[PlantainForage].Taproot.Detached.N+[PlantainForage].Root.Detached.N) as DetachedPlantN
                (sum([Soil].Urea.kgha) + sum([Soil].NH4.kgha) + sum([Soil].NO3.kgha)) as TotalMineralN
                sum([Soil].Urea.kgha) as TotalUrea
                sum([Soil].NH4.kgha) as TotalNH4
                sum([Soil].NO3.kgha) as TotalNO3
                [SurfaceOrganicMatter].N as TotalSurfOMN
                sum([Soil].Nutrient.FOM.N) as TotalFOMN
                sum([Soil].Nutrient.Humic.N) as TotalHumicN
                sum([Soil].Nutrient.Microbial.N) as TotalMicrobialN
                [PlantainForage].Total.N as TotalPlantN
                // Crop outputs
                [PlantainForage].Total.Wt as TotalPlantWt
                ([PlantainForage].AboveGroundLive.Wt + [PlantainForage].BelowGroundLive.Wt) as TotalPlantLiveWt
                ([PlantainForage].Total.Wt - ([PlantainForage].AboveGroundLive.Wt + [PlantainForage].BelowGroundLive.Wt)) as TotalPlantDeadWt
                [PlantainForage].AboveGround.Wt as AboveGroundPlantWt
                [PlantainForage].BelowGround.Wt as BelowGroundPlantWt
                [PlantainForage].AboveGround.NConc as AboveGroundNConc
                [PlantainForage].BelowGround.NConc as BelowGroundNConc
                [PlantainForage].Leaf.LAI as LAIGreen
                [PlantainForage].Leaf.LAIDead as LAIDead
                [MicroClimate].CanopyCover as CoverTotal
                [PlantainForage].Leaf.Height as CropHeight
                [PlantainForage].Root.Depth as RootDepth
                // Defoliation outputs
                [DefoliationManager].Script.HarvestedWt as DefoliatedWt
                [DefoliationManager].Script.HarvestedN as DefoliatedN
                [DefoliationManager].Script.RemovedWt as OffTakePlantWt
                [DefoliationManager].Script.RemovedN as OffTakePlantN
                [DefoliationManager].Script.HarvestedN/([DefoliationManager].Script.HarvestedWt + 0.000000001) as DefoliatedNconc
                [DefoliationManager].Script.PreHarvestDM as PreHarvestDM
                [DefoliationManager].Script.PostHarvestDM as PostHarvestDM
                [DefoliationManager].Script.DaysSinceLastDefoliation as DaysSinceLastDefoliation
                //[DefoliationManager].Script.MeanGrowthRateDM as MeanGrowthRate
                // Other - Extras
                [Weather].Radn as RadiationTotal
                [MicroClimate].RadiationInterception as RadiationIntercepted
                [Weather].MeanT as MeanAirTemperature
                [Soil].Temperature.Value[1] as TopSoilTemperature
                [DefoliationManager].Script.ReturnedWt as DungDepositedWt
                [SurfaceOrganicMatter].Wt as TotalSurfaceOMWt
                ([SurfaceOrganicMatter].C / ([SurfaceOrganicMatter].N + 0.000000001)) as SurfOMCNratio
                sum([Soil].Nutrient.FOM.C) / 0.4 as FOMWt
                (sum([Soil].Nutrient.FOM.C) / (sum([Soil].Nutrient.FOM.N) + 0.000000001)) as FOMCNratio
            Report CumReport: EventNames=[Clock].DoReport
              VariableNames:
                [Clock].Today as Date
                [Clock].Today.Year as Year
                [ExtraVars].Script.AccumRainfall as RainfallCum
                [ExtraVars].Script.AccumIrrigation as IrrigationCum
                [ExtraVars].Script.AccumEvaporation as EvaporationCum
                [ExtraVars].Script.AccumTranspiration as TranspirationCum
                [ExtraVars].Script.AccumDrainage as DrainageCum
                [ExtraVars].Script.AccumRunoff as RunoffCum
                [ExtraVars].Script.AccumFertilisedN as FertiliserNCum
                [ExtraVars].Script.AccumMineralisedN as MineralisedNCum
                [ExtraVars].Script.AccumFixedN as FixedNCum
                [ExtraVars].Script.AccumLeachedN as LeachedNCum
                [ExtraVars].Script.AccumDenitrifiedN as DenitrifiedNCum
                [ExtraVars].Script.AccumTakenUpN as UptakeNCum
                [ExtraVars].Script.AccumDetachedN as DetachedPlantNCum
                [ExtraVars].Script.AccumUrineN as UrineNCum
                [ExtraVars].Script.AccumDungN as DungNCum
                [ExtraVars].Script.AccumDefoliatedWt as DefoliatedWtCum
                [ExtraVars].Script.AccumDefoliatedN as DefoliatedNCum
                [ExtraVars].Script.AccumOffTakeWt as OffTakePlantWtCum
                [ExtraVars].Script.AccumOffTakeN as OffTakePlantNCum
                [ExtraVars].Script.AccumNumDefoliations as NumDefoliationsCum
                [ExtraVars].Script.AccumDungWt as DungWtCum
                [ExtraVars].Script.DeltaSoilMinN as DeltaSoilMinN
            Report DiagnosisReport: VariableNames=// variables defined in 'Replacements'; EventNames=[Clock].DoReport
            Report ValidationReport: EventNames=[Clock].DoReport
              VariableNames:
                [Clock].Today as Date
                [Clock].Today.DayOfYear as DayOfYear
                [PlantainForage].Population as Population
                [PlantainForage].AboveGround.Wt as AboveGround.Wt
                [PlantainForage].Leaf.Live.NConc as Leaf.Live.Nconc
                [PlantainForage].AboveGroundLive.NConc as AboveGroundLive.NConc
                [PlantainForage].Leaf.Height as PlantHeight
                [DefoliationManager].Script.HarvestedWt as HarvestedWt
                [DefoliationManager].Script.HarvestedN as HarvestedN
                [ExtraVars].Script.AccumOffTakeWt as CumulativeHarvestedWt
                [ExtraVars].Script.AccumOffTakeN as CumulativeHarvestedN
          Forages
      Experiment FRNLRuakura
        Memo
          ###FRNL Ruakura###

          This simulation setup was based on field trials performed at DairyNZ's Scott Farm, in Ruakura, New Zealand, between 2014 and 2016.  The experiment was part of the FRNL (Forages for Reduced Nitrogen Leaching) program and the data is basically unpublished (references will be added when this come about).  Here only plots with pure plantain are used.
          The experiment consisted of six fertiliser treatments (N rates of 0, 50, 100, 200, 350 and 500 kg/ha/yr) in three replicates, and measurements comprised yield and quality indicators (here N content is used).
          Observed data supplied by Grant Edwards, Lincoln University.

          The soil at the experimental site was a Horotiu silt loam (an Orthic Allophanic soil; USDA: Typic Udivitrand), the parameters required were inferred using data from the New Zealand National Soils Database (Landcare Research).
          Weather data was obtained from nearby Ruakura weather station (NIWA).
        Factors
          Factor NRate: Specification=[NRate]
            Operations 0
            Operations 50
              2014-12-22  [Fertiliser].Apply(Amount: 5, Type: Fertiliser.Types.UreaN, Depth: 10)
              2015-01-19  [Fertiliser].Apply(Amount: 5, Type: Fertiliser.Types.UreaN, Depth: 10)
              2015-03-23  [Fertiliser].Apply(Amount: 5, Type: Fertiliser.Types.UreaN, Depth: 10)
              2015-05-01  [Fertiliser].Apply(Amount: 5, Type: Fertiliser.Types.UreaN, Depth: 10)
              2015-06-18  [Fertiliser].Apply(Amount: 5, Type: Fertiliser.Types.UreaN, Depth: 10)
              2015-09-09  [Fertiliser].Apply(Amount: 5, Type: Fertiliser.Types.UreaN, Depth: 10)
              2015-10-29  [Fertiliser].Apply(Amount: 5, Type: Fertiliser.Types.UreaN, Depth: 10)
              2015-10-09  [Fertiliser].Apply(Amount: 5, Type: Fertiliser.Types.UreaN, Depth: 10)
              2015-11-24  [Fertiliser].Apply(Amount: 5, Type: Fertiliser.Types.UreaN, Depth: 10)
              2015-12-17  [Fertiliser].Apply(Amount: 5, Type: Fertiliser.Types.UreaN, Depth: 10)
              2016-01-26  [Fertiliser].Apply(Amount: 5, Type: Fertiliser.Types.UreaN, Depth: 10)
              2016-04-12  [Fertiliser].Apply(Amount: 5, Type: Fertiliser.Types.UreaN, Depth: 10)
              2016-06-30  [Fertiliser].Apply(Amount: 5, Type: Fertiliser.Types.UreaN, Depth: 10)
            Operations 100
              2014-12-22  [Fertiliser].Apply(Amount: 10, Type: Fertiliser.Types.UreaN, Depth: 10)
              2015-01-19  [Fertiliser].Apply(Amount: 10, Type: Fertiliser.Types.UreaN, Depth: 10)
              2015-03-23  [Fertiliser].Apply(Amount: 10, Type: Fertiliser.Types.UreaN, Depth: 10)
              2015-05-01  [Fertiliser].Apply(Amount: 10, Type: Fertiliser.Types.UreaN, Depth: 10)
              2015-06-18  [Fertiliser].Apply(Amount: 10, Type: Fertiliser.Types.UreaN, Depth: 10)
              2015-09-09  [Fertiliser].Apply(Amount: 10, Type: Fertiliser.Types.UreaN, Depth: 10)
              2015-10-09  [Fertiliser].Apply(Amount: 10, Type: Fertiliser.Types.UreaN, Depth: 10)
              2015-10-29  [Fertiliser].Apply(Amount: 10, Type: Fertiliser.Types.UreaN, Depth: 10)
              2015-11-24  [Fertiliser].Apply(Amount: 10, Type: Fertiliser.Types.UreaN, Depth: 10)
              2015-12-17  [Fertiliser].Apply(Amount: 10, Type: Fertiliser.Types.UreaN, Depth: 10)
              2016-01-26  [Fertiliser].Apply(Amount: 10, Type: Fertiliser.Types.UreaN, Depth: 10)
              2016-04-12  [Fertiliser].Apply(Amount: 10, Type: Fertiliser.Types.UreaN, Depth: 10)
              2016-06-30  [Fertiliser].Apply(Amount: 10, Type: Fertiliser.Types.UreaN, Depth: 10)
            Operations 200
              2014-12-22  [Fertiliser].Apply(Amount: 20, Type: Fertiliser.Types.UreaN, Depth: 10)
              2015-01-19  [Fertiliser].Apply(Amount: 20, Type: Fertiliser.Types.UreaN, Depth: 10)
              2015-03-23  [Fertiliser].Apply(Amount: 20, Type: Fertiliser.Types.UreaN, Depth: 10)
              2015-05-01  [Fertiliser].Apply(Amount: 20, Type: Fertiliser.Types.UreaN, Depth: 10)
              2015-06-18  [Fertiliser].Apply(Amount: 20, Type: Fertiliser.Types.UreaN, Depth: 10)
              2015-09-09  [Fertiliser].Apply(Amount: 20, Type: Fertiliser.Types.UreaN, Depth: 10)
              2015-10-09  [Fertiliser].Apply(Amount: 20, Type: Fertiliser.Types.UreaN, Depth: 10)
              2015-10-29  [Fertiliser].Apply(Amount: 20, Type: Fertiliser.Types.UreaN, Depth: 10)
              2015-11-24  [Fertiliser].Apply(Amount: 20, Type: Fertiliser.Types.UreaN, Depth: 10)
              2015-12-17  [Fertiliser].Apply(Amount: 20, Type: Fertiliser.Types.UreaN, Depth: 10)
              2016-01-26  [Fertiliser].Apply(Amount: 20, Type: Fertiliser.Types.UreaN, Depth: 10)
              2016-04-12  [Fertiliser].Apply(Amount: 20, Type: Fertiliser.Types.UreaN, Depth: 10)
              2016-06-30  [Fertiliser].Apply(Amount: 20, Type: Fertiliser.Types.UreaN, Depth: 10)
            Operations 350
              2014-12-22  [Fertiliser].Apply(Amount: 35, Type: Fertiliser.Types.UreaN, Depth: 10)
              2015-01-19  [Fertiliser].Apply(Amount: 35, Type: Fertiliser.Types.UreaN, Depth: 10)
              2015-03-23  [Fertiliser].Apply(Amount: 35, Type: Fertiliser.Types.UreaN, Depth: 10)
              2015-05-01  [Fertiliser].Apply(Amount: 35, Type: Fertiliser.Types.UreaN, Depth: 10)
              2015-06-18  [Fertiliser].Apply(Amount: 35, Type: Fertiliser.Types.UreaN, Depth: 10)
              2015-09-09  [Fertiliser].Apply(Amount: 35, Type: Fertiliser.Types.UreaN, Depth: 10)
              2015-10-09  [Fertiliser].Apply(Amount: 35, Type: Fertiliser.Types.UreaN, Depth: 10)
              2015-10-29  [Fertiliser].Apply(Amount: 35, Type: Fertiliser.Types.UreaN, Depth: 10)
              2015-11-24  [Fertiliser].Apply(Amount: 35, Type: Fertiliser.Types.UreaN, Depth: 10)
              2015-12-17  [Fertiliser].Apply(Amount: 35, Type: Fertiliser.Types.UreaN, Depth: 10)
              2016-01-26  [Fertiliser].Apply(Amount: 35, Type: Fertiliser.Types.UreaN, Depth: 10)
              2016-04-12  [Fertiliser].Apply(Amount: 35, Type: Fertiliser.Types.UreaN, Depth: 10)
              2016-06-30  [Fertiliser].Apply(Amount: 35, Type: Fertiliser.Types.UreaN, Depth: 10)
            Operations 500
              2014-12-22  [Fertiliser].Apply(Amount: 50, Type: Fertiliser.Types.UreaN, Depth: 10)
              2015-01-19  [Fertiliser].Apply(Amount: 50, Type: Fertiliser.Types.UreaN, Depth: 10)
              2015-03-23  [Fertiliser].Apply(Amount: 50, Type: Fertiliser.Types.UreaN, Depth: 10)
              2015-05-01  [Fertiliser].Apply(Amount: 50, Type: Fertiliser.Types.UreaN, Depth: 10)
              2015-06-18  [Fertiliser].Apply(Amount: 50, Type: Fertiliser.Types.UreaN, Depth: 10)
              2015-09-09  [Fertiliser].Apply(Amount: 50, Type: Fertiliser.Types.UreaN, Depth: 10)
              2015-10-09  [Fertiliser].Apply(Amount: 50, Type: Fertiliser.Types.UreaN, Depth: 10)
              2015-10-29  [Fertiliser].Apply(Amount: 50, Type: Fertiliser.Types.UreaN, Depth: 10)
              2015-11-24  [Fertiliser].Apply(Amount: 50, Type: Fertiliser.Types.UreaN, Depth: 10)
              2015-12-17  [Fertiliser].Apply(Amount: 50, Type: Fertiliser.Types.UreaN, Depth: 10)
              2016-01-26  [Fertiliser].Apply(Amount: 50, Type: Fertiliser.Types.UreaN, Depth: 10)
              2016-04-12  [Fertiliser].Apply(Amount: 50, Type: Fertiliser.Types.UreaN, Depth: 10)
              2016-06-30  [Fertiliser].Apply(Amount: 50, Type: Fertiliser.Types.UreaN, Depth: 10)
        Simulation FRNLRuakura
          Clock: Start=2014-06-01; End=2016-06-30
          Weather: FileName=Ruakura.met
          Summary summaryfile
          SoilArbitrator Soil Arbitrator
          Forages
            Parameters:
              Name                          IsLive  DigestibilityString  FractionConsumable  MinimumAmount  UseDigestibilityFromModel
              SurfaceOrganicMatter.Residue  true    0.7                  1                   100            false
              SurfaceOrganicMatter.Residue  false   0.3                  1                   0              false
              PlantainForage.Leaf           true    0.7                  1                   100            false
              PlantainForage.Leaf           false   0.3                  1                   0              false
              PlantainForage.Stem           true    0.7                  1                   100            false
              PlantainForage.Stem           false   0.3                  1                   0              false
              PlantainForage.Inflorescence  true    0.7                  1                   100            false
              PlantainForage.Inflorescence  false   0.3                  1                   0              false
              PlantainForage.Taproot        true    0.7                  1                   100            false
              PlantainForage.Taproot        false   0.3                  1                   0              false
              PlantainForage.Root           true    0                    0                   0              false
              PlantainForage.Root           false   0                    0                   0              false
          Zone Field: Area=1; Slope=0; AspectAngle=0; Altitude=50
            Folder Management
              Operations Sowing
                2014-10-10  [PlantainForage].Sow(population: 200, cultivar: "Tonic", depth: 10, rowSpacing: 150)
              Operations NRate
              Operations BaseFertiliser
                2014-10-13  [Fertiliser].Apply(Amount: 26.4, Type: Fertiliser.Types.UreaN, Depth: 10)
                2014-12-23  [Fertiliser].Apply(Amount: 3.9, Type: Fertiliser.Types.UreaN, Depth: 10)
              Manager DefoliationManager
                DefoliationRotationStartDate = 01/01/1900 00:00:00
                DefoliationRotationEndDate = 12/31/2100 00:00:00
                DefoliationTriggerType = FixedInterval
                IntervalBetweenDefoliations = 21
                TargetStandingBiomass = 250
                DurationOfEachDefoliation = 1
                RemoveAmountType = ResidualDM
                AmountForEachDefoliation = 125
                DMRemoveType = UserDefinedFraction
                FractionDMToRemove = 0.99
                NRemoveType = UserDefinedFraction
                FractionNToRemove = 0.99
                ReturnType = AsDungUrine
                NDungType = DefineCNratio
                CNRatioDung = 17.5
                UrineDepth = 250
                AllowAutomaticManagement = No
                Crop = [PlantainForage]
                TargetCropHeight = 200
                TargetPhenologyStage = 3.5
                RemoveAllBiomass = No
                EnforceMinimumInterval = No
                MinimumInterval = 15
                EnforceMaximumInterval = No
                MaximumInterval = 60
                SuppressDefoliationOnWindow = No
                NoDefoliationWindowStartDate = 1-Jun
                NoDefoliationWindowEndDate = 31-Jul
                ProportionOfNToDung = 0.4
                rateOfPopulationDecline = 0
                MeanGrowthPeriodType = BetweenDefoliations
                MaxPeriodForMeanGrowth = 30
                DefoliationFractions = Leaf.FractionLiveToRemove=0.7, Leaf.FractionDeadToRemove=0.5, Stem.FractionLiveToRemove=0.8, Stem.FractionDeadToRemove=0.65, Inflorescence.FractionLiveToRemove=0.8, Inflorescence.FractionDeadToRemove=0.25, TapRoot.FractionLiveToResidue=0.1, Root.FractionLiveToResidue=0.05
                script: same as in Validation.New Zealand.FRNLLincoln.FRNLLincoln.Field.Management.DefoliationManager
              Operations DefoliationSchedule
                2014-12-16  [DefoliationManager].Script.Defoliate(amountDM: 50, amountType: "ResidualDM", duration: 1)
                2015-01-14  [DefoliationManager].Script.Defoliate(amountDM: 60, amountType: "ResidualDM", duration: 1)
                2015-03-18  [DefoliationManager].Script.Defoliate(amountDM: 60, amountType: "ResidualDM", duration: 1)
                2015-04-28  [DefoliationManager].Script.Defoliate(amountDM: 60, amountType: "ResidualDM", duration: 1)
                2015-06-17  [DefoliationManager].Script.Defoliate(amountDM: 60, amountType: "ResidualDM", duration: 1)
                2015-09-07  [DefoliationManager].Script.Defoliate(amountDM: 60, amountType: "ResidualDM", duration: 1)
                2015-10-07  [DefoliationManager].Script.Defoliate(amountDM: 60, amountType: "ResidualDM", duration: 1)
                2015-10-28  [DefoliationManager].Script.Defoliate(amountDM: 60, amountType: "ResidualDM", duration: 1)
                2015-11-23  [DefoliationManager].Script.Defoliate(amountDM: 60, amountType: "ResidualDM", duration: 1)
                2015-12-16  [DefoliationManager].Script.Defoliate(amountDM: 60, amountType: "ResidualDM", duration: 1)
                2016-01-25  [DefoliationManager].Script.Defoliate(amountDM: 60, amountType: "ResidualDM", duration: 1)
                2016-04-11  [DefoliationManager].Script.Defoliate(amountDM: 60, amountType: "ResidualDM", duration: 1)
                2016-06-29  [DefoliationManager].Script.Defoliate(amountDM: 60, amountType: "ResidualDM", duration: 1)
                2016-09-21  [DefoliationManager].Script.Defoliate(amountDM: 60, amountType: "ResidualDM", duration: 1)
            Manager ExtraVars
              script: same as in Validation.New Zealand.FRNLLincoln.FRNLLincoln.Field.ExtraVars
            MicroClimate: a_interception=0; b_interception=1; c_interception=0; d_interception=0; SoilHeatFluxFraction=0.4; MinimumHeightDiffForNewLayer=0; NightInterceptionFraction=0.5; ReferenceHeight=2
            Irrigation
            Fertiliser
            SurfaceOrganicMatter: InitialResidueName=grass; InitialResidueType=grass; InitialResidueMass=500; InitialStandingFraction=0; InitialCPR=0; InitialCNR=40
            Soil HorotiuSoil: SoilType=Typic Udivitrand (US), Typic Orthic Allophanic Soil (NZ); LocalName=Horotiu silt loam; Site=Ruakura; NearestTown=Hamilton; Region=Waikato; Country=New Zealand; Latitude=0; Longitude=0; DataSource=Based primarily on data from Close et al, 2003
              Chemical: Thickness=[200, 200, 130, 140, 380, 230, 220]; PH=[6, 6, 6, 6, 6, 6, 6]; PHUnits=Water
              Physical
                Thickness  ParticleSizeClay  ParticleSizeSand  ParticleSizeSilt  BD    AirDry  LL15   DUL    SAT    KS
                200        20                47                33                0.88  0.114   0.228  0.373  0.581  553
                200        19                65                17                0.85  0.209   0.22   0.34   0.609  5083
                130        11                76                13                1.03  0.1     0.182  0.323  0.54   8353
                140        7                 84                10                1.11  0.1     0.15   0.282  0.5    13589
                380        5                 88                8                 1.11  0.1     0.142  0.2    0.5    38963
                230        3                 91                6                 1.03  0.1     0.103  0.16   0.446  45280
                220        1                 94                5                 1.03  0.08    0.08   0.13   0.37   53606
                SoilCrop PlantainForageSoil: LL=[0.23, 0.22, 0.18, 0.15, 0.14, 0.1, 0.08]; KL=[0.1, 0.08, 0.05, 0.02, 0.01, 0.01, 0]; XF=[1, 1, 1, 1, 1, 1, 0.5]
              WaterBalance SoilWater: SummerDate=21-Sep; SummerU=6; SummerCona=3.5; WinterDate=23-Mar; WinterU=6; WinterCona=2.5; DiffusConst=88; DiffusSlope=35; Salb=0.2; CN2Bare=0.7; CNRed=20; CNCov=0.8; PSIDul=-100; Thickness=[200, 200, 130, 140, 380, 230, 220]; SWCON=[0.55, 0.6, 0.7, 0.7, 0.75, 0.8, 0.8]
              Organic: FOMCNRatio=40; CarbonUnits=Total
                Thickness  Carbon  SoilCNRatio  FBiom  FInert  FOM
                200        8       12.5         0.06   0.6     338.974
                200        1.88    12.5         0.03   0.645   227.221
                130        0.93    12.5         0.021  0.675   175.199
                140        0.43    12.5         0.01   0.7     132.413
                380        0.13    12.5         0.01   0.78    61.9249
                230        0.1     12.5         0.01   0.87    39.0922
                220        0.07    12.5         0.01   0.95    25.1768
              Water: Thickness=[200, 200, 130, 140, 380, 230, 220]; InitialValues=[0.3585, 0.328, 0.3089, 0.2688, 0.1942, 0.1543, 0.125]; InitialPAWmm=122.364; RelativeTo=LL15; FilledFromTop=false
              CERESSoilTemperature Temperature
              Nutrient
              Solute NO3: Thickness=[200, 200, 130, 140, 380, 230, 220]; InitialValues=[15, 10, 5, 5, 4.47368, 1, 1]; InitialValuesUnits=ppm; WaterTableConcentration=0; D0=0; DepthConstant=0; MaxDepthSoluteAccessible=0; RunoffEffectivenessAtMovingSolute=0; MaxEffectiveRunoff=0
              Solute NH4: Thickness=[200, 200, 130, 140, 380, 230, 220]; InitialValues=[0.5, 0.2, 0.093, 0.093, 0.093, 0.093, 0.093]; InitialValuesUnits=ppm; WaterTableConcentration=0; D0=0; DepthConstant=0; MaxDepthSoluteAccessible=0; RunoffEffectivenessAtMovingSolute=0; MaxEffectiveRunoff=0
              Solute Urea: Thickness=[200, 200, 130, 140, 380, 230, 220]; InitialValues=[0, 0, 0, 0, 0, 0, 0]; InitialValuesUnits=kg/ha; WaterTableConcentration=0; D0=0; DepthConstant=0; MaxDepthSoluteAccessible=0; RunoffEffectivenessAtMovingSolute=0; MaxEffectiveRunoff=0
            Plant PlantainForage
            Report CropReport: VariableNames=// variables defined in 'Replacements'; EventNames=[Clock].DoReport
            Report BaseReport: same as Validation.New Zealand.FRNLLincoln.FRNLLincoln.Field.BaseReport
            Report CumReport: same as Validation.New Zealand.FRNLLincoln.FRNLLincoln.Field.CumReport
            Report DiagnosisReport: VariableNames=// variables defined in 'Replacements'; EventNames=[Clock].DoReport
            Report ValidationReport: same as Validation.New Zealand.FRNLLincoln.FRNLLincoln.Field.ValidationReport
      Experiment ScottFarmFD902
        Memo
          This simulation was setup based on a defoliation trial at Scott farm, Hamilton, New Zealand, run from 2010 to 2012 by DairyNZ.  The study investigated the effect of cut height (which also define rotation length) and residual height on chicory and plantain growth.  The treatments consisted of trigerring cuts when the sward reached target heights of 150, 250, 350, and 450 mm, in factorial combination with two residual heights, 30-50 or 60-80 mm.  Harvest was avoided over winter.  Note that the target height was not always reached.
          Trial plots were sown with plantain, cultivar '*Ceres Tonic*' (at 10 kg/ha), after previous pasture was sprayed with herbicide and conventionally drilled.  Irrigation was applied in the first year and fertiliser was applied over summer.  Results reported include biomass yield, botanical composition (presence of weeds), plant density, leaf area, and light interception (the later consisted of only two measurement during one growing period - between two cuts).

          References:
          Lee, J.M.;  Hemmingson, N.R.; Minnee, E.M.K.; Clark, C.E.F. 2015. Management strategies for chicory (Cichorium intybus) and plantain (Plantago lanceolata): impact on dry matter yield, nutritive characteristics and plant density. Crop and Pasture Science, 66, 168–183.
        Factors
          Factor Defoliation: Specification=[DefoliationSchedule]
            Operations 15To4
              2010-12-13  [DefoliationManager].Script.Defoliate(amountDM: 35, residualHeight: 40.0, amountType: "ResidualDM", duration: 1)
              2011-01-03  [DefoliationManager].Script.Defoliate(amountDM: 35, residualHeight: 40.0, amountType: "ResidualDM", duration: 1)
              2011-01-20  [DefoliationManager].Script.Defoliate(amountDM: 35, residualHeight: 40.0, amountType: "ResidualDM", duration: 1)
              2011-01-27  [DefoliationManager].Script.Defoliate(amountDM: 35, residualHeight: 40.0, amountType: "ResidualDM", duration: 1)
              2011-02-10  [DefoliationManager].Script.Defoliate(amountDM: 35, residualHeight: 40.0, amountType: "ResidualDM", duration: 1)
              2011-02-24  [DefoliationManager].Script.Defoliate(amountDM: 35, residualHeight: 40.0, amountType: "ResidualDM", duration: 1)
              2011-03-10  [DefoliationManager].Script.Defoliate(amountDM: 35, residualHeight: 40.0, amountType: "ResidualDM", duration: 1)
              2011-03-24  [DefoliationManager].Script.Defoliate(amountDM: 35, residualHeight: 40.0, amountType: "ResidualDM", duration: 1)
              2011-04-07  [DefoliationManager].Script.Defoliate(amountDM: 35, residualHeight: 40.0, amountType: "ResidualDM", duration: 1)
              2011-04-21  [DefoliationManager].Script.Defoliate(amountDM: 35, residualHeight: 40.0, amountType: "ResidualDM", duration: 1)
              2011-05-05  [DefoliationManager].Script.Defoliate(amountDM: 35, residualHeight: 40.0, amountType: "ResidualDM", duration: 1)
              2011-05-27  [DefoliationManager].Script.Defoliate(amountDM: 35, residualHeight: 40.0, amountType: "ResidualDM", duration: 1)
              2011-06-16  [DefoliationManager].Script.Defoliate(amountDM: 35, residualHeight: 40.0, amountType: "ResidualDM", duration: 1)
              2011-07-21  [DefoliationManager].Script.Defoliate(amountDM: 35, residualHeight: 40.0, amountType: "ResidualDM", duration: 1)
              2011-08-25  [DefoliationManager].Script.Defoliate(amountDM: 35, residualHeight: 40.0, amountType: "ResidualDM", duration: 1)
              2011-10-06  [DefoliationManager].Script.Defoliate(amountDM: 35, residualHeight: 40.0, amountType: "ResidualDM", duration: 1)
              2011-11-03  [DefoliationManager].Script.Defoliate(amountDM: 35, residualHeight: 40.0, amountType: "ResidualDM", duration: 1)
              2011-11-17  [DefoliationManager].Script.Defoliate(amountDM: 35, residualHeight: 40.0, amountType: "ResidualDM", duration: 1)
              2011-12-08  [DefoliationManager].Script.Defoliate(amountDM: 35, residualHeight: 40.0, amountType: "ResidualDM", duration: 1)
              2011-12-22  [DefoliationManager].Script.Defoliate(amountDM: 35, residualHeight: 40.0, amountType: "ResidualDM", duration: 1)
              2012-01-12  [DefoliationManager].Script.Defoliate(amountDM: 35, residualHeight: 40.0, amountType: "ResidualDM", duration: 1)
              2012-01-26  [DefoliationManager].Script.Defoliate(amountDM: 35, residualHeight: 40.0, amountType: "ResidualDM", duration: 1)
              2012-02-16  [DefoliationManager].Script.Defoliate(amountDM: 35, residualHeight: 40.0, amountType: "ResidualDM", duration: 1)
              2012-03-09  [DefoliationManager].Script.Defoliate(amountDM: 35, residualHeight: 40.0, amountType: "ResidualDM", duration: 1)
              2012-03-29  [DefoliationManager].Script.Defoliate(amountDM: 35, residualHeight: 40.0, amountType: "ResidualDM", duration: 1)
              2012-04-19  [DefoliationManager].Script.Defoliate(amountDM: 35, residualHeight: 40.0, amountType: "ResidualDM", duration: 1)
              2012-05-31  [DefoliationManager].Script.Defoliate(amountDM: 35, residualHeight: 40.0, amountType: "ResidualDM", duration: 1)
            Operations 15To7
              2010-12-13  [DefoliationManager].Script.Defoliate(amountDM: 50, residualHeight: 70.0, amountType: "ResidualDM", duration: 1)
              2011-01-03  [DefoliationManager].Script.Defoliate(amountDM: 50, residualHeight: 70.0, amountType: "ResidualDM", duration: 1)
              2011-01-20  [DefoliationManager].Script.Defoliate(amountDM: 50, residualHeight: 70.0, amountType: "ResidualDM", duration: 1)
              2011-01-27  [DefoliationManager].Script.Defoliate(amountDM: 50, residualHeight: 70.0, amountType: "ResidualDM", duration: 1)
              2011-02-03  [DefoliationManager].Script.Defoliate(amountDM: 50, residualHeight: 70.0, amountType: "ResidualDM", duration: 1)
              2011-02-10  [DefoliationManager].Script.Defoliate(amountDM: 50, residualHeight: 70.0, amountType: "ResidualDM", duration: 1)
              2011-02-24  [DefoliationManager].Script.Defoliate(amountDM: 50, residualHeight: 70.0, amountType: "ResidualDM", duration: 1)
              2011-03-10  [DefoliationManager].Script.Defoliate(amountDM: 50, residualHeight: 70.0, amountType: "ResidualDM", duration: 1)
              2011-03-24  [DefoliationManager].Script.Defoliate(amountDM: 50, residualHeight: 70.0, amountType: "ResidualDM", duration: 1)
              2011-04-07  [DefoliationManager].Script.Defoliate(amountDM: 50, residualHeight: 70.0, amountType: "ResidualDM", duration: 1)
              2011-04-21  [DefoliationManager].Script.Defoliate(amountDM: 50, residualHeight: 70.0, amountType: "ResidualDM", duration: 1)
              2011-05-05  [DefoliationManager].Script.Defoliate(amountDM: 50, residualHeight: 70.0, amountType: "ResidualDM", duration: 1)
              2011-05-27  [DefoliationManager].Script.Defoliate(amountDM: 50, residualHeight: 70.0, amountType: "ResidualDM", duration: 1)
              2011-06-16  [DefoliationManager].Script.Defoliate(amountDM: 50, residualHeight: 70.0, amountType: "ResidualDM", duration: 1)
              2011-07-21  [DefoliationManager].Script.Defoliate(amountDM: 50, residualHeight: 70.0, amountType: "ResidualDM", duration: 1)
              2011-08-25  [DefoliationManager].Script.Defoliate(amountDM: 50, residualHeight: 70.0, amountType: "ResidualDM", duration: 1)
              2011-10-06  [DefoliationManager].Script.Defoliate(amountDM: 50, residualHeight: 70.0, amountType: "ResidualDM", duration: 1)
              2011-11-03  [DefoliationManager].Script.Defoliate(amountDM: 50, residualHeight: 70.0, amountType: "ResidualDM", duration: 1)
              2011-11-17  [DefoliationManager].Script.Defoliate(amountDM: 50, residualHeight: 70.0, amountType: "ResidualDM", duration: 1)
              2011-12-08  [DefoliationManager].Script.Defoliate(amountDM: 50, residualHeight: 70.0, amountType: "ResidualDM", duration: 1)
              2011-12-22  [DefoliationManager].Script.Defoliate(amountDM: 50, residualHeight: 70.0, amountType: "ResidualDM", duration: 1)
              2012-01-12  [DefoliationManager].Script.Defoliate(amountDM: 50, residualHeight: 70.0, amountType: "ResidualDM", duration: 1)
              2012-01-26  [DefoliationManager].Script.Defoliate(amountDM: 50, residualHeight: 70.0, amountType: "ResidualDM", duration: 1)
              2012-02-16  [DefoliationManager].Script.Defoliate(amountDM: 50, residualHeight: 70.0, amountType: "ResidualDM", duration: 1)
              2012-03-09  [DefoliationManager].Script.Defoliate(amountDM: 50, residualHeight: 70.0, amountType: "ResidualDM", duration: 1)
              2012-03-29  [DefoliationManager].Script.Defoliate(amountDM: 50, residualHeight: 70.0, amountType: "ResidualDM", duration: 1)
              2012-04-19  [DefoliationManager].Script.Defoliate(amountDM: 50, residualHeight: 70.0, amountType: "ResidualDM", duration: 1)
              2012-05-31  [DefoliationManager].Script.Defoliate(amountDM: 50, residualHeight: 70.0, amountType: "ResidualDM", duration: 1)
            Operations 25To4
              2010-12-13  [DefoliationManager].Script.Defoliate(amountDM: 35, residualHeight: 40.0, amountType: "ResidualDM", duration: 1)
              2011-01-03  [DefoliationManager].Script.Defoliate(amountDM: 35, residualHeight: 40.0, amountType: "ResidualDM", duration: 1)
              2011-01-20  [DefoliationManager].Script.Defoliate(amountDM: 35, residualHeight: 40.0, amountType: "ResidualDM", duration: 1)
              2011-02-03  [DefoliationManager].Script.Defoliate(amountDM: 35, residualHeight: 40.0, amountType: "ResidualDM", duration: 1)
              2011-02-16  [DefoliationManager].Script.Defoliate(amountDM: 35, residualHeight: 40.0, amountType: "ResidualDM", duration: 1)
              2011-03-10  [DefoliationManager].Script.Defoliate(amountDM: 35, residualHeight: 40.0, amountType: "ResidualDM", duration: 1)
              2011-03-24  [DefoliationManager].Script.Defoliate(amountDM: 35, residualHeight: 40.0, amountType: "ResidualDM", duration: 1)
              2011-04-14  [DefoliationManager].Script.Defoliate(amountDM: 35, residualHeight: 40.0, amountType: "ResidualDM", duration: 1)
              2011-05-12  [DefoliationManager].Script.Defoliate(amountDM: 35, residualHeight: 40.0, amountType: "ResidualDM", duration: 1)
              2011-06-23  [DefoliationManager].Script.Defoliate(amountDM: 35, residualHeight: 40.0, amountType: "ResidualDM", duration: 1)
              2011-10-13  [DefoliationManager].Script.Defoliate(amountDM: 35, residualHeight: 40.0, amountType: "ResidualDM", duration: 1)
              2011-11-17  [DefoliationManager].Script.Defoliate(amountDM: 35, residualHeight: 40.0, amountType: "ResidualDM", duration: 1)
              2011-12-22  [DefoliationManager].Script.Defoliate(amountDM: 35, residualHeight: 40.0, amountType: "ResidualDM", duration: 1)
              2012-01-12  [DefoliationManager].Script.Defoliate(amountDM: 35, residualHeight: 40.0, amountType: "ResidualDM", duration: 1)
              2012-02-09  [DefoliationManager].Script.Defoliate(amountDM: 35, residualHeight: 40.0, amountType: "ResidualDM", duration: 1)
              2012-03-15  [DefoliationManager].Script.Defoliate(amountDM: 35, residualHeight: 40.0, amountType: "ResidualDM", duration: 1)
              2012-04-26  [DefoliationManager].Script.Defoliate(amountDM: 35, residualHeight: 40.0, amountType: "ResidualDM", duration: 1)
              2012-05-31  [DefoliationManager].Script.Defoliate(amountDM: 35, residualHeight: 40.0, amountType: "ResidualDM", duration: 1)
            Operations 25To7
              2010-12-13  [DefoliationManager].Script.Defoliate(amountDM: 50, residualHeight: 70.0, amountType: "ResidualDM", duration: 1)
              2011-01-03  [DefoliationManager].Script.Defoliate(amountDM: 50, residualHeight: 70.0, amountType: "ResidualDM", duration: 1)
              2011-01-20  [DefoliationManager].Script.Defoliate(amountDM: 50, residualHeight: 70.0, amountType: "ResidualDM", duration: 1)
              2011-02-03  [DefoliationManager].Script.Defoliate(amountDM: 50, residualHeight: 70.0, amountType: "ResidualDM", duration: 1)
              2011-02-16  [DefoliationManager].Script.Defoliate(amountDM: 50, residualHeight: 70.0, amountType: "ResidualDM", duration: 1)
              2011-03-10  [DefoliationManager].Script.Defoliate(amountDM: 50, residualHeight: 70.0, amountType: "ResidualDM", duration: 1)
              2011-03-24  [DefoliationManager].Script.Defoliate(amountDM: 50, residualHeight: 70.0, amountType: "ResidualDM", duration: 1)
              2011-04-14  [DefoliationManager].Script.Defoliate(amountDM: 50, residualHeight: 70.0, amountType: "ResidualDM", duration: 1)
              2011-05-12  [DefoliationManager].Script.Defoliate(amountDM: 50, residualHeight: 70.0, amountType: "ResidualDM", duration: 1)
              2011-06-23  [DefoliationManager].Script.Defoliate(amountDM: 50, residualHeight: 70.0, amountType: "ResidualDM", duration: 1)
              2011-10-13  [DefoliationManager].Script.Defoliate(amountDM: 50, residualHeight: 70.0, amountType: "ResidualDM", duration: 1)
              2011-11-17  [DefoliationManager].Script.Defoliate(amountDM: 50, residualHeight: 70.0, amountType: "ResidualDM", duration: 1)
              2011-12-22  [DefoliationManager].Script.Defoliate(amountDM: 50, residualHeight: 70.0, amountType: "ResidualDM", duration: 1)
              2012-01-12  [DefoliationManager].Script.Defoliate(amountDM: 50, residualHeight: 70.0, amountType: "ResidualDM", duration: 1)
              2012-02-09  [DefoliationManager].Script.Defoliate(amountDM: 50, residualHeight: 70.0, amountType: "ResidualDM", duration: 1)
              2012-03-15  [DefoliationManager].Script.Defoliate(amountDM: 50, residualHeight: 70.0, amountType: "ResidualDM", duration: 1)
              2012-04-26  [DefoliationManager].Script.Defoliate(amountDM: 50, residualHeight: 70.0, amountType: "ResidualDM", duration: 1)
              2012-05-31  [DefoliationManager].Script.Defoliate(amountDM: 50, residualHeight: 70.0, amountType: "ResidualDM", duration: 1)
            Operations 35To4
              2010-12-13  [DefoliationManager].Script.Defoliate(amountDM: 35, residualHeight: 40.0, amountType: "ResidualDM", duration: 1)
              2011-01-03  [DefoliationManager].Script.Defoliate(amountDM: 35, residualHeight: 40.0, amountType: "ResidualDM", duration: 1)
              2011-01-20  [DefoliationManager].Script.Defoliate(amountDM: 35, residualHeight: 40.0, amountType: "ResidualDM", duration: 1)
              2011-02-10  [DefoliationManager].Script.Defoliate(amountDM: 35, residualHeight: 40.0, amountType: "ResidualDM", duration: 1)
              2011-03-17  [DefoliationManager].Script.Defoliate(amountDM: 35, residualHeight: 40.0, amountType: "ResidualDM", duration: 1)
              2011-04-28  [DefoliationManager].Script.Defoliate(amountDM: 35, residualHeight: 40.0, amountType: "ResidualDM", duration: 1)
              2011-06-23  [DefoliationManager].Script.Defoliate(amountDM: 35, residualHeight: 40.0, amountType: "ResidualDM", duration: 1)
              2011-10-20  [DefoliationManager].Script.Defoliate(amountDM: 35, residualHeight: 40.0, amountType: "ResidualDM", duration: 1)
              2011-11-24  [DefoliationManager].Script.Defoliate(amountDM: 35, residualHeight: 40.0, amountType: "ResidualDM", duration: 1)
              2012-01-05  [DefoliationManager].Script.Defoliate(amountDM: 35, residualHeight: 40.0, amountType: "ResidualDM", duration: 1)
              2012-02-09  [DefoliationManager].Script.Defoliate(amountDM: 35, residualHeight: 40.0, amountType: "ResidualDM", duration: 1)
              2012-03-15  [DefoliationManager].Script.Defoliate(amountDM: 35, residualHeight: 40.0, amountType: "ResidualDM", duration: 1)
              2012-04-26  [DefoliationManager].Script.Defoliate(amountDM: 35, residualHeight: 40.0, amountType: "ResidualDM", duration: 1)
              2012-05-31  [DefoliationManager].Script.Defoliate(amountDM: 35, residualHeight: 40.0, amountType: "ResidualDM", duration: 1)
            Operations 35To7
              2010-12-13  [DefoliationManager].Script.Defoliate(amountDM: 50, residualHeight: 70.0, amountType: "ResidualDM", duration: 1)
              2011-01-03  [DefoliationManager].Script.Defoliate(amountDM: 50, residualHeight: 70.0, amountType: "ResidualDM", duration: 1)
              2011-01-20  [DefoliationManager].Script.Defoliate(amountDM: 50, residualHeight: 70.0, amountType: "ResidualDM", duration: 1)
              2011-02-10  [DefoliationManager].Script.Defoliate(amountDM: 50, residualHeight: 70.0, amountType: "ResidualDM", duration: 1)
              2011-03-17  [DefoliationManager].Script.Defoliate(amountDM: 50, residualHeight: 70.0, amountType: "ResidualDM", duration: 1)
              2011-04-28  [DefoliationManager].Script.Defoliate(amountDM: 50, residualHeight: 70.0, amountType: "ResidualDM", duration: 1)
              2011-06-23  [DefoliationManager].Script.Defoliate(amountDM: 50, residualHeight: 70.0, amountType: "ResidualDM", duration: 1)
              2011-10-20  [DefoliationManager].Script.Defoliate(amountDM: 50, residualHeight: 70.0, amountType: "ResidualDM", duration: 1)
              2011-11-24  [DefoliationManager].Script.Defoliate(amountDM: 50, residualHeight: 70.0, amountType: "ResidualDM", duration: 1)
              2012-01-05  [DefoliationManager].Script.Defoliate(amountDM: 50, residualHeight: 70.0, amountType: "ResidualDM", duration: 1)
              2012-02-09  [DefoliationManager].Script.Defoliate(amountDM: 50, residualHeight: 70.0, amountType: "ResidualDM", duration: 1)
              2012-03-15  [DefoliationManager].Script.Defoliate(amountDM: 50, residualHeight: 70.0, amountType: "ResidualDM", duration: 1)
              2012-04-26  [DefoliationManager].Script.Defoliate(amountDM: 50, residualHeight: 70.0, amountType: "ResidualDM", duration: 1)
              2012-05-31  [DefoliationManager].Script.Defoliate(amountDM: 50, residualHeight: 70.0, amountType: "ResidualDM", duration: 1)
            Operations 45To4
              2010-12-13  [DefoliationManager].Script.Defoliate(amountDM: 35, residualHeight: 40.0, amountType: "ResidualDM", duration: 1)
              2011-01-03  [DefoliationManager].Script.Defoliate(amountDM: 35, residualHeight: 40.0, amountType: "ResidualDM", duration: 1)
              2011-01-20  [DefoliationManager].Script.Defoliate(amountDM: 35, residualHeight: 40.0, amountType: "ResidualDM", duration: 1)
              2011-02-24  [DefoliationManager].Script.Defoliate(amountDM: 35, residualHeight: 40.0, amountType: "ResidualDM", duration: 1)
              2011-03-31  [DefoliationManager].Script.Defoliate(amountDM: 35, residualHeight: 40.0, amountType: "ResidualDM", duration: 1)
              2011-05-27  [DefoliationManager].Script.Defoliate(amountDM: 35, residualHeight: 40.0, amountType: "ResidualDM", duration: 1)
              2011-10-27  [DefoliationManager].Script.Defoliate(amountDM: 35, residualHeight: 40.0, amountType: "ResidualDM", duration: 1)
              2011-12-01  [DefoliationManager].Script.Defoliate(amountDM: 35, residualHeight: 40.0, amountType: "ResidualDM", duration: 1)
              2012-01-19  [DefoliationManager].Script.Defoliate(amountDM: 35, residualHeight: 40.0, amountType: "ResidualDM", duration: 1)
              2012-03-15  [DefoliationManager].Script.Defoliate(amountDM: 35, residualHeight: 40.0, amountType: "ResidualDM", duration: 1)
              2012-05-03  [DefoliationManager].Script.Defoliate(amountDM: 35, residualHeight: 40.0, amountType: "ResidualDM", duration: 1)
              2012-05-31  [DefoliationManager].Script.Defoliate(amountDM: 35, residualHeight: 40.0, amountType: "ResidualDM", duration: 1)
            Operations 45To7
              2010-12-13  [DefoliationManager].Script.Defoliate(amountDM: 50, residualHeight: 70.0, amountType: "ResidualDM", duration: 1)
              2011-01-03  [DefoliationManager].Script.Defoliate(amountDM: 50, residualHeight: 70.0, amountType: "ResidualDM", duration: 1)
              2011-01-20  [DefoliationManager].Script.Defoliate(amountDM: 50, residualHeight: 70.0, amountType: "ResidualDM", duration: 1)
              2011-02-24  [DefoliationManager].Script.Defoliate(amountDM: 50, residualHeight: 70.0, amountType: "ResidualDM", duration: 1)
              2011-03-31  [DefoliationManager].Script.Defoliate(amountDM: 50, residualHeight: 70.0, amountType: "ResidualDM", duration: 1)
              2011-05-27  [DefoliationManager].Script.Defoliate(amountDM: 50, residualHeight: 70.0, amountType: "ResidualDM", duration: 1)
              2011-10-27  [DefoliationManager].Script.Defoliate(amountDM: 50, residualHeight: 70.0, amountType: "ResidualDM", duration: 1)
              2011-12-01  [DefoliationManager].Script.Defoliate(amountDM: 50, residualHeight: 70.0, amountType: "ResidualDM", duration: 1)
              2012-01-19  [DefoliationManager].Script.Defoliate(amountDM: 50, residualHeight: 70.0, amountType: "ResidualDM", duration: 1)
              2012-03-15  [DefoliationManager].Script.Defoliate(amountDM: 50, residualHeight: 70.0, amountType: "ResidualDM", duration: 1)
              2012-05-03  [DefoliationManager].Script.Defoliate(amountDM: 50, residualHeight: 70.0, amountType: "ResidualDM", duration: 1)
              2012-05-31  [DefoliationManager].Script.Defoliate(amountDM: 50, residualHeight: 70.0, amountType: "ResidualDM", duration: 1)
        Simulation FD902
          Clock: Start=2010-10-01; End=2012-05-31
          Weather: FileName=Ruakura.met
          SoilArbitrator Soil Arbitrator
          Summary summaryfile
          Forages
            Parameters:
              Name                          IsLive  DigestibilityString  FractionConsumable  MinimumAmount  UseDigestibilityFromModel
              SurfaceOrganicMatter.Residue  true    0.7                  0                   100            false
              SurfaceOrganicMatter.Residue  false   0.3                  0                   0              false
              PlantainForage.Leaf           true    0.7                  1                   100            false
              PlantainForage.Leaf           false   0.3                  1                   0              false
              PlantainForage.Stem           true    0.7                  1                   100            false
              PlantainForage.Stem           false   0.3                  1                   0              false
              PlantainForage.Inflorescence  true    0.7                  1                   100            false
              PlantainForage.Inflorescence  false   0.3                  1                   0              false
              PlantainForage.Taproot        true    0.7                  1                   100            false
              PlantainForage.Taproot        false   0.3                  1                   0              false
              PlantainForage.Root           true    0                    0                   0              false
              PlantainForage.Root           false   0                    0                   0              false
          Zone Field: Area=1; Slope=0; AspectAngle=0; Altitude=50
            Folder Management
              Operations Sowing
                2010-10-13  [PlantainForage].Sow(population: 200, cultivar: "Tonic", depth: 10, rowSpacing: 150)
              Operations DefoliationSchedule
                2011-01-13  [DefoliationManager].Script.Defoliate(amountDM: 50, amountType: "ResidualDM", duration: 1)
              Operations FertiliserSchedule
                2010-10-04  [Fertiliser].Apply(Amount: 35.2, Type: Fertiliser.Types.UreaN, Depth: 50)
                2010-12-20  [Fertiliser].Apply(Amount: 39.1, Type: Fertiliser.Types.UreaN, Depth: 50)
                2011-01-27  [Fertiliser].Apply(Amount: 39.1, Type: Fertiliser.Types.UreaN, Depth: 50)
                2011-03-03  [Fertiliser].Apply(Amount: 39.1, Type: Fertiliser.Types.UreaN, Depth: 50)
                2011-04-08  [Fertiliser].Apply(Amount: 39.1, Type: Fertiliser.Types.UreaN, Depth: 50)
                2011-05-30  [Fertiliser].Apply(Amount: 39.1, Type: Fertiliser.Types.UreaN, Depth: 50)
                2011-10-28  [Fertiliser].Apply(Amount: 27.6, Type: Fertiliser.Types.UreaN, Depth: 50)
                2011-12-22  [Fertiliser].Apply(Amount: 27.6, Type: Fertiliser.Types.UreaN, Depth: 50)
                2012-02-02  [Fertiliser].Apply(Amount: 27.6, Type: Fertiliser.Types.UreaN, Depth: 50)
                2012-03-22  [Fertiliser].Apply(Amount: 27.6, Type: Fertiliser.Types.UreaN, Depth: 50)
              Operations IrrigationSchedule
                2010-11-30  [Irrigation].Apply(amount: 25.4)
                2010-12-10  [Irrigation].Apply(amount: 25.2)
                2010-12-14  [Irrigation].Apply(amount: 9.2)
                2010-12-15  [Irrigation].Apply(amount: 29.8)
                2011-01-05  [Irrigation].Apply(amount: 41.2)
                2011-02-01  [Irrigation].Apply(amount: 55)
                2011-02-04  [Irrigation].Apply(amount: 13.7)
                2011-02-11  [Irrigation].Apply(amount: 36.6)
                2011-02-23  [Irrigation].Apply(amount: 18.3)
                2011-03-04  [Irrigation].Apply(amount: 36.6)
                2011-03-13  [Irrigation].Apply(amount: 4.6)
                2011-03-17  [Irrigation].Apply(amount: 36.6)
                2011-11-30  [Irrigation].Apply(amount: 36.6)
              Manager ExtraVars
```csharp
// This will be replaced by the "ExtraVariables" section in "Replacements"

using Models.Soils;
using System;
using Models.Core;

namespace Models
{
    [Serializable] 
    public class Script : Model
    {
    }
}
```
              Manager DefoliationManager
                DefoliationRotationStartDate = 01/01/1900 00:00:00
                DefoliationRotationEndDate = 12/31/2100 00:00:00
                DefoliationTriggerType = TargetCropHeight
                IntervalBetweenDefoliations = 21
                TargetStandingBiomass = 250
                DurationOfEachDefoliation = 1
                RemoveAmountType = ResidualDM
                AmountForEachDefoliation = 125
                DMRemoveType = UserDefinedFraction
                FractionDMToRemove = 0.99
                NRemoveType = ProportionalToDM
                FractionNToRemove = 0.99
                ReturnType = AsDungUrine
                NDungType = DefineCNratio
                CNRatioDung = 17.5
                UrineDepth = 250
                AllowAutomaticManagement = No
                Crop = [PlantainForage]
                TargetCropHeight = 200
                TargetPhenologyStage = 3.5
                RemoveAllBiomass = No
                EnforceMinimumInterval = No
                MinimumInterval = 15
                EnforceMaximumInterval = No
                MaximumInterval = 60
                SuppressDefoliationOnWindow = No
                NoDefoliationWindowStartDate = 1-Jun
                NoDefoliationWindowEndDate = 31-Jul
                ProportionOfNToDung = 0.4
                rateOfPopulationDecline = 0
                MeanGrowthPeriodType = BetweenDefoliations
                MaxPeriodForMeanGrowth = 30
                DefoliationFractions = Leaf.FractionLiveToRemove=0.7, Leaf.FractionDeadToRemove=0.5, Stem.FractionLiveToRemove=0.8, Stem.FractionDeadToRemove=0.65, Inflorescence.FractionLiveToRemove=0.8, Inflorescence.FractionDeadToRemove=0.25, TapRoot.FractionLiveToResidue=0.1, Root.FractionLiveToResidue=0.05
                script: same as in Validation.New Zealand.FRNLLincoln.FRNLLincoln.Field.Management.DefoliationManager
            MicroClimate: a_interception=0; b_interception=1; c_interception=0; d_interception=0; SoilHeatFluxFraction=0.4; MinimumHeightDiffForNewLayer=0; NightInterceptionFraction=0.5; ReferenceHeight=2
            Irrigation
            Fertiliser
            SurfaceOrganicMatter: InitialResidueName=grass; InitialResidueType=grass; InitialResidueMass=500; InitialStandingFraction=0; InitialCPR=0; InitialCNR=40
            Soil HorotiuSoil: SoilType=Typic Udivitrand (US), Typic Orthic Allophanic Soil (NZ); LocalName=Horotiu silt loam; Site=Ruakura; NearestTown=Hamilton; Region=Waikato; Country=New Zealand; Latitude=0; Longitude=0; DataSource=Based primarily on data from Close et al, 2003
              Chemical: Thickness=[200, 200, 130, 140, 380, 230, 220]; PH=[6, 6, 6, 6, 6, 6, 6]; PHUnits=Water
              Physical: same as Validation.New Zealand.FRNLRuakura.FRNLRuakura.Field.HorotiuSoil.Physical
              WaterBalance SoilWater: same as Validation.New Zealand.FRNLRuakura.FRNLRuakura.Field.HorotiuSoil.SoilWater
              Organic: same as Validation.New Zealand.FRNLRuakura.FRNLRuakura.Field.HorotiuSoil.Organic
              Water: Thickness=[200, 200, 130, 140, 380, 230, 220]; InitialValues=[0.359, 0.328, 0.309, 0.269, 0.194, 0.154, 0.125]; InitialPAWmm=122.36; RelativeTo=LL15; FilledFromTop=false
              CERESSoilTemperature Temperature
              Nutrient
              Solute NO3: Thickness=[200, 200, 130, 140, 380, 230, 220]; InitialValues=[15, 10, 5, 5, 4.474, 1, 1]; InitialValuesUnits=ppm; WaterTableConcentration=0; D0=0; DepthConstant=0; MaxDepthSoluteAccessible=0; RunoffEffectivenessAtMovingSolute=0; MaxEffectiveRunoff=0
              Solute NH4: Thickness=[200, 200, 130, 140, 380, 230, 220]; InitialValues=[0.5, 0.2, 0.093, 0.093, 0.093, 0.093, 0.093]; InitialValuesUnits=ppm; WaterTableConcentration=0; D0=0; DepthConstant=0; MaxDepthSoluteAccessible=0; RunoffEffectivenessAtMovingSolute=0; MaxEffectiveRunoff=0
              Solute Urea: same as Validation.New Zealand.FRNLRuakura.FRNLRuakura.Field.HorotiuSoil.Urea
            Plant PlantainForage
            Report BaseReport: EventNames=[Clock].DoReport
              VariableNames:
                [Clock].Today as Date
                [Clock].Today.DayOfYear as DayOfYear
                // Water outputs
                [Weather].Rain as Rainfall
                [Irrigation].IrrigationApplied as Irrigation
                [MicroClimate].PrecipitationInterception as PrecipitationInterception
                [Soil].SoilWater.Eo as Eo
                [Soil].SoilWater.Es as Evaporation
                [PlantainForage].Leaf.Transpiration as Transpiration
                [Soil].SoilWater.Drainage as Drainage
                [Soil].SoilWater.Runoff as Runoff
                sum([Soil].SoilWater.LateralOutflow) as LateralFlow
                [Soil].SoilWater.pond as PondedWater
                sum([Soil].Water.MM) as TotalSWC
                sum([Soil].Physical.SATmm) as TotalSAT
                sum([Soil].Physical.DULmm) as TotalDUL
                sum([Soil].Physical.LL15mm) as TotalLL15
                [Soil].Water.Volumetric[1] as TopLayerSWC
                [Soil].Physical.DUL[1] as TopLayerDUL
                [Soil].Physical.LL15[1] as TopLayerLL15
                [ExtraVars].Script.TotalWaterDeficit as TotalSoilWaterDeficit
                // Nitrogen outputs
                [Fertiliser].NitrogenApplied as FertiliserN
                [DefoliationManager].Script.NReturnedInDung as DungDepositedN
                [DefoliationManager].Script.NReturnedInUrine as UrineDepositedN
                ([Fertiliser].NitrogenApplied*0.0) as FixedN
                sum([Soil].Nutrient.DenitrifiedN) as DenitrifiedN
                ([Soil].SoilWater.LeachUrea + [Soil].SoilWater.LeachNH4 + [Soil].SoilWater.LeachNO3) as LeachedN
                (-1*[PlantainForage].Root.NUptake) as UptakeN
                (sum([Soil].Nutrient.MineralisedN) + sum([SurfaceOrganicMatter].SurfaceResidue.Decomposition.MineralisedN)) as NetMineralisedN
                sum([Soil].Nutrient.MineralisedN) as MineralisedSoilN
                sum([SurfaceOrganicMatter].SurfaceResidue.Decomposition.MineralisedN) as MineralisedSurfOMN
                ([PlantainForage].Leaf.Detached.N+[PlantainForage].Stem.Detached.N+[PlantainForage].Inflorescence.Detached.N+[PlantainForage].Taproot.Detached.N+[PlantainForage].Root.Detached.N) as DetachedPlantN
                (sum([Soil].Urea.kgha) + sum([Soil].NH4.kgha) + sum([Soil].NO3.kgha)) as TotalMineralN
                sum([Soil].Urea.kgha) as TotalUrea
                sum([Soil].NH4.kgha) as TotalNH4
                sum([Soil].NO3.kgha) as TotalNO3
                [SurfaceOrganicMatter].N as TotalSurfOMN
                sum([Soil].Nutrient.FOM.N) as TotalFOMN
                sum([Soil].Nutrient.Humic.N) as TotalHumicN
                sum([Soil].Nutrient.Microbial.N) as TotalMicrobialN
                [PlantainForage].Total.N as TotalPlantN
                // Crop outputs
                [PlantainForage].Total.Wt as TotalPlantWt
                ([PlantainForage].AboveGroundLive.Wt + [PlantainForage].BelowGroundLive.Wt) as TotalPlantLiveWt
                ([PlantainForage].Total.Wt - ([PlantainForage].AboveGroundLive.Wt + [PlantainForage].BelowGroundLive.Wt)) as TotalPlantDeadWt
                [PlantainForage].AboveGround.Wt as AboveGroundPlantWt
                [PlantainForage].BelowGround.Wt as BelowGroundPlantWt
                [PlantainForage].AboveGround.NConc as AboveGroundNConc
                [PlantainForage].BelowGround.NConc as BelowGroundNConc
                [PlantainForage].Leaf.LAI as LAIGreen
                [PlantainForage].Leaf.LAIDead as LAIDead
                [MicroClimate].CanopyCover as CoverTotal
                [PlantainForage].Leaf.Height as CropHeight
                [PlantainForage].Root.Depth as RootDepth
                // Defoliation outputs
                [DefoliationManager].Script.HarvestedWt as DefoliatedWt
                [DefoliationManager].Script.HarvestedN as DefoliatedN
                [DefoliationManager].Script.RemovedWt as OffTakePlantWt
                [DefoliationManager].Script.RemovedN as OffTakePlantN
                [DefoliationManager].Script.HarvestedN/([DefoliationManager].Script.HarvestedWt + 0.000000001) as DefoliatedNconc
                [DefoliationManager].Script.PreHarvestDM as PreHarvestDM
                [DefoliationManager].Script.PostHarvestDM as PostHarvestDM
                [DefoliationManager].Script.DaysSinceLastDefoliation as DaysSinceLastDefoliation
                //[DefoliationManager].Script.MeanGrowthRateDM as MeanGrowthRate
                // Other - Extras
                [Weather].Radn as RadiationTotal
                [MicroClimate].RadiationInterception as RadiationIntercepted
                [Weather].MeanT as MeanAirTemperature
                [Phenology].Photoperiod as Photoperiod
                [Soil].Temperature.Value[1] as TopSoilTemperature
                [DefoliationManager].Script.ReturnedWt as DungDepositedWt
                [SurfaceOrganicMatter].Wt as TotalSurfaceOMWt
                ([SurfaceOrganicMatter].C / ([SurfaceOrganicMatter].N + 0.000000001)) as SurfOMCNratio
                sum([Soil].Nutrient.FOM.C) / 0.4 as FOMWt
                (sum([Soil].Nutrient.FOM.C) / (sum([Soil].Nutrient.FOM.N) + 0.000000001)) as FOMCNratio
            Report CropReport: EventNames=[Clock].DoReport
            Report CumReport: same as Validation.New Zealand.FRNLLincoln.FRNLLincoln.Field.CumReport
            Report DiagnosisReport: VariableNames=// variables defined in 'Replacements'; EventNames=[Clock].DoReport
            Report ValidationReport: same as Validation.New Zealand.FRNLLincoln.FRNLLincoln.Field.ValidationReport
      Experiment LincolnRDF
        Memo
          ###Lincoln university research farm###

          Simulation was setup based on a field trial performed at Lincoln University Research Dairy Farm, New Zealand, between 2010 and 2012.  The experiment aimed at comparing the nutritive value and DM production of a range of pasture species throughout the growing season under a high and a low N fertiliser regime.  Here only the data from plots with pure plantain are used.
          The experiment had two nitrogen treatments, nitrogen was applied to half of each plot after grazing, ensuring similar distribution over what were previously a ProGibb, N and control plots.  The first N rate was termed low (at 125 kg N/ha/yr in five applications) – set to encourage legume growth and to mimic rates used by Frisco; the second N rate was called high (at 250 kg N/ha/yr), applied as the same number of split applications as the first treatment.  Yield was determined in quadrats mown down to 4.5cm every 4 weeks.  After mowing for yield, animals were allowed to graze the areas aiming for a residual height of to 4.5cm.  This was followed by further mowing if necessary to tidy up the plots.  When grazing dates coincided with the allotted N schedule, urea was then applied by hand within seven days of grazing.

          The soil at the experimental site was a Templeton fine sandy loam (an Immature Pallic soil, USDA: Udic Haplustept), the required parameters were inferred based on data from the New Zealand National Soils Database (Landcare Research).
          Weather data was obtained from nearby Broadfields weather station (NIWA).
        Factors
          Factor NRate: Specification=[NRate]
            Operations Low
              2010-08-01  [Fertiliser].Apply(Amount: 50, Type: Fertiliser.Types.UreaN, Depth: 10)
              2011-08-01  [Fertiliser].Apply(Amount: 25, Type: Fertiliser.Types.UreaN, Depth: 10)
              2011-09-22  [Fertiliser].Apply(Amount: 25, Type: Fertiliser.Types.UreaN, Depth: 10)
              2011-10-26  [Fertiliser].Apply(Amount: 25, Type: Fertiliser.Types.UreaN, Depth: 10)
              2012-01-18  [Fertiliser].Apply(Amount: 25, Type: Fertiliser.Types.UreaN, Depth: 10)
              2012-03-15  [Fertiliser].Apply(Amount: 25, Type: Fertiliser.Types.UreaN, Depth: 10)
            Operations High
              2010-08-01  [Fertiliser].Apply(Amount: 50, Type: Fertiliser.Types.UreaN, Depth: 10)
              2011-08-01  [Fertiliser].Apply(Amount: 50, Type: Fertiliser.Types.UreaN, Depth: 10)
              2011-09-22  [Fertiliser].Apply(Amount: 50, Type: Fertiliser.Types.UreaN, Depth: 10)
              2011-10-26  [Fertiliser].Apply(Amount: 50, Type: Fertiliser.Types.UreaN, Depth: 10)
              2012-01-18  [Fertiliser].Apply(Amount: 50, Type: Fertiliser.Types.UreaN, Depth: 10)
              2012-03-15  [Fertiliser].Apply(Amount: 50, Type: Fertiliser.Types.UreaN, Depth: 10)
        Simulation LincolnRDF
          Clock: Start=2010-03-20; End=2012-05-01
          Weather: FileName=Lincoln-Broadfields.met
          Summary summaryfile
          SoilArbitrator Soil Arbitrator
          Forages: same as Validation.New Zealand.FRNLRuakura.FRNLRuakura.Forages
          Zone Field: Area=1; Slope=0; AspectAngle=0; Altitude=50
            Folder Management
              Operations Sowing
                2010-03-20  [PlantainForage].Sow(population: 200, cultivar: "Tonic", depth: 10, rowSpacing: 150)
              Operations NRate
              Manager IrrigationManager
                AllowAutomaticIrrigation = Yes
                SeasonStartDate = 15-Oct
                SeasonEndDate = 30-Apr
                IrrigationTriggerType = TriggerBySoilDeficit
                IntervalBetweenIrrigations = 0
                TriggerDeficit = 60
                IrrigationAmountType = BasedOnSoilDeficit
                GivenAmount = 0
                TargetDeficit = 90
                MaximumAmount = 50
                CheckCropStatus = Yes
                SkipRainDays = Yes
                RainfallThreshold = 5
                ReturnDays = 3
                DepthOfMonitoringLayer = 500
```csharp
// This script will apply irrigation at time and amount determined based on given instructions and/or soil condition
// Developed by RCichota, last updated in 15/Oct/2022

using System;
using Newtonsoft.Json;
using APSIM.Shared.Utilities;
using Models.Interfaces;
using Models.Core;
using Models.PMF;
using Models.Soils;

namespace Models
{
    [Serializable]
    [System.Xml.Serialization.XmlInclude(typeof(Model))]
    public class Script : Model
    {
        //> Links to other Apsim models
        [Link] private Clock clock;
        [Link] private IWeather weather;
        [Link] private Irrigation irrigator;
        [Link] private IPhysical soilPhysical;
        [Link] private ISoilWater soilWater;
        [Link(IsOptional = true)] private IPlant[] existingCrops;
        [Link] private ISummary summary;

        //> User inputs from properties tab
        [Separator("Generic irrigation management")]
        [Description(" Allow this manager to controll irrigation automatically?")]
        public yesNoAnswer AllowAutomaticIrrigation { get; set; }
        [Description(" Start of irrigation season (dd-mmm):")]
        public string SeasonStartDate { get; set; }
        [Description(" End of irrigation season (dd-mmm):")]
        public string SeasonEndDate { get; set; }

        [Separator("Parameters defining how the irrigation is triggered")]
        [Description(" How irrigation should be triggered?")]
        public IrrigationTriggerTypes IrrigationTriggerType { get; set; }
        [Description("   Number of days between irrigations, if using fixed interval:")]
        public int IntervalBetweenIrrigations { get; set; }
        [Description("   Deficit to trigger irrigation, if using soil deficit (% PAWC):")]
        public double TriggerDeficit { get; set; }

        [Separator("Parameters defining how much irrigation is applied")]
        [Description(" How irrigation amount is determined? ")]
        public IrrigationAmountTypes IrrigationAmountType { get; set; }
        [Description("   Amount of irrigation to apply, if setting amount (mm):")]
        public double GivenAmount { get; set; }
        [Description("   Deficit to stop irrigation, if based on soil deficit (% PAWC):")]
        public double TargetDeficit { get; set; }
        [Description("   Maximum irrigation application (mm/day):")]
        public double MaximumAmount { get; set; }

        [Separator("Parameters defining extra constraints to irrigation")]
        [Description(" Limit irrigation to only when there is a crop alive?")]
        public yesNoAnswer CheckCropStatus { get; set; }
        [Description(" Skip irrigation after significant rainfall?")]
        public yesNoAnswer SkipRainDays { get; set; }
        [Description("   Rainfall amount above which irrigation will be stopped (mm/day):")]
        public double RainfallThreshold { get; set; }
        [Description("   Minimum number of days between irrigations (ignored if irrigating using fixed interval):")]
        public double ReturnDays { get; set; }

        [Separator("Parameters for computing soil water status")]
        [Description(" Depth to calculate PAWC and water deficit (mm):")]
        public double DepthOfMonitoringLayer { get; set; }

        //> Outputs from this manager
        [JsonIgnore][Units("mm")] // Soil water deficit in the layer monitored for irrigation
        public double SoilWaterDeficit { get; set; }
        [JsonIgnore][Units("mm")] // Soil water content in the layer monitored for irrigation
        public double MonitoredLayerSWC { get; set; }
        [JsonIgnore][Units("mm")] // Soil moisute at DUL in the layer monitored for irrigation
        public double MonitoredLayerDUL { get; set; }
        [JsonIgnore][Units("mm")] // Soil moisture at LL in the layer monitored for irrigation
        public double MonitoredLayerLL { get; set; }
        [JsonIgnore][Units("days")] // Number of days since last irrigation
        public double DaysSinceIrrigation { get; set; }
        [JsonIgnore][Units("mm")] // Amount of water to apply in a given irrigation event
        public double AmountToApply { get; set; }
        [JsonIgnore][Units("mm")] // Total amount of water applied over the irrigation season
        public double SeasonAppliedAmount { get; set; }

        //> Internal variables
        private int bottomLayer;
        private double fracBottomLayer;
        private bool seasonIsOpen;
        private bool cropIsActive;
        private bool rainIsNotSignificant;
        private bool irrigatorIsAvailable;
        private bool soilMoistureIsLow;


        [EventSubscribe("StartOfSimulation")]
        private void OnStartOfSimulation(object sender, EventArgs e)
        {
            // check whether irrigation is allowed at all
            if (AllowAutomaticIrrigation == yesNoAnswer.Yes)
            {
                // check whether we need to check crop status
                if (CheckCropStatus == yesNoAnswer.Yes)
                {
                    if(existingCrops == null)
                    {
                        throw new Exception(" Manager requires checking active crop, but no crop is present");
                    }
                }
            }

            //Calculate soil water variables
            double depthFromSurface = 0.0;
            for (int layer = 0; layer < soilPhysical.Thickness.Length; layer++)
            {
                fracBottomLayer = Math.Min(1.0, (DepthOfMonitoringLayer - depthFromSurface) / soilPhysical.Thickness[layer]);
                MonitoredLayerLL += soilPhysical.LL15mm[layer] * fracBottomLayer;
                MonitoredLayerDUL += soilPhysical.DULmm[layer] * fracBottomLayer;
                depthFromSurface += soilPhysical.Thickness[layer];
                if (depthFromSurface >= DepthOfMonitoringLayer)
                {
                    bottomLayer = layer;
                    layer = soilPhysical.Thickness.Length;
                }
            }

            // write message in summary
            summary.WriteMessage(this," Automatic irrigation manager initialised", MessageType.Diagnostic);
            if (AllowAutomaticIrrigation == yesNoAnswer.Yes)
            {
                summary.WriteMessage(this,"  Irrigation is enabled between " + SeasonStartDate + " and " + SeasonEndDate, MessageType.Diagnostic);
                if (IrrigationTriggerType == IrrigationTriggerTypes.FixedInterval)
                {
                    summary.WriteMessage(this,"  Irrigation will be triggered every " + IntervalBetweenIrrigations + " days", MessageType.Diagnostic);
                }
                else
                {
                    summary.WriteMessage(this,"  Irrigation will be triggered every time soil moisture is below " + TriggerDeficit.ToString("#0.0") + "% of PAWC", MessageType.Diagnostic);
                }

                if (IrrigationAmountType == IrrigationAmountTypes.GivenAmount)
                {
                    summary.WriteMessage(this,"  Amount to be applied is fixed at " + Math.Min(MaximumAmount, GivenAmount).ToString("#0.0") + "mm each application", MessageType.Diagnostic);
                }
                else
                {
                    summary.WriteMessage(this,"  Amount to be applied will aim to bring soil moisture up to " + TargetDeficit.ToString("#0.0") + "% of PAWC", MessageType.Diagnostic);
                    summary.WriteMessage(this,"   limited to " + MaximumAmount.ToString("#0.0") + "mm in each application", MessageType.Diagnostic);
                }
            }
            else
            {
                summary.WriteMessage(this,"  Irrigation is disabled", MessageType.Diagnostic);
            }
        }

        [EventSubscribe("StartOfDay")]
        private void OnStartOfDay(object sender, EventArgs e)
        {
            // check whether we are within the irrigation season
            if(DateUtilities.WithinDates(SeasonStartDate, clock.Today, SeasonEndDate))
            {
                seasonIsOpen = true;
            }
            else
            {
                seasonIsOpen = false;
                SeasonAppliedAmount = 0;
            }

            // check for whether there is a crop that needs irrigation
            if (CheckCropStatus == yesNoAnswer.Yes)
            {
                cropIsActive = false;
                foreach (IPlant crop in existingCrops)
                {
                    if (crop.IsAlive)
                    {
                        cropIsActive = true;
                        break;
                    }
                }
            }
            else
            {
                cropIsActive = true;
            }

            // check whether there has been significant rainfall
            rainIsNotSignificant = true;
            if (SkipRainDays == yesNoAnswer.Yes && weather.Rain > RainfallThreshold)
            {
                rainIsNotSignificant = false;
            }

            // check whether the irrigator available
            irrigatorIsAvailable = false;
            DaysSinceIrrigation += 1;
            if(IrrigationTriggerType == IrrigationTriggerTypes.FixedInterval)
            {
                if (DaysSinceIrrigation >= IntervalBetweenIrrigations)
                {
                    irrigatorIsAvailable = true;
                }
            }
            else
            {
                if (DaysSinceIrrigation >= ReturnDays)
                {
                    irrigatorIsAvailable = true;
                }
            }
        }

        [EventSubscribe("DoManagement")]
        private void OnDoManagement(object sender, EventArgs e)
        {
            // get current soil moisture and water deficit
            MonitoredLayerSWC = 0.0;
            for (int layer = 0; layer < bottomLayer; layer++)
            {
                MonitoredLayerSWC += soilWater.SWmm[layer];
            }

            MonitoredLayerSWC += soilWater.SWmm[bottomLayer] * fracBottomLayer;
            SoilWaterDeficit = MonitoredLayerSWC - MonitoredLayerDUL;

            if (AllowAutomaticIrrigation == yesNoAnswer.Yes)
            {
                // check whether the soil is dry enough to require irrigation
                if(IrrigationTriggerType == IrrigationTriggerTypes.TriggerBySoilDeficit)
                {
                    soilMoistureIsLow = false;
                    if (Math.Max(0.0, -SoilWaterDeficit) >= (MonitoredLayerDUL - MonitoredLayerLL) * (100.0 - TriggerDeficit) / 100.0)
                    {
                        soilMoistureIsLow = true;
                    }
                }
                else
                { // moisture is not checked
                    soilMoistureIsLow = true;
                }

                // check whether all the conditions ratify irrigation
                if (seasonIsOpen && cropIsActive && irrigatorIsAvailable && rainIsNotSignificant && soilMoistureIsLow)
                {
                    // let's bloody well irrigate then!!!!
                    if(IrrigationAmountType == IrrigationAmountTypes.GivenAmount)
                    {
                        AmountToApply = Math.Min(GivenAmount, MaximumAmount);
                    }
                    else
                    {
                        AmountToApply = MonitoredLayerLL + (MonitoredLayerDUL - MonitoredLayerLL) * TargetDeficit / 100.0 - MonitoredLayerSWC;
                        AmountToApply = Math.Max(0.0, Math.Min(AmountToApply, MaximumAmount));
                    }
    
                    irrigator.Apply(amount: AmountToApply, depth: 0.0, duration: 1440, willRunoff: true);
                    DaysSinceIrrigation = 0;
                    SeasonAppliedAmount += AmountToApply;
                }
            }
        }


        /// <summary>Flag for a positive or negative answer</summary>
        public enum yesNoAnswer
        {
            /// <summary>Positive answer</summary>
            Yes,
            /// <summary>Negative answer</summary>
            No
        }

        /// <summary>Flag how irrigation will be triggered</summary>
        public enum IrrigationTriggerTypes
        {
            /// <summary>Setting a fixed interval</summary>
            FixedInterval,
            /// <summary>Setting a soil deficit</summary>
            TriggerBySoilDeficit
        }

        /// <summary>Flag how much irrigation will be applied</summary>
        public enum IrrigationAmountTypes
        {
            /// <summary>Setting a fixed interval</summary>
            GivenAmount,
            /// <summary>Setting a soil deficit</summary>
            BasedOnSoilDeficit
        }
    }
}
```
              Manager DefoliationManager
                DefoliationRotationStartDate = 01/01/1900 00:00:00
                DefoliationRotationEndDate = 12/31/2100 00:00:00
                DefoliationTriggerType = FixedInterval
                IntervalBetweenDefoliations = 21
                TargetStandingBiomass = 250
                DurationOfEachDefoliation = 1
                RemoveAmountType = ResidualDM
                AmountForEachDefoliation = 125
                DMRemoveType = UserDefinedFraction
                FractionDMToRemove = 0.8
                NRemoveType = UserDefinedFraction
                FractionNToRemove = 0.4
                ReturnType = AsDungUrine
                NDungType = DefineCNratio
                CNRatioDung = 17.5
                UrineDepth = 250
                AllowAutomaticManagement = No
                Crop = [PlantainForage]
                TargetCropHeight = 200
                TargetPhenologyStage = 3.5
                RemoveAllBiomass = No
                EnforceMinimumInterval = No
                MinimumInterval = 15
                EnforceMaximumInterval = No
                MaximumInterval = 60
                SuppressDefoliationOnWindow = No
                NoDefoliationWindowStartDate = 1-Jun
                NoDefoliationWindowEndDate = 31-Jul
                ProportionOfNToDung = 0.4
                rateOfPopulationDecline = 0
                MeanGrowthPeriodType = BetweenDefoliations
                MaxPeriodForMeanGrowth = 30
                DefoliationFractions = Leaf.FractionLiveToRemove=0.7, Leaf.FractionDeadToRemove=0.1, Stem.FractionLiveToRemove=0.8, Stem.FractionDeadToRemove=0.25, Inflorescence.FractionLiveToRemove=0.8, Inflorescence.FractionDeadToRemove=0.25, TapRoot.FractionLiveToResidue=0.1, Root.FractionLiveToResidue=0.05
                script: same as in Validation.New Zealand.FRNLLincoln.FRNLLincoln.Field.Management.DefoliationManager
              Operations DefoliationSchedule
                2010-05-01  [DefoliationManager].Script.Defoliate(amountDM: 40, amountType: "ResidualDM", duration: 1)
                2010-08-01  [DefoliationManager].Script.Defoliate(amountDM: 40, amountType: "ResidualDM", duration: 1)
                2010-09-01  [DefoliationManager].Script.Defoliate(amountDM: 40, amountType: "ResidualDM", duration: 1)
                2010-10-01  [DefoliationManager].Script.Defoliate(amountDM: 40, amountType: "ResidualDM", duration: 1)
                2010-11-01  [DefoliationManager].Script.Defoliate(amountDM: 40, amountType: "ResidualDM", duration: 1)
                2010-12-01  [DefoliationManager].Script.Defoliate(amountDM: 40, amountType: "ResidualDM", duration: 1)
                2011-01-01  [DefoliationManager].Script.Defoliate(amountDM: 40, amountType: "ResidualDM", duration: 1)
                2011-02-01  [DefoliationManager].Script.Defoliate(amountDM: 40, amountType: "ResidualDM", duration: 1)
                2011-03-01  [DefoliationManager].Script.Defoliate(amountDM: 40, amountType: "ResidualDM", duration: 1)
                2011-04-01  [DefoliationManager].Script.Defoliate(amountDM: 40, amountType: "ResidualDM", duration: 1)
                2011-05-01  [DefoliationManager].Script.Defoliate(amountDM: 40, amountType: "ResidualDM", duration: 1)
                2011-08-11  [DefoliationManager].Script.Defoliate(amountDM: 40, amountType: "ResidualDM", duration: 1)
                2011-09-13  [DefoliationManager].Script.Defoliate(amountDM: 40, amountType: "ResidualDM", duration: 1)
                2011-10-24  [DefoliationManager].Script.Defoliate(amountDM: 40, amountType: "ResidualDM", duration: 1)
                2011-11-22  [DefoliationManager].Script.Defoliate(amountDM: 40, amountType: "ResidualDM", duration: 1)
                2011-12-20  [DefoliationManager].Script.Defoliate(amountDM: 40, amountType: "ResidualDM", duration: 1)
                2012-01-16  [DefoliationManager].Script.Defoliate(amountDM: 40, amountType: "ResidualDM", duration: 1)
                2012-02-17  [DefoliationManager].Script.Defoliate(amountDM: 40, amountType: "ResidualDM", duration: 1)
                2012-03-19  [DefoliationManager].Script.Defoliate(amountDM: 40, amountType: "ResidualDM", duration: 1)
                2012-05-01  [DefoliationManager].Script.Defoliate(amountDM: 40, amountType: "ResidualDM", duration: 1)
            Manager ExtraVars
              script: same as in Validation.New Zealand.FRNLLincoln.FRNLLincoln.Field.ExtraVars
            MicroClimate: a_interception=0; b_interception=1; c_interception=0; d_interception=0; SoilHeatFluxFraction=0.4; MinimumHeightDiffForNewLayer=0; NightInterceptionFraction=0.5; ReferenceHeight=2
            Irrigation
            Fertiliser
            SurfaceOrganicMatter: InitialResidueName=grass; InitialResidueType=grass; InitialResidueMass=500; InitialStandingFraction=0; InitialCPR=0; InitialCNR=40
            Soil TempletonPaparua: same as Validation.New Zealand.FRNLLincoln.FRNLLincoln.Field.TempletonPaparua
            Plant PlantainForage
            Report CropReport: VariableNames=// variables defined in 'Replacements'; EventNames=[Clock].DoReport
            Report BaseReport: same as Validation.New Zealand.FRNLLincoln.FRNLLincoln.Field.BaseReport
            Report CumReport: same as Validation.New Zealand.FRNLLincoln.FRNLLincoln.Field.CumReport
            Report DiagnosisReport: VariableNames=// variables defined in 'Replacements'; EventNames=[Clock].DoReport
            Report ValidationReport: same as Validation.New Zealand.FRNLLincoln.FRNLLincoln.Field.ValidationReport
      Memo SubTitle
        ### All data from New Zealand
    Folder USA
      Experiment RELARC_01
        Memo
          ###RELARC 01###

          This simulation was adapted from a defoliation trial conducted in 1998-1999, at Russell E. Larson Agricultural Research Center, Pennsylvania, USA.  The trial consisted of small plots where two plantain forage cultivars ('*Lancelot*' and '*Tonic*') were sown separately in May-1997 (at 11.0 kg seed/ha).  Population decreased markedly after the 1998/99 winter and plantain plots were no longer used. Plots were fertilized with 27 kgP and 72 kgK/ha in October 1997. Fertilizer N was applied at 56 kg/ha in June and July of 1998.  Treatments were replicated five times and the soil at the site was a Hagerstown silt loam (fine, mixed, semiactive mesic Typic Hapludalfs).
          Each plot was divided in two, one-half was harvested every 3 wk and the other half every 5 wk. Each strip was cut to a 7-cm height with a rotary mower.  Dates for each cut were given, but only annual and treatment yields are reported;  population numbers were provided for few specific dates.  Yield for each harvest were arbitrarily inferred, therefore they should be seen as rough indication only.
          Met file was built using data obtained from NOAA website.  The data set was largely complete except for solar radiation, which was added from an alternative interpolated set for this location, also from NOAA.
          Information to assemble the soil data was obtained from USGS.

          References:
          Sanderson, M.A.; Labreveux, M.; Hall, M.H.; Elwinger, G.F. 2003. Forage yield and persistence of chicory and english plantain. Crop Science, 43: 995-1000.
        Factors
          Permutation
            Factor Cultivar
              CompositeFactor Lancelot
                Specifications:
                  [Sowing]
                  [ExtraVars].Script.ResetSummaryDate = 01-Jan
                Operations Sowing
                  1997-05-16  [PlantainForage].Sow(population: 250, cultivar: "Lancelot", depth: 10, rowSpacing: 150)
              CompositeFactor Tonic
                Specifications:
                  [Sowing]
                  [ExtraVars].Script.ResetSummaryDate = 01-Jan
                Operations Sowing
                  1997-05-16  [PlantainForage].Sow(population: 250, cultivar: "Tonic", depth: 10, rowSpacing: 150)
            Factor CutFrequency: Specification=[Cuttings]
              Operations 3wks
                1998-05-19  [DefoliationManager].Script.Defoliate(amountDM: 40, amountType: "ResidualDM", duration: 1)
                1998-06-10  [DefoliationManager].Script.Defoliate(amountDM: 50, amountType: "ResidualDM", duration: 1)
                1998-06-30  [DefoliationManager].Script.Defoliate(amountDM: 50, amountType: "ResidualDM", duration: 1)
                1998-07-21  [DefoliationManager].Script.Defoliate(amountDM: 50, amountType: "ResidualDM", duration: 1)
                1998-08-11  [DefoliationManager].Script.Defoliate(amountDM: 50, amountType: "ResidualDM", duration: 1)
                1998-09-02  [DefoliationManager].Script.Defoliate(amountDM: 50, amountType: "ResidualDM", duration: 1)
                1998-09-23  [DefoliationManager].Script.Defoliate(amountDM: 50, amountType: "ResidualDM", duration: 1)
                1999-05-20  [DefoliationManager].Script.Defoliate(amountDM: 50, amountType: "ResidualDM", duration: 1)
                1999-06-10  [DefoliationManager].Script.Defoliate(amountDM: 50, amountType: "ResidualDM", duration: 1)
                1999-07-01  [DefoliationManager].Script.Defoliate(amountDM: 50, amountType: "ResidualDM", duration: 1)
                1999-07-22  [DefoliationManager].Script.Defoliate(amountDM: 50, amountType: "ResidualDM", duration: 1)
                1999-08-12  [DefoliationManager].Script.Defoliate(amountDM: 50, amountType: "ResidualDM", duration: 1)
                1999-09-02  [DefoliationManager].Script.Defoliate(amountDM: 50, amountType: "ResidualDM", duration: 1)
                1999-09-23  [DefoliationManager].Script.Defoliate(amountDM: 50, amountType: "ResidualDM", duration: 1)
              Operations 5wks
                1998-05-19  [DefoliationManager].Script.Defoliate(amountDM: 40, amountType: "ResidualDM", duration: 1)
                1998-06-24  [DefoliationManager].Script.Defoliate(amountDM: 50, amountType: "ResidualDM", duration: 1)
                1998-07-29  [DefoliationManager].Script.Defoliate(amountDM: 50, amountType: "ResidualDM", duration: 1)
                1998-09-02  [DefoliationManager].Script.Defoliate(amountDM: 50, amountType: "ResidualDM", duration: 1)
                1998-10-07  [DefoliationManager].Script.Defoliate(amountDM: 50, amountType: "ResidualDM", duration: 1)
                1999-05-20  [DefoliationManager].Script.Defoliate(amountDM: 50, amountType: "ResidualDM", duration: 1)
                1999-06-24  [DefoliationManager].Script.Defoliate(amountDM: 50, amountType: "ResidualDM", duration: 1)
                1999-07-29  [DefoliationManager].Script.Defoliate(amountDM: 50, amountType: "ResidualDM", duration: 1)
                1999-09-02  [DefoliationManager].Script.Defoliate(amountDM: 50, amountType: "ResidualDM", duration: 1)
                1999-10-07  [DefoliationManager].Script.Defoliate(amountDM: 50, amountType: "ResidualDM", duration: 1)
        Simulation RELARC_01
          Clock: Start=1997-05-01; End=1998-12-31
          Weather: FileName=StateCollege.met
          Summary
          SoilArbitrator Soil Arbitrator
          Forages: same as Validation.New Zealand.FRNLRuakura.FRNLRuakura.Forages
          Zone Field: Area=1; Slope=0; AspectAngle=0; Altitude=50
            Folder Management
              Operations Sowing
              Operations FertiliserSchedule
                1998-06-01  [Fertiliser].Apply(Amount: 56, Type: Fertiliser.Types.NH4NO3N, Depth: 10)
                1998-07-15  [Fertiliser].Apply(Amount: 56, Type: Fertiliser.Types.NH4NO3N, Depth: 10)
              Operations BaseCut
                1997-09-15  [DefoliationManager].Script.Defoliate(amountDM: 50, amountType: "ResidualDM", duration: 1)
              Manager DefoliationManager: same as Validation.New Zealand.FRNLRuakura.FRNLRuakura.Field.Management.DefoliationManager
              Operations Cuttings
            Manager ExtraVars
              script: same as in Validation.New Zealand.FRNLLincoln.FRNLLincoln.Field.ExtraVars
            MicroClimate: a_interception=0; b_interception=1; c_interception=0; d_interception=0; SoilHeatFluxFraction=0.4; MinimumHeightDiffForNewLayer=0; NightInterceptionFraction=0.5; ReferenceHeight=2
            SurfaceOrganicMatter: InitialResidueName=grass; InitialResidueType=grass; InitialResidueMass=500; InitialStandingFraction=0; InitialCPR=0; InitialCNR=40
            Irrigation
            Fertiliser
            Soil HagerstownSoil: SoilType=Typic Hapludult (US); LocalName=Ramsey fine-loam; State=West Virginia; Country=USA; NaturalVegetation=Forest; Latitude=0; Longitude=0; DataSource=National Cooperative Soil Survey, US
              Comments=Generic soil description based on data of the same sol type from different locations
              Chemical: Thickness=[100, 120, 130, 200, 300, 300, 350]; PH=[6, 6, 6, 6, 6, 6, 6]; PHUnits=Water
              Physical
                Thickness  ParticleSizeClay  ParticleSizeSand  ParticleSizeSilt  BD    AirDry  LL15   DUL    SAT    KS
                100        21.7              11.4              66.9              1.3   0.048   0.12   0.277  0.465  1200
                120        22.4              10.9              66.7              1.38  0.085   0.094  0.264  0.421  420
                130        23.8              11.9              64.3              1.37  0.079   0.079  0.238  0.381  275
                200        25.5              13.7              60.8              1.41  0.05    0.094  0.222  0.381  200
                300        43.3              11.1              45.6              1.47  0.05    0.141  0.255  0.338  80
                300        51.4              8.7               39.9              1.48  0.155   0.155  0.28   0.359  40
                350        48                9.3               42.7              1.52  0.166   0.166  0.296  0.409  80
                SoilCrop PlantainForageSoil: LL=[0.12, 0.09, 0.08, 0.09, 0.14, 0.16, 0.17]; KL=[0.1, 0.09, 0.08, 0.05, 0.03, 0.02, 0.02]; XF=[1, 1, 1, 1, 1, 1, 1]
              WaterBalance SoilWater: SummerDate=21-Mar; SummerU=6; SummerCona=3.5; WinterDate=23-Sep; WinterU=6; WinterCona=2.5; DiffusConst=88; DiffusSlope=35; Salb=0.13; CN2Bare=73; CNRed=20; CNCov=0.8; PSIDul=-100; Thickness=[100, 120, 130, 200, 300, 300, 350]; SWCON=[0.6, 0.5, 0.3, 0.3, 0.25, 0.2, 0.3]
              Organic: FOMCNRatio=40; CarbonUnits=Total
                Thickness  Carbon  SoilCNRatio  FBiom  FInert  FOM
                100        3.26    11           0.05   0.4     311.903
                120        1.17    11           0.03   0.6     245.352
                130        0.39    11           0.02   0.75    189.179
                200        0.4     11           0.015  0.875   126.81
                300        0.25    11           0.01   0.95    69.595
                300        0.2     11           0.01   0.99    38.1945
                350        0.15    11           0.01   0.99    18.9668
              Water: Thickness=[100, 120, 130, 200, 300, 300, 350]; InitialValues=[0.26915, 0.2555, 0.23005, 0.2156, 0.2493, 0.27375, 0.2895]; InitialPAWmm=189.592; RelativeTo=LL15; FilledFromTop=false
              CERESSoilTemperature Temperature
              Nutrient
              Solute NO3: Thickness=[100, 120, 130, 200, 300, 300, 350]; InitialValuesUnits=ppm; WaterTableConcentration=0; D0=0; DepthConstant=0; MaxDepthSoluteAccessible=0; RunoffEffectivenessAtMovingSolute=0; MaxEffectiveRunoff=0
                InitialValues=[15.3846, 9.05797, 2.17344, 2.17344, 0.352858, 0.352858, 0.352858]
              Solute NH4: Thickness=[100, 120, 130, 200, 300, 300, 350]; InitialValuesUnits=ppm; WaterTableConcentration=0; D0=0; DepthConstant=0; MaxDepthSoluteAccessible=0; RunoffEffectivenessAtMovingSolute=0; MaxEffectiveRunoff=0
                InitialValues=[1.53846, 1.20773, 0.217344, 0.217344, 0.0352858, 0.0352858, 0.0352858]
              Solute Urea: Thickness=[100, 120, 130, 200, 300, 300, 350]; InitialValues=[0, 0, 0, 0, 0, 0, 0]; InitialValuesUnits=kg/ha; WaterTableConcentration=0; D0=0; DepthConstant=0; MaxDepthSoluteAccessible=0; RunoffEffectivenessAtMovingSolute=0; MaxEffectiveRunoff=0
            Plant PlantainForage
            Report CropReport: VariableNames=// variables defined in 'Replacements'; EventNames=[Clock].DoReport
            Report BaseReport: same as Validation.New Zealand.FRNLLincoln.FRNLLincoln.Field.BaseReport
            Report CumReport: same as Validation.New Zealand.FRNLLincoln.FRNLLincoln.Field.CumReport
            Report DiagnosisReport: VariableNames=// variables defined in 'Replacements'; EventNames=[Clock].DoReport
            Report ValidationReport: same as Validation.New Zealand.FRNLLincoln.FRNLLincoln.Field.ValidationReport
      Experiment RELARC_02
        Memo
          ###RELARC 02###

          This simulation was adapted from a defoliation trial conducted in 2000-2001, at Russell E. Larson Agricultural Research Center, Pennsylvania, USA.  The trial was established in small plots, replicated five times, with plantain forage sown in April-1999 (Cultivars '*Lancelot*' and '*Tonic*'.  Only data from the first year is used as the population declined markedly in the second winter.  All plots received 4.5 t/ha of limestone and were fertilized with 56 kg N/ha in April, June and July of 2000.  The soil at the site was a Hagerstown silt loam (fine, mixed, semiactive mesic Typic Hapludalfs).
          Each plot was mechanically mowed to height of 7cm every 4 weeks.  Only annual and treatment yields are reported, however population was given for specific dates.  Dates for each harvest were reported.  From these data, yield was arbitrarily inferred for each harvest, therefore they should be seen as rough approximation only (N variation between cultivars were considered here).
          Met file was built using data obtained from NOAA website.  The data set was largely complete except for solar radiation, which was added from an alternative interpolated set for this location, also from NOAA.
          Information to assemble the soil data was obtained from USGS.

          References:
          Sanderson, M.A.; Labreveux, M.; Hall, M.H.; Elwinger, G.F. 2003. Forage yield and persistence of chicory and english plantain. Crop Science, 43: 995-1000.
        Factors
          Factor Cultivar
            CompositeFactor Lancelot
              Specifications:
                [Sowing]
                [ExtraVars].Script.ResetSummaryDate = 01-Jan
              Operations Sowing
                1999-04-28  [PlantainForage].Sow(population: 300, cultivar: "Lancelot", depth: 10, rowSpacing: 150)
            CompositeFactor Tonic
              Specifications:
                [Sowing]
                [ExtraVars].Script.ResetSummaryDate = 01-Jan
              Operations Sowing
                1999-04-28  [PlantainForage].Sow(population: 300, cultivar: "Tonic", depth: 10, rowSpacing: 150)
        Simulation RELARC_02
          Clock: Start=1999-04-01; End=2000-12-31
          Weather: FileName=StateCollege.met
          Summary
          SoilArbitrator Soil Arbitrator
          Forages: same as Validation.New Zealand.FRNLRuakura.FRNLRuakura.Forages
          Zone Field: Area=1; Slope=0; AspectAngle=0; Altitude=50
            Folder Management
              Operations Sowing
              Operations FertiliserSchedule
                2000-04-15  [Fertiliser].Apply(Amount: 56, Type: Fertiliser.Types.NH4NO3N, Depth: 10)
                2000-06-01  [Fertiliser].Apply(Amount: 56, Type: Fertiliser.Types.NH4NO3N, Depth: 10)
                2000-07-05  [Fertiliser].Apply(Amount: 56, Type: Fertiliser.Types.NH4NO3N, Depth: 10)
              Manager DefoliationManager
                DefoliationRotationStartDate = 01/01/1900 00:00:00
                DefoliationRotationEndDate = 12/31/2100 00:00:00
                DefoliationTriggerType = FixedInterval
                IntervalBetweenDefoliations = 21
                TargetStandingBiomass = 250
                DurationOfEachDefoliation = 1
                RemoveAmountType = ResidualDM
                AmountForEachDefoliation = 125
                DMRemoveType = UserDefinedFraction
                FractionDMToRemove = 0.99
                NRemoveType = UserDefinedFraction
                FractionNToRemove = 0.99
                ReturnType = AsDungUrine
                NDungType = DefineCNratio
                CNRatioDung = 17.5
                UrineDepth = 250
                AllowAutomaticManagement = No
                Crop = [PlantainForage]
                TargetCropHeight = 200
                TargetPhenologyStage = 3.5
                RemoveAllBiomass = No
                EnforceMinimumInterval = No
                MinimumInterval = 15
                EnforceMaximumInterval = No
                MaximumInterval = 60
                SuppressDefoliationOnWindow = No
                NoDefoliationWindowStartDate = 1-Jun
                NoDefoliationWindowEndDate = 31-Jul
                ProportionOfNToDung = 0.4
                rateOfPopulationDecline = 0.15
                MeanGrowthPeriodType = BetweenDefoliations
                MaxPeriodForMeanGrowth = 30
                DefoliationFractions = Leaf.FractionLiveToRemove=0.7, Leaf.FractionDeadToRemove=0.5, Stem.FractionLiveToRemove=0.8, Stem.FractionDeadToRemove=0.65, Inflorescence.FractionLiveToRemove=0.8, Inflorescence.FractionDeadToRemove=0.25, TapRoot.FractionLiveToResidue=0.1, Root.FractionLiveToResidue=0.05
                script: same as in Validation.New Zealand.FRNLLincoln.FRNLLincoln.Field.Management.DefoliationManager
              Operations Cuttings
                1999-09-15  [DefoliationManager].Script.Defoliate(amountDM: 50, amountType: "ResidualDM", duration: 1)
                2000-05-16  [DefoliationManager].Script.Defoliate(amountDM: 50, amountType: "ResidualDM", duration: 1)
                2000-06-14  [DefoliationManager].Script.Defoliate(amountDM: 50, amountType: "ResidualDM", duration: 1)
                2000-07-11  [DefoliationManager].Script.Defoliate(amountDM: 50, amountType: "ResidualDM", duration: 1)
                2000-08-08  [DefoliationManager].Script.Defoliate(amountDM: 60, amountType: "ResidualDM", duration: 1)
                2000-09-05  [DefoliationManager].Script.Defoliate(amountDM: 60, amountType: "ResidualDM", duration: 1)
            Manager ExtraVars
              script: same as in Validation.New Zealand.FRNLLincoln.FRNLLincoln.Field.ExtraVars
            MicroClimate: a_interception=0; b_interception=1; c_interception=0; d_interception=0; SoilHeatFluxFraction=0.4; MinimumHeightDiffForNewLayer=0; NightInterceptionFraction=0.5; ReferenceHeight=2
            SurfaceOrganicMatter: InitialResidueName=grass; InitialResidueType=grass; InitialResidueMass=500; InitialStandingFraction=0; InitialCPR=0; InitialCNR=40
            Irrigation
            Fertiliser
            Soil HagerstownSoil: same as Validation.USA.RELARC_01.RELARC_01.Field.HagerstownSoil
            Plant PlantainForage
            Report CropReport: VariableNames=// variables defined in 'Replacements'; EventNames=[Clock].DoReport
            Report BaseReport: same as Validation.New Zealand.FRNLLincoln.FRNLLincoln.Field.BaseReport
            Report CumReport: same as Validation.New Zealand.FRNLLincoln.FRNLLincoln.Field.CumReport
            Report DiagnosisReport: VariableNames=// variables defined in 'Replacements'; EventNames=[Clock].DoReport
            Report ValidationReport: same as Validation.New Zealand.FRNLLincoln.FRNLLincoln.Field.ValidationReport
      Memo SubTitle
        ### All data from USA
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